// zero out loads before linking geodata
#for OBJ in ${FIND class=load}
modify ${OBJ}.S 0+0j;
modify ${OBJ}.Z 0+0j;
modify ${OBJ}.I 0+0j;
modify ${OBJ}.P 0+0j;
#done

// load total demand gis
#include "../data/loads_gis.glm"

object geodata
{
	file "../data/geodata/total.csv";
	target "load::P";
	scale 0.25;
}
