module pypower;
object pypower.gen
{
    name "wecc240_psse_G_2201";
    parent wecc240_psse_N_2201;
    Pmax 2061.9 MW;
    Qmax 412.4 MW;
    Qmin -412.4 MW;
    status IN_SERVICE;
    object gencost
    {
        model POLYNOMIAL;
        startup 0.0 $;
        shutdown 0.0 $;
        costs "0.0,0.0,0.0";
    };
}
object pypower.powerplant
{
    // OTAY_MESA_GENERATING_PROJECT_2: cap=688.5, cf=0.334, units=1
    name "wecc240_psse_G_2201_CC";
    parent "wecc240_psse_G_2201";
    latitude 32.68;
    longitude -117.0;
    generator CC;
    operating_capacity 688.5 MW;
    startup_cost 35.0;
    shutdown_cost 0.0;
    fixed_cost 500.0;
    variable_cost 50.0;
    scarcity_cost 0.001;
}

object pypower.powerplant
{
    // CALPEAK_POWER_BORDER_PEAKER_PLANT: cap=60.5, cf=0.029, units=1
    // CHULA_VISTA_I: cap=44.0, cf=0.021, units=1
    // CUYAMACA_PEAK_ENERGY_PLANT: cap=48.7, cf=0.024, units=1
    // EL_CAJON_ENERGY_CENTER: cap=49.9, cf=0.024, units=1
    // LARKSPUR_ENERGY_FACILITY: cap=99.8, cf=0.048, units=1
    // OTAY: cap=10.5, cf=0.005, units=1
    // PIO_PICO_ENERGY_CENTER: cap=321.0, cf=0.156, units=1
    name "wecc240_psse_G_2201_CT";
    parent "wecc240_psse_G_2201";
    latitude 32.68;
    longitude -117.0;
    generator CT;
    operating_capacity 634.4 MW;
    startup_cost 25.0;
    shutdown_cost 0.0;
    fixed_cost 350.0;
    variable_cost 75.0;
    scarcity_cost 0.001;
}

object pypower.powerplant
{
    // KUMEYAAY_WIND: cap=50.0, cf=0.024, units=1
    name "wecc240_psse_G_2201_WT";
    parent "wecc240_psse_G_2201";
    latitude 32.68;
    longitude -117.0;
    generator WT;
    operating_capacity 50.0 MW;
    startup_cost 0.0;
    shutdown_cost 0.0;
    fixed_cost 0.0;
    variable_cost 0.0;
    scarcity_cost 0.0;
}

object pypower.gen
{
    name "wecc240_psse_G_2203";
    parent wecc240_psse_N_2203;
    Pmax 1177.5 MW;
    Qmax 235.5 MW;
    Qmin -235.5 MW;
    status IN_SERVICE;
    object gencost
    {
        model POLYNOMIAL;
        startup 0.0 $;
        shutdown 0.0 $;
        costs "0.0,0.0,0.0";
    };
}
object pypower.powerplant
{
    // GOAL_LINE_LP: cap=51.4, cf=0.044, units=1
    // NAVAL_STATION_ENERGY_FACILITY: cap=55.2, cf=0.047, units=1
    // NORTH_ISLAND_ENERGY_FACILITY: cap=40.3, cf=0.034, units=1
    // NTC_MCRD_ENERGY_FACILITY: cap=25.6, cf=0.022, units=1
    // PALOMAR_ENERGY: cap=559.0, cf=0.475, units=1
    // SAN_DIEGO_STATE_UNIVERSITY: cap=15.1, cf=0.013, units=1
    // UNIVERSITY_OF_CALIFORNIA_SAN_DIEGO: cap=35.5, cf=0.03, units=1
    name "wecc240_psse_G_2203_CC";
    parent "wecc240_psse_G_2203";
    latitude 32.79;
    longitude -117.1;
    generator CC;
    operating_capacity 782.1 MW;
    startup_cost 35.0;
    shutdown_cost 0.0;
    fixed_cost 500.0;
    variable_cost 50.0;
    scarcity_cost 0.001;
}

object pypower.powerplant
{
    // CALPEAK_POWER_ENTERPRISE_PEAKER_PLANT: cap=58.9, cf=0.05, units=1
    // CHILDRENS_HOSPITAL: cap=10.0, cf=0.008, units=1
    // C_P_KELCO_SAN_DIEGO_PLANT: cap=28.0, cf=0.024, units=1
    // ESCONDIDO_POWER_PLANT: cap=49.9, cf=0.042, units=1
    // MIRAMAR_ENERGY_FACILITY: cap=106.0, cf=0.09, units=1
    name "wecc240_psse_G_2203_CT";
    parent "wecc240_psse_G_2203";
    latitude 32.79;
    longitude -117.1;
    generator CT;
    operating_capacity 252.8 MW;
    startup_cost 25.0;
    shutdown_cost 0.0;
    fixed_cost 350.0;
    variable_cost 75.0;
    scarcity_cost 0.001;
}

object pypower.powerplant
{
    // ESCONDIDO_ENERGY_STORAGE: cap=30.0, cf=0.025, units=1
    // UNIVERSITY_OF_CALIFORNIA_SAN_DIEGO: cap=35.5, cf=0.03, units=1
    name "wecc240_psse_G_2203_ES";
    parent "wecc240_psse_G_2203";
    latitude 32.79;
    longitude -117.1;
    generator ES;
    operating_capacity 65.5 MW;
    startup_cost 0.0;
    shutdown_cost 0.0;
    fixed_cost 0.0;
    variable_cost 5.0;
    scarcity_cost 0.0;
}

object pypower.powerplant
{
    // LAKE_HODGES_HYDROELECTRIC_FACILITY: cap=42.0, cf=0.036, units=1
    name "wecc240_psse_G_2203_HT";
    parent "wecc240_psse_G_2203";
    latitude 32.79;
    longitude -117.1;
    generator HT;
    operating_capacity 42.0 MW;
    startup_cost 0.0;
    shutdown_cost 0.0;
    fixed_cost 200.0;
    variable_cost 0.0;
    scarcity_cost 0.001;
}

object pypower.powerplant
{
    // CHILDRENS_HOSPITAL: cap=10.0, cf=0.008, units=1
    name "wecc240_psse_G_2203_IC";
    parent "wecc240_psse_G_2203";
    latitude 32.79;
    longitude -117.1;
    generator IC;
    operating_capacity 10.0 MW;
    startup_cost 0.0;
    shutdown_cost 0.0;
    fixed_cost 0.0;
    variable_cost 50.0;
    scarcity_cost 0.001;
}

object pypower.powerplant
{
    // SAN_DIEGO_STATE_UNIVERSITY: cap=15.1, cf=0.013, units=1
    name "wecc240_psse_G_2203_PV";
    parent "wecc240_psse_G_2203";
    latitude 32.79;
    longitude -117.1;
    generator PV;
    operating_capacity 15.1 MW;
    startup_cost 0.0;
    shutdown_cost 0.0;
    fixed_cost 0.0;
    variable_cost 0.0;
    scarcity_cost 0.0;
}

object pypower.powerplant
{
    // CHILDRENS_HOSPITAL: cap=10.0, cf=0.008, units=1
    name "wecc240_psse_G_2203_ST";
    parent "wecc240_psse_G_2203";
    latitude 32.79;
    longitude -117.1;
    generator ST;
    operating_capacity 10.0 MW;
    startup_cost 6500.0;
    shutdown_cost 0.0;
    fixed_cost 1000.0;
    variable_cost 5.0;
    scarcity_cost 0.001;
}

object pypower.gen
{
    name "wecc240_psse_G_2503";
    parent wecc240_psse_N_2503;
    Pmax 2117.2 MW;
    Qmax 423.4 MW;
    Qmin -423.4 MW;
    status IN_SERVICE;
    object gencost
    {
        model POLYNOMIAL;
        startup 0.0 $;
        shutdown 0.0 $;
        costs "0.0,0.0,0.0";
    };
}
object pypower.powerplant
{
    // ENCINA: cap=999.6, cf=0.472, units=1
    // ORANGE_GROVE_PEAKING_FACILITY: cap=118.0, cf=0.056, units=1
    name "wecc240_psse_G_2503_CT";
    parent "wecc240_psse_G_2503";
    latitude 33.37;
    longitude -117.6;
    generator CT;
    operating_capacity 1117.6 MW;
    startup_cost 25.0;
    shutdown_cost 0.0;
    fixed_cost 350.0;
    variable_cost 75.0;
    scarcity_cost 0.001;
}

object pypower.powerplant
{
    // ENCINA: cap=999.6, cf=0.472, units=1
    name "wecc240_psse_G_2503_ST";
    parent "wecc240_psse_G_2503";
    latitude 33.37;
    longitude -117.6;
    generator ST;
    operating_capacity 999.6 MW;
    startup_cost 6500.0;
    shutdown_cost 0.0;
    fixed_cost 1000.0;
    variable_cost 5.0;
    scarcity_cost 0.001;
}

object pypower.gen
{
    name "wecc240_psse_G_2610";
    parent wecc240_psse_N_2610;
    Pmax 1002.2 MW;
    Qmax 200.4 MW;
    Qmin -200.4 MW;
    status IN_SERVICE;
    object gencost
    {
        model POLYNOMIAL;
        startup 0.0 $;
        shutdown 0.0 $;
        costs "0.0,0.0,0.0";
    };
}
object pypower.powerplant
{
    // UCI_FACILITIES_MANAGEMENT_CENTRAL_PLANT: cap=19.0, cf=0.019, units=1
    name "wecc240_psse_G_2610_CC";
    parent "wecc240_psse_G_2610";
    latitude 33.7;
    longitude -117.9;
    generator CC;
    operating_capacity 19.0 MW;
    startup_cost 35.0;
    shutdown_cost 0.0;
    fixed_cost 500.0;
    variable_cost 50.0;
    scarcity_cost 0.001;
}

object pypower.powerplant
{
    // AES_HUNTINGTON_BEACH_LLC: cap=436.0, cf=0.435, units=1
    // BARRE_PEAKER: cap=49.8, cf=0.05, units=1
    // GRS_COYOTE_CANYON: cap=20.0, cf=0.02, units=1
    name "wecc240_psse_G_2610_CT";
    parent "wecc240_psse_G_2610";
    latitude 33.7;
    longitude -117.9;
    generator CT;
    operating_capacity 505.8 MW;
    startup_cost 25.0;
    shutdown_cost 0.0;
    fixed_cost 350.0;
    variable_cost 75.0;
    scarcity_cost 0.001;
}

object pypower.powerplant
{
    // PEBBLY_BEACH: cap=12.7, cf=0.013, units=1
    name "wecc240_psse_G_2610_ES";
    parent "wecc240_psse_G_2610";
    latitude 33.7;
    longitude -117.9;
    generator ES;
    operating_capacity 12.7 MW;
    startup_cost 0.0;
    shutdown_cost 0.0;
    fixed_cost 0.0;
    variable_cost 5.0;
    scarcity_cost 0.0;
}

object pypower.powerplant
{
    // AES_HUNTINGTON_BEACH_LLC: cap=436.0, cf=0.435, units=1
    // PEBBLY_BEACH: cap=12.7, cf=0.013, units=1
    // PLANT_NO_2_ORANGE_COUNTY: cap=16.0, cf=0.016, units=1
    name "wecc240_psse_G_2610_ST";
    parent "wecc240_psse_G_2610";
    latitude 33.7;
    longitude -117.9;
    generator ST;
    operating_capacity 464.7 MW;
    startup_cost 6500.0;
    shutdown_cost 0.0;
    fixed_cost 1000.0;
    variable_cost 5.0;
    scarcity_cost 0.001;
}

object pypower.gen
{
    name "wecc240_psse_G_2301";
    parent wecc240_psse_N_2301;
    Pmax 2931.8 MW;
    Qmax 586.4 MW;
    Qmin -586.4 MW;
    status IN_SERVICE;
    object gencost
    {
        model POLYNOMIAL;
        startup 0.0 $;
        shutdown 0.0 $;
        costs "0.0,0.0,0.0";
    };
}
object pypower.powerplant
{
    // EL_CENTRO: cap=388.3, cf=0.132, units=1
    name "wecc240_psse_G_2301_CC";
    parent "wecc240_psse_G_2301";
    latitude 32.86;
    longitude -115.6;
    generator CC;
    operating_capacity 388.3 MW;
    startup_cost 35.0;
    shutdown_cost 0.0;
    fixed_cost 500.0;
    variable_cost 50.0;
    scarcity_cost 0.001;
}

object pypower.powerplant
{
    // ROCKWOOD: cap=49.8, cf=0.017, units=1
    name "wecc240_psse_G_2301_CT";
    parent "wecc240_psse_G_2301";
    latitude 32.86;
    longitude -115.6;
    generator CT;
    operating_capacity 49.8 MW;
    startup_cost 25.0;
    shutdown_cost 0.0;
    fixed_cost 350.0;
    variable_cost 75.0;
    scarcity_cost 0.001;
}

object pypower.powerplant
{
    // EL_CENTRO: cap=388.3, cf=0.132, units=1
    name "wecc240_psse_G_2301_ES";
    parent "wecc240_psse_G_2301";
    latitude 32.86;
    longitude -115.6;
    generator ES;
    operating_capacity 388.3 MW;
    startup_cost 0.0;
    shutdown_cost 0.0;
    fixed_cost 0.0;
    variable_cost 5.0;
    scarcity_cost 0.0;
}

object pypower.powerplant
{
    // CAMPO_VERDE_SOLAR: cap=147.4, cf=0.05, units=1
    // CENTINELA_SOLAR_ENERGY: cap=174.8, cf=0.06, units=1
    // HEBER_SOLAR: cap=10.9, cf=0.004, units=1
    // IMPERIAL_CENTER_S: cap=128.9, cf=0.044, units=1
    // IMPERIAL_SOLAR_ENERGY_CENTER_SOUTH: cap=128.9, cf=0.044, units=1
    // IMPERIAL_SOLAR_ENERGY_CENTER_WEST: cap=148.7, cf=0.051, units=1
    // IMPERIAL_VALLEY_SOLAR_LLC: cap=199.9, cf=0.068, units=1
    // JACUMBA_SOLAR_FARM_2: cap=20.0, cf=0.007, units=1
    // MT_SIGNAL: cap=199.9, cf=0.068, units=1
    // SEVILLE_2: cap=30.0, cf=0.01, units=1
    // SEVILLE_SOLAR_1: cap=20.0, cf=0.007, units=1
    // SOL_ORCHARD_EL_CENTRO_PV: cap=20.0, cf=0.007, units=1
    name "wecc240_psse_G_2301_PV";
    parent "wecc240_psse_G_2301";
    latitude 32.86;
    longitude -115.6;
    generator PV;
    operating_capacity 1229.4 MW;
    startup_cost 0.0;
    shutdown_cost 0.0;
    fixed_cost 0.0;
    variable_cost 0.0;
    scarcity_cost 0.0;
}

object pypower.powerplant
{
    // EL_CENTRO: cap=388.3, cf=0.132, units=1
    // HEBER_GEOTHERMAL: cap=62.5, cf=0.021, units=1
    // ROCKWOOD: cap=49.8, cf=0.017, units=1
    // SALTON_SEA_POWER_GEN_CO_-_UNIT_2: cap=20.0, cf=0.007, units=1
    // SALTON_SEA_POWER_GEN_CO_UNIT_1: cap=10.0, cf=0.003, units=1
    // SECOND_IMPERIAL_GEOTHERMAL: cap=80.0, cf=0.027, units=1
    name "wecc240_psse_G_2301_ST";
    parent "wecc240_psse_G_2301";
    latitude 32.86;
    longitude -115.6;
    generator ST;
    operating_capacity 610.6 MW;
    startup_cost 6500.0;
    shutdown_cost 0.0;
    fixed_cost 1000.0;
    variable_cost 5.0;
    scarcity_cost 0.001;
}

object pypower.powerplant
{
    // OCOTILLO_EXPRESS_LLC: cap=265.4, cf=0.091, units=1
    name "wecc240_psse_G_2301_WT";
    parent "wecc240_psse_G_2301";
    latitude 32.86;
    longitude -115.6;
    generator WT;
    operating_capacity 265.4 MW;
    startup_cost 0.0;
    shutdown_cost 0.0;
    fixed_cost 0.0;
    variable_cost 0.0;
    scarcity_cost 0.0;
}

object pypower.gen
{
    name "wecc240_psse_G_2100";
    parent wecc240_psse_N_2100;
    Pmax 3019.2 MW;
    Qmax 603.8 MW;
    Qmin -603.8 MW;
    status IN_SERVICE;
    object gencost
    {
        model POLYNOMIAL;
        startup 0.0 $;
        shutdown 0.0 $;
        costs "0.0,0.0,0.0";
    };
}
object pypower.powerplant
{
    // YUMA_COGENERATION_ASSOCIATES: cap=62.6, cf=0.021, units=1
    name "wecc240_psse_G_2100_CC";
    parent "wecc240_psse_G_2100";
    latitude 32.97;
    longitude -115.4;
    generator CC;
    operating_capacity 62.6 MW;
    startup_cost 35.0;
    shutdown_cost 0.0;
    fixed_cost 500.0;
    variable_cost 50.0;
    scarcity_cost 0.001;
}

object pypower.powerplant
{
    // NILAND_GAS_TURBINE_PLANT: cap=121.0, cf=0.04, units=1
    // YUCCA: cap=425.0, cf=0.141, units=1
    name "wecc240_psse_G_2100_CT";
    parent "wecc240_psse_G_2100";
    latitude 32.97;
    longitude -115.4;
    generator CT;
    operating_capacity 546.0 MW;
    startup_cost 25.0;
    shutdown_cost 0.0;
    fixed_cost 350.0;
    variable_cost 75.0;
    scarcity_cost 0.001;
}

object pypower.powerplant
{
    // DROP_2_CA: cap=10.0, cf=0.003, units=1
    // DROP_4: cap=19.6, cf=0.006, units=1
    // PILOT_KNOB: cap=33.0, cf=0.011, units=1
    name "wecc240_psse_G_2100_HT";
    parent "wecc240_psse_G_2100";
    latitude 32.97;
    longitude -115.4;
    generator HT;
    operating_capacity 62.6 MW;
    startup_cost 0.0;
    shutdown_cost 0.0;
    fixed_cost 200.0;
    variable_cost 0.0;
    scarcity_cost 0.001;
}

object pypower.powerplant
{
    // ARKANSAS: cap=155.1, cf=0.051, units=1
    // CALIPATRIA_SOLAR_FARM: cap=20.0, cf=0.007, units=1
    // DESERT_SUNLIGHT_250_LLC: cap=249.7, cf=0.083, units=1
    // DESERT_SUNLIGHT_300_LLC: cap=313.7, cf=0.104, units=1
    // FOOTHILLS_SOLAR_PLANT: cap=35.0, cf=0.012, units=1
    // IMPERIAL_VALLEY_SOLAR_COMPANY_1_LLC: cap=23.0, cf=0.008, units=1
    // IMPERIAL_VALLEY_SOLAR_CO_IVSC_2_LLC: cap=20.0, cf=0.007, units=1
    // SOLAR_GEN_2: cap=155.1, cf=0.051, units=1
    // SONORA_FACILITY: cap=155.1, cf=0.051, units=1
    name "wecc240_psse_G_2100_PV";
    parent "wecc240_psse_G_2100";
    latitude 32.97;
    longitude -115.4;
    generator PV;
    operating_capacity 1126.7 MW;
    startup_cost 0.0;
    shutdown_cost 0.0;
    fixed_cost 0.0;
    variable_cost 0.0;
    scarcity_cost 0.0;
}

object pypower.powerplant
{
    // CE_LEATHERS: cap=45.5, cf=0.015, units=1
    // CE_TURBO_LLC: cap=11.5, cf=0.004, units=1
    // DEL_RANCH_COMPANY: cap=45.5, cf=0.015, units=1
    // ELMORE_COMPANY: cap=45.5, cf=0.015, units=1
    // GENESIS_SOLAR_ENERGY_PROJECT: cap=250.0, cf=0.083, units=1
    // GEO_EAST_MESA_III: cap=29.6, cf=0.01, units=1
    // JOHN_L_FEATHERSTONE_PLANT: cap=55.0, cf=0.018, units=1
    // NORTH_BRAWLEY_GEOTHERMAL_PLANT: cap=64.0, cf=0.021, units=1
    // ORMESA_I: cap=26.4, cf=0.009, units=1
    // ORMESA_II: cap=24.0, cf=0.008, units=1
    // SALTON_SEA_POWER_GEN_CO_-_UNIT_3: cap=53.9, cf=0.018, units=1
    // SALTON_SEA_POWER_GEN_CO_-_UNIT_4: cap=47.5, cf=0.016, units=1
    // SALTON_SEA_POWER_LLC_-_UNIT_5: cap=58.3, cf=0.019, units=1
    // VULCAN-BN_GEOTHERMAL_POWER_COMPANY: cap=39.6, cf=0.013, units=1
    // YUCCA: cap=425.0, cf=0.141, units=1
    name "wecc240_psse_G_2100_ST";
    parent "wecc240_psse_G_2100";
    latitude 32.97;
    longitude -115.4;
    generator ST;
    operating_capacity 1221.3 MW;
    startup_cost 6500.0;
    shutdown_cost 0.0;
    fixed_cost 1000.0;
    variable_cost 5.0;
    scarcity_cost 0.001;
}

object pypower.gen
{
    name "wecc240_psse_G_1401";
    parent wecc240_psse_N_1401;
    Pmax 12581.3 MW;
    Qmax 2516.3 MW;
    Qmin -2516.3 MW;
    status IN_SERVICE;
    object gencost
    {
        model POLYNOMIAL;
        startup 0.0 $;
        shutdown 0.0 $;
        costs "0.0,0.0,0.0";
    };
}
object pypower.powerplant
{
    // ARLINGTON_VALLEY_ENERGY_FACILITY: cap=713.0, cf=0.057, units=1
    // GILA_RIVER_POWER_BLOCK_2: cap=619.0, cf=0.049, units=1
    // GILA_RIVER_POWER_BLOCK_3: cap=619.0, cf=0.049, units=1
    // GILA_RIVER_POWER_STATION: cap=619.0, cf=0.049, units=1
    // HARQUAHALA_GENERATING_PROJECT: cap=1325.1, cf=0.105, units=1
    // MESQUITE_GENERATING_STATION_BLOCK_1: cap=691.6, cf=0.055, units=1
    // MESQUITE_GENERATING_STATION_BLOCK_2: cap=691.6, cf=0.055, units=1
    // RED_HAWK: cap=1140.3, cf=0.091, units=1
    // SUNDEVIL_POWER_HOLDINGS_-_GILA_RIVER: cap=619.0, cf=0.049, units=1
    name "wecc240_psse_G_1401_CC";
    parent "wecc240_psse_G_1401";
    latitude 33.52;
    longitude -113.2;
    generator CC;
    operating_capacity 7037.6 MW;
    startup_cost 35.0;
    shutdown_cost 0.0;
    fixed_cost 500.0;
    variable_cost 50.0;
    scarcity_cost 0.001;
}

object pypower.powerplant
{
    // SOLANA_GENERATING_STATION: cap=280.0, cf=0.022, units=1
    name "wecc240_psse_G_1401_ES";
    parent "wecc240_psse_G_1401";
    latitude 33.52;
    longitude -113.2;
    generator ES;
    operating_capacity 280.0 MW;
    startup_cost 0.0;
    shutdown_cost 0.0;
    fixed_cost 0.0;
    variable_cost 5.0;
    scarcity_cost 0.0;
}

object pypower.powerplant
{
    // AGUA_CALIENTE_SOLAR_PROJECT: cap=347.7, cf=0.028, units=1
    // ARLINGTON_VALLEY_SOLAR_ENERGY_II: cap=129.0, cf=0.01, units=1
    // BADGER_1: cap=14.8, cf=0.001, units=1
    // COTTON_CENTER_SOLAR: cap=17.0, cf=0.001, units=1
    // GILA_BEND: cap=32.0, cf=0.003, units=1
    // GILLESPIE_1: cap=15.0, cf=0.001, units=1
    // HYDER_II: cap=14.0, cf=0.001, units=1
    // HYDER_SOLAR: cap=22.0, cf=0.002, units=1
    // MESQUITE_2: cap=100.0, cf=0.008, units=1
    // MESQUITE_3: cap=150.0, cf=0.012, units=1
    // MESQUITE_SOLAR_1: cap=170.0, cf=0.014, units=1
    // PALOMA_SOLAR: cap=17.6, cf=0.001, units=1
    // SADDLE_MOUNTAIN_SOLAR_I: cap=15.0, cf=0.001, units=1
    // SR85: cap=10.0, cf=0.001, units=1
    name "wecc240_psse_G_1401_PV";
    parent "wecc240_psse_G_1401";
    latitude 33.52;
    longitude -113.2;
    generator PV;
    operating_capacity 1054.1 MW;
    startup_cost 0.0;
    shutdown_cost 0.0;
    fixed_cost 0.0;
    variable_cost 0.0;
    scarcity_cost 0.0;
}

object pypower.powerplant
{
    // PALO_VERDE: cap=4209.6, cf=0.335, units=1
    name "wecc240_psse_G_1401_ST";
    parent "wecc240_psse_G_1401";
    latitude 33.52;
    longitude -113.2;
    generator ST;
    operating_capacity 4209.6 MW;
    startup_cost 6500.0;
    shutdown_cost 0.0;
    fixed_cost 1000.0;
    variable_cost 5.0;
    scarcity_cost 0.001;
}

object pypower.gen
{
    name "wecc240_psse_G_3601";
    parent wecc240_psse_N_3601;
    Pmax 366.5 MW;
    Qmax 73.3 MW;
    Qmin -73.3 MW;
    status IN_SERVICE;
    object gencost
    {
        model POLYNOMIAL;
        startup 0.0 $;
        shutdown 0.0 $;
        costs "0.0,0.0,0.0";
    };
}
object pypower.powerplant
{
    // HUMBOLDT_BAY: cap=167.0, cf=0.456, units=1
    name "wecc240_psse_G_3601_IC";
    parent "wecc240_psse_G_3601";
    latitude 40.8;
    longitude -124.2;
    generator IC;
    operating_capacity 167.0 MW;
    startup_cost 0.0;
    shutdown_cost 0.0;
    fixed_cost 0.0;
    variable_cost 50.0;
    scarcity_cost 0.001;
}

object pypower.powerplant
{
    // EEL_RIVER_POWER: cap=32.5, cf=0.089, units=1
    // HUMBOLDT_BAY: cap=167.0, cf=0.456, units=1
    name "wecc240_psse_G_3601_ST";
    parent "wecc240_psse_G_3601";
    latitude 40.8;
    longitude -124.2;
    generator ST;
    operating_capacity 199.5 MW;
    startup_cost 6500.0;
    shutdown_cost 0.0;
    fixed_cost 1000.0;
    variable_cost 5.0;
    scarcity_cost 0.001;
}

object pypower.gen
{
    name "wecc240_psse_G_2407";
    parent wecc240_psse_N_2407;
    Pmax 13143.8 MW;
    Qmax 2628.8 MW;
    Qmin -2628.8 MW;
    status IN_SERVICE;
    object gencost
    {
        model POLYNOMIAL;
        startup 0.0 $;
        shutdown 0.0 $;
        costs "0.0,0.0,0.0";
    };
}
object pypower.powerplant
{
    // CARSON_COGENERATION: cap=55.8, cf=0.004, units=1
    // HARBOR: cap=548.1, cf=0.042, units=1
    // HARBOR_COGEN: cap=107.4, cf=0.008, units=1
    // HAYNES: cap=1739.1, cf=0.132, units=1
    // LONG_BEACH_GENERATION_LLC: cap=252.0, cf=0.019, units=1
    // WATSON_COGENERATION: cap=405.0, cf=0.031, units=1
    // WHEELABRATOR_NORWALK_ENERGY: cap=30.7, cf=0.002, units=1
    name "wecc240_psse_G_2407_CC";
    parent "wecc240_psse_G_2407";
    latitude 33.88;
    longitude -118.2;
    generator CC;
    operating_capacity 3138.1 MW;
    startup_cost 35.0;
    shutdown_cost 0.0;
    fixed_cost 500.0;
    variable_cost 50.0;
    scarcity_cost 0.001;
}

object pypower.powerplant
{
    // AES_ALAMITOS_LLC: cap=1922.0, cf=0.146, units=1
    // CENTER_PEAKER: cap=59.8, cf=0.005, units=1
    // EXXONMOBIL_OIL_TORRANCE_REFINERY: cap=98.6, cf=0.008, units=2
    // HARBOR: cap=548.1, cf=0.042, units=1
    // HAYNES: cap=1739.1, cf=0.132, units=1
    // LONG_BEACH_GENERATION_LLC: cap=252.0, cf=0.019, units=1
    // SOUTHEAST_RESOURCE_RECOVERY: cap=35.6, cf=0.003, units=1
    // TESORO_WILMINGTON_CALCINER: cap=34.0, cf=0.003, units=1
    // THUMS: cap=57.4, cf=0.004, units=1
    // WILMINGTON_HYDROGEN_PLANT: cap=31.9, cf=0.002, units=1
    name "wecc240_psse_G_2407_CT";
    parent "wecc240_psse_G_2407";
    latitude 33.88;
    longitude -118.2;
    generator CT;
    operating_capacity 4778.5 MW;
    startup_cost 25.0;
    shutdown_cost 0.0;
    fixed_cost 350.0;
    variable_cost 75.0;
    scarcity_cost 0.001;
}

object pypower.powerplant
{
    // CENTER_PEAKER: cap=59.8, cf=0.005, units=1
    name "wecc240_psse_G_2407_ES";
    parent "wecc240_psse_G_2407";
    latitude 33.88;
    longitude -118.2;
    generator ES;
    operating_capacity 59.8 MW;
    startup_cost 0.0;
    shutdown_cost 0.0;
    fixed_cost 0.0;
    variable_cost 5.0;
    scarcity_cost 0.0;
}

object pypower.powerplant
{
    // AES_ALAMITOS_LLC: cap=1922.0, cf=0.146, units=1
    // AES_REDONDO_BEACH_LLC: cap=1316.4, cf=0.1, units=1
    // EQUILON_LOS_ANGELES_REFINING: cap=83.0, cf=0.006, units=1
    // HAYNES: cap=1739.1, cf=0.132, units=1
    // LOS_ANGELES_REFINERY_WILMINGTON: cap=68.5, cf=0.005, units=1
    // TOTAL_ENERGY_FACILITIES: cap=38.4, cf=0.003, units=1
    name "wecc240_psse_G_2407_ST";
    parent "wecc240_psse_G_2407";
    latitude 33.88;
    longitude -118.2;
    generator ST;
    operating_capacity 5167.4 MW;
    startup_cost 6500.0;
    shutdown_cost 0.0;
    fixed_cost 1000.0;
    variable_cost 5.0;
    scarcity_cost 0.001;
}

object pypower.gen
{
    name "wecc240_psse_G_2613";
    parent wecc240_psse_N_2613;
    Pmax 3423.7 MW;
    Qmax 684.7 MW;
    Qmin -684.7 MW;
    status IN_SERVICE;
    object gencost
    {
        model POLYNOMIAL;
        startup 0.0 $;
        shutdown 0.0 $;
        costs "0.0,0.0,0.0";
    };
}
object pypower.powerplant
{
    // CIVIC_CENTER: cap=34.5, cf=0.01, units=1
    // EL_SEGUNDO_COGEN: cap=180.1, cf=0.053, units=1
    // EL_SEGUNDO_ENERGY_CENTER_LLC: cap=537.4, cf=0.157, units=1
    // SCATTERGOOD: cap=876.0, cf=0.256, units=1
    name "wecc240_psse_G_2613_CC";
    parent "wecc240_psse_G_2613";
    latitude 34.04;
    longitude -118.2;
    generator CC;
    operating_capacity 1628.0 MW;
    startup_cost 35.0;
    shutdown_cost 0.0;
    fixed_cost 500.0;
    variable_cost 50.0;
    scarcity_cost 0.001;
}

object pypower.powerplant
{
    // SCATTERGOOD: cap=876.0, cf=0.256, units=1
    name "wecc240_psse_G_2613_CT";
    parent "wecc240_psse_G_2613";
    latitude 34.04;
    longitude -118.2;
    generator CT;
    operating_capacity 876.0 MW;
    startup_cost 25.0;
    shutdown_cost 0.0;
    fixed_cost 350.0;
    variable_cost 75.0;
    scarcity_cost 0.001;
}

object pypower.powerplant
{
    // USPS_PV: cap=10.7, cf=0.003, units=1
    name "wecc240_psse_G_2613_PV";
    parent "wecc240_psse_G_2613";
    latitude 34.04;
    longitude -118.2;
    generator PV;
    operating_capacity 10.7 MW;
    startup_cost 0.0;
    shutdown_cost 0.0;
    fixed_cost 0.0;
    variable_cost 0.0;
    scarcity_cost 0.0;
}

object pypower.powerplant
{
    // HYPERION_TREATMENT_PLANT_CHP_PLANT: cap=33.0, cf=0.01, units=1
    // SCATTERGOOD: cap=876.0, cf=0.256, units=1
    name "wecc240_psse_G_2613_ST";
    parent "wecc240_psse_G_2613";
    latitude 34.04;
    longitude -118.2;
    generator ST;
    operating_capacity 909.0 MW;
    startup_cost 6500.0;
    shutdown_cost 0.0;
    fixed_cost 1000.0;
    variable_cost 5.0;
    scarcity_cost 0.001;
}

object pypower.gen
{
    name "wecc240_psse_G_2605";
    parent wecc240_psse_N_2605;
    Pmax 141.8 MW;
    Qmax 28.4 MW;
    Qmin -28.4 MW;
    status IN_SERVICE;
    object gencost
    {
        model POLYNOMIAL;
        startup 0.0 $;
        shutdown 0.0 $;
        costs "0.0,0.0,0.0";
    };
}
object pypower.powerplant
{
    // MALBURG: cap=130.0, cf=0.917, units=1
    name "wecc240_psse_G_2605_CC";
    parent "wecc240_psse_G_2605";
    latitude 34.02;
    longitude -118.2;
    generator CC;
    operating_capacity 130.0 MW;
    startup_cost 35.0;
    shutdown_cost 0.0;
    fixed_cost 500.0;
    variable_cost 50.0;
    scarcity_cost 0.001;
}

object pypower.powerplant
{
    // H_GONZALES: cap=11.8, cf=0.083, units=1
    name "wecc240_psse_G_2605_CT";
    parent "wecc240_psse_G_2605";
    latitude 34.02;
    longitude -118.2;
    generator CT;
    operating_capacity 11.8 MW;
    startup_cost 25.0;
    shutdown_cost 0.0;
    fixed_cost 350.0;
    variable_cost 75.0;
    scarcity_cost 0.001;
}

object pypower.gen
{
    name "wecc240_psse_G_2618";
    parent wecc240_psse_N_2618;
    Pmax 1866.1 MW;
    Qmax 373.2 MW;
    Qmin -373.2 MW;
    status IN_SERVICE;
    object gencost
    {
        model POLYNOMIAL;
        startup 0.0 $;
        shutdown 0.0 $;
        costs "0.0,0.0,0.0";
    };
}
object pypower.powerplant
{
    // OLS_ENERGY_CAMARILLO: cap=31.1, cf=0.017, units=1
    name "wecc240_psse_G_2618_CC";
    parent "wecc240_psse_G_2618";
    latitude 34.24;
    longitude -118.5;
    generator CC;
    operating_capacity 31.1 MW;
    startup_cost 35.0;
    shutdown_cost 0.0;
    fixed_cost 500.0;
    variable_cost 50.0;
    scarcity_cost 0.001;
}

object pypower.powerplant
{
    // CALABASAS_GAS_TO_ENERGY_FACILITY: cap=13.8, cf=0.007, units=1
    // E_F_OXNARD_ENERGY_FACILITY: cap=48.5, cf=0.026, units=1
    // MCGRATH_PEAKER: cap=49.8, cf=0.027, units=1
    // OXNARD: cap=68.7, cf=0.037, units=1
    // OXNARD_PAPER_MILL: cap=29.0, cf=0.016, units=1
    name "wecc240_psse_G_2618_CT";
    parent "wecc240_psse_G_2618";
    latitude 34.24;
    longitude -118.5;
    generator CT;
    operating_capacity 209.8 MW;
    startup_cost 25.0;
    shutdown_cost 0.0;
    fixed_cost 350.0;
    variable_cost 75.0;
    scarcity_cost 0.001;
}

object pypower.powerplant
{
    // HOUWELING_NURSERIES: cap=13.2, cf=0.007, units=1
    name "wecc240_psse_G_2618_IC";
    parent "wecc240_psse_G_2618";
    latitude 34.24;
    longitude -118.5;
    generator IC;
    operating_capacity 13.2 MW;
    startup_cost 0.0;
    shutdown_cost 0.0;
    fixed_cost 0.0;
    variable_cost 50.0;
    scarcity_cost 0.001;
}

object pypower.powerplant
{
    // ORMOND_BEACH: cap=1612.0, cf=0.864, units=1
    name "wecc240_psse_G_2618_ST";
    parent "wecc240_psse_G_2618";
    latitude 34.24;
    longitude -118.5;
    generator ST;
    operating_capacity 1612.0 MW;
    startup_cost 6500.0;
    shutdown_cost 0.0;
    fixed_cost 1000.0;
    variable_cost 5.0;
    scarcity_cost 0.001;
}

object pypower.gen
{
    name "wecc240_psse_G_2405";
    parent wecc240_psse_N_2405;
    Pmax 76.8 MW;
    Qmax 15.4 MW;
    Qmin -15.4 MW;
    status IN_SERVICE;
    object gencost
    {
        model POLYNOMIAL;
        startup 0.0 $;
        shutdown 0.0 $;
        costs "0.0,0.0,0.0";
    };
}
object pypower.powerplant
{
    // BERRY_PLACERITA_COGEN: cap=42.8, cf=0.557, units=1
    // SUNSHINE_GAS_PRODUCERS: cap=23.0, cf=0.299, units=1
    name "wecc240_psse_G_2405_CT";
    parent "wecc240_psse_G_2405";
    latitude 34.32;
    longitude -118.5;
    generator CT;
    operating_capacity 65.8 MW;
    startup_cost 25.0;
    shutdown_cost 0.0;
    fixed_cost 350.0;
    variable_cost 75.0;
    scarcity_cost 0.001;
}

object pypower.powerplant
{
    // FOOTHILL: cap=11.0, cf=0.143, units=1
    name "wecc240_psse_G_2405_HT";
    parent "wecc240_psse_G_2405";
    latitude 34.32;
    longitude -118.5;
    generator HT;
    operating_capacity 11.0 MW;
    startup_cost 0.0;
    shutdown_cost 0.0;
    fixed_cost 200.0;
    variable_cost 0.0;
    scarcity_cost 0.001;
}

object pypower.gen
{
    name "wecc240_psse_G_2410";
    parent wecc240_psse_N_2410;
    Pmax 111.3 MW;
    Qmax 22.3 MW;
    Qmin -22.3 MW;
    status IN_SERVICE;
    object gencost
    {
        model POLYNOMIAL;
        startup 0.0 $;
        shutdown 0.0 $;
        costs "0.0,0.0,0.0";
    };
}
object pypower.powerplant
{
    // SAN_FRANCISQUITO_1: cap=69.3, cf=0.623, units=1
    // SAN_FRANCISQUITO_2: cap=42.0, cf=0.377, units=1
    name "wecc240_psse_G_2410_HT";
    parent "wecc240_psse_G_2410";
    latitude 34.44;
    longitude -118.6;
    generator HT;
    operating_capacity 111.3 MW;
    startup_cost 0.0;
    shutdown_cost 0.0;
    fixed_cost 200.0;
    variable_cost 0.0;
    scarcity_cost 0.001;
}

object pypower.gen
{
    name "wecc240_psse_G_2602";
    parent wecc240_psse_N_2602;
    Pmax 2562.6 MW;
    Qmax 512.5 MW;
    Qmin -512.5 MW;
    status IN_SERVICE;
    object gencost
    {
        model POLYNOMIAL;
        startup 0.0 $;
        shutdown 0.0 $;
        costs "0.0,0.0,0.0";
    };
}
object pypower.powerplant
{
    // MAGNOLIA_POWER_PROJECT: cap=387.6, cf=0.151, units=1
    // UCLA_SO_CAMPUS_COGEN_PROJECT: cap=43.0, cf=0.017, units=1
    // VALLEY_CA: cap=690.5, cf=0.269, units=1
    name "wecc240_psse_G_2602_CC";
    parent "wecc240_psse_G_2602";
    latitude 34.18;
    longitude -118.4;
    generator CC;
    operating_capacity 1121.1 MW;
    startup_cost 35.0;
    shutdown_cost 0.0;
    fixed_cost 500.0;
    variable_cost 50.0;
    scarcity_cost 0.001;
}

object pypower.powerplant
{
    // LAKE_ONE: cap=60.5, cf=0.024, units=1
    // VALLEY_CA: cap=690.5, cf=0.269, units=1
    name "wecc240_psse_G_2602_CT";
    parent "wecc240_psse_G_2602";
    latitude 34.18;
    longitude -118.4;
    generator CT;
    operating_capacity 751.0 MW;
    startup_cost 25.0;
    shutdown_cost 0.0;
    fixed_cost 350.0;
    variable_cost 75.0;
    scarcity_cost 0.001;
}

object pypower.powerplant
{
    // VALLEY_CA: cap=690.5, cf=0.269, units=1
    name "wecc240_psse_G_2602_ST";
    parent "wecc240_psse_G_2602";
    latitude 34.18;
    longitude -118.4;
    generator ST;
    operating_capacity 690.5 MW;
    startup_cost 6500.0;
    shutdown_cost 0.0;
    fixed_cost 1000.0;
    variable_cost 5.0;
    scarcity_cost 0.001;
}

object pypower.gen
{
    name "wecc240_psse_G_2609";
    parent wecc240_psse_N_2609;
    Pmax 902.7 MW;
    Qmax 180.5 MW;
    Qmin -180.5 MW;
    status IN_SERVICE;
    object gencost
    {
        model POLYNOMIAL;
        startup 0.0 $;
        shutdown 0.0 $;
        costs "0.0,0.0,0.0";
    };
}
object pypower.powerplant
{
    // GRAYSON: cap=300.9, cf=0.333, units=1
    name "wecc240_psse_G_2609_CC";
    parent "wecc240_psse_G_2609";
    latitude 34.15;
    longitude -118.3;
    generator CC;
    operating_capacity 300.9 MW;
    startup_cost 35.0;
    shutdown_cost 0.0;
    fixed_cost 500.0;
    variable_cost 50.0;
    scarcity_cost 0.001;
}

object pypower.powerplant
{
    // GRAYSON: cap=300.9, cf=0.333, units=1
    name "wecc240_psse_G_2609_CT";
    parent "wecc240_psse_G_2609";
    latitude 34.15;
    longitude -118.3;
    generator CT;
    operating_capacity 300.9 MW;
    startup_cost 25.0;
    shutdown_cost 0.0;
    fixed_cost 350.0;
    variable_cost 75.0;
    scarcity_cost 0.001;
}

object pypower.powerplant
{
    // GRAYSON: cap=300.9, cf=0.333, units=1
    name "wecc240_psse_G_2609_ST";
    parent "wecc240_psse_G_2609";
    latitude 34.15;
    longitude -118.3;
    generator ST;
    operating_capacity 300.9 MW;
    startup_cost 6500.0;
    shutdown_cost 0.0;
    fixed_cost 1000.0;
    variable_cost 5.0;
    scarcity_cost 0.001;
}

object pypower.gen
{
    name "wecc240_psse_G_2406";
    parent wecc240_psse_N_2406;
    Pmax 544.2 MW;
    Qmax 108.8 MW;
    Qmin -108.8 MW;
    status IN_SERVICE;
    object gencost
    {
        model POLYNOMIAL;
        startup 0.0 $;
        shutdown 0.0 $;
        costs "0.0,0.0,0.0";
    };
}
object pypower.powerplant
{
    // CALIFORNIA_INSTITUTE_OF_TECHNOLOGY: cap=13.0, cf=0.024, units=1
    // GLENARM: cap=265.6, cf=0.488, units=1
    name "wecc240_psse_G_2406_CC";
    parent "wecc240_psse_G_2406";
    latitude 34.15;
    longitude -118.2;
    generator CC;
    operating_capacity 278.6 MW;
    startup_cost 35.0;
    shutdown_cost 0.0;
    fixed_cost 500.0;
    variable_cost 50.0;
    scarcity_cost 0.001;
}

object pypower.powerplant
{
    // GLENARM: cap=265.6, cf=0.488, units=1
    name "wecc240_psse_G_2406_CT";
    parent "wecc240_psse_G_2406";
    latitude 34.15;
    longitude -118.2;
    generator CT;
    operating_capacity 265.6 MW;
    startup_cost 25.0;
    shutdown_cost 0.0;
    fixed_cost 350.0;
    variable_cost 75.0;
    scarcity_cost 0.001;
}

object pypower.gen
{
    name "wecc240_psse_G_2608";
    parent wecc240_psse_N_2608;
    Pmax 3339.8 MW;
    Qmax 668.0 MW;
    Qmin -668.0 MW;
    status IN_SERVICE;
    object gencost
    {
        model POLYNOMIAL;
        startup 0.0 $;
        shutdown 0.0 $;
        costs "0.0,0.0,0.0";
    };
}
object pypower.powerplant
{
    // PASTORIA_ENERGY_FACILITY_LLC: cap=779.0, cf=0.233, units=1
    name "wecc240_psse_G_2608_CC";
    parent "wecc240_psse_G_2608";
    latitude 34.59;
    longitude -118.7;
    generator CC;
    operating_capacity 779.0 MW;
    startup_cost 35.0;
    shutdown_cost 0.0;
    fixed_cost 500.0;
    variable_cost 50.0;
    scarcity_cost 0.001;
}

object pypower.powerplant
{
    // ALAMO: cap=19.6, cf=0.006, units=1
    // CASTAIC: cap=1682.0, cf=0.504, units=1
    // W_E_WARNE: cap=74.2, cf=0.022, units=1
    name "wecc240_psse_G_2608_HT";
    parent "wecc240_psse_G_2608";
    latitude 34.59;
    longitude -118.7;
    generator HT;
    operating_capacity 1775.8 MW;
    startup_cost 0.0;
    shutdown_cost 0.0;
    fixed_cost 200.0;
    variable_cost 0.0;
    scarcity_cost 0.001;
}

object pypower.powerplant
{
    // ALPINE_SOLAR: cap=66.0, cf=0.02, units=1
    // ASTORIA_1: cap=100.0, cf=0.03, units=1
    // ASTORIA_2: cap=75.0, cf=0.022, units=1
    // AV_SOLAR_RANCH_ONE: cap=253.0, cf=0.076, units=1
    // GARLAND: cap=185.0, cf=0.055, units=1
    // KINGBIRD_SOLAR_A: cap=20.0, cf=0.006, units=1
    // ORION_SOLAR_I: cap=12.0, cf=0.004, units=1
    // RE_GARLAND_A: cap=20.0, cf=0.006, units=1
    // ROSAMOND_W_2: cap=54.0, cf=0.016, units=1
    name "wecc240_psse_G_2608_PV";
    parent "wecc240_psse_G_2608";
    latitude 34.59;
    longitude -118.7;
    generator PV;
    operating_capacity 785.0 MW;
    startup_cost 0.0;
    shutdown_cost 0.0;
    fixed_cost 0.0;
    variable_cost 0.0;
    scarcity_cost 0.0;
}

object pypower.gen
{
    name "wecc240_psse_G_2902";
    parent wecc240_psse_N_2902;
    Pmax 5296.2 MW;
    Qmax 1059.2 MW;
    Qmin -1059.2 MW;
    status IN_SERVICE;
    object gencost
    {
        model POLYNOMIAL;
        startup 0.0 $;
        shutdown 0.0 $;
        costs "0.0,0.0,0.0";
    };
}
object pypower.powerplant
{
    // US_BORAX: cap=48.2, cf=0.009, units=1
    name "wecc240_psse_G_2902_CT";
    parent "wecc240_psse_G_2902";
    latitude 35.05;
    longitude -118.2;
    generator CT;
    operating_capacity 48.2 MW;
    startup_cost 25.0;
    shutdown_cost 0.0;
    fixed_cost 350.0;
    variable_cost 75.0;
    scarcity_cost 0.001;
}

object pypower.powerplant
{
    // ISABELLA_HYDRO_PROJECT: cap=11.8, cf=0.002, units=1
    // KERN_RIVER_3: cap=40.1, cf=0.008, units=1
    name "wecc240_psse_G_2902_HT";
    parent "wecc240_psse_G_2902";
    latitude 35.05;
    longitude -118.2;
    generator HT;
    operating_capacity 51.9 MW;
    startup_cost 0.0;
    shutdown_cost 0.0;
    fixed_cost 200.0;
    variable_cost 0.0;
    scarcity_cost 0.001;
}

object pypower.powerplant
{
    // ANTELOPE_VALLEY_I: cap=318.0, cf=0.06, units=1
    // BARREN_RIDGE_1: cap=60.0, cf=0.011, units=1
    // CATALINA_1_2: cap=110.0, cf=0.021, units=1
    // CATALINA_SOLAR_2_LLC: cap=18.0, cf=0.003, units=1
    // CATALINA_SOLAR_LLC: cap=110.0, cf=0.021, units=1
    // COLUMBIA_3: cap=10.0, cf=0.002, units=1
    // HECATE_ENERGY_BEACON_SOLAR_3: cap=56.0, cf=0.011, units=1
    // HECATE_ENERGY_BEACON_SOLAR_4: cap=50.0, cf=0.009, units=1
    // KINGBIRD_SOLAR_B: cap=20.0, cf=0.004, units=1
    // NAVAL_AIR_WEAPONS_STATION_CHINA_LAKE: cap=11.1, cf=0.002, units=1
    // RE_CAMELOT_LLC: cap=45.0, cf=0.008, units=1
    // RE_COLUMBIA_TWO_LLC: cap=15.0, cf=0.003, units=1
    // ROSAMOND_ONE: cap=20.0, cf=0.004, units=1
    // ROSAMOND_TWO: cap=20.0, cf=0.004, units=1
    // ROSAMOND_W_1: cap=54.0, cf=0.01, units=1
    // SEPV_MOJAVE_W: cap=20.0, cf=0.004, units=1
    // SOLAR_STAR_1: cap=318.0, cf=0.06, units=1
    // SOLAR_STAR_2: cap=279.0, cf=0.053, units=1
    // SPRINGBOK_1: cap=105.0, cf=0.02, units=1
    // SPRINGBOK_2: cap=155.0, cf=0.029, units=1
    name "wecc240_psse_G_2902_PV";
    parent "wecc240_psse_G_2902";
    latitude 35.05;
    longitude -118.2;
    generator PV;
    operating_capacity 1794.1 MW;
    startup_cost 0.0;
    shutdown_cost 0.0;
    fixed_cost 0.0;
    variable_cost 0.0;
    scarcity_cost 0.0;
}

object pypower.powerplant
{
    // ARGUS_COGEN_PLANT: cap=62.5, cf=0.012, units=1
    // COSO_ENERGY_DEVELOPERS: cap=90.0, cf=0.017, units=1
    // COSO_FINANCE_PARTNERS: cap=92.2, cf=0.017, units=1
    // COSO_POWER_DEVELOPERS: cap=90.0, cf=0.017, units=1
    name "wecc240_psse_G_2902_ST";
    parent "wecc240_psse_G_2902";
    latitude 35.05;
    longitude -118.2;
    generator ST;
    operating_capacity 334.7 MW;
    startup_cost 6500.0;
    shutdown_cost 0.0;
    fixed_cost 1000.0;
    variable_cost 5.0;
    scarcity_cost 0.001;
}

object pypower.powerplant
{
    // ALTA_WIND_ENERGY_CENTER_I: cap=150.0, cf=0.028, units=1
    // ALTA_WIND_ENERGY_CENTER_II: cap=150.0, cf=0.028, units=1
    // ALTA_WIND_ENERGY_CENTER_III: cap=150.0, cf=0.028, units=1
    // ALTA_WIND_ENERGY_CENTER_IV: cap=102.0, cf=0.019, units=1
    // ALTA_WIND_ENERGY_CENTER_V: cap=168.0, cf=0.032, units=1
    // ALTA_WIND_VIII: cap=150.0, cf=0.028, units=1
    // ALTA_WIND_X: cap=138.0, cf=0.026, units=1
    // ALTA_WIND_XI: cap=90.0, cf=0.017, units=1
    // BROOKFIELD_TEHACHAPI_1: cap=102.0, cf=0.019, units=1
    // CAMERON_RIDGE_LLC: cap=59.6, cf=0.011, units=1
    // MANZANA_WIND_LLC: cap=189.0, cf=0.036, units=1
    // MOJAVE_16: cap=30.0, cf=0.006, units=1
    // MOJAVE_17: cap=25.0, cf=0.005, units=1
    // MOJAVE_18: cap=30.0, cf=0.006, units=1
    // MOJAVE_3: cap=23.5, cf=0.004, units=1
    // MOJAVE_4: cap=29.0, cf=0.005, units=1
    // MOJAVE_5: cap=22.5, cf=0.004, units=1
    // MUSTANG_HILLS_LLC: cap=150.0, cf=0.028, units=1
    // NORTH_SKY_RIVER_ENERGY_LLC: cap=162.0, cf=0.031, units=1
    // OAK_CREEK_ENERGY_SYSTEMS_I: cap=34.5, cf=0.007, units=1
    // OASIS_WIND: cap=60.0, cf=0.011, units=1
    // PACIFIC_WIND_LLC: cap=151.7, cf=0.029, units=1
    // PINE_TREE_WIND_POWER_PROJECT: cap=135.0, cf=0.025, units=1
    // PINYON_PINE_I: cap=168.0, cf=0.032, units=1
    // PINYON_PINE_II: cap=132.0, cf=0.025, units=1
    // RIDGETOP: cap=46.8, cf=0.009, units=1
    // RIDGETOP_ENERGY_LLC: cap=29.0, cf=0.005, units=1
    // RISING_TREE_WIND_FARM: cap=79.2, cf=0.015, units=1
    // RISING_TREE_WIND_FARM_II: cap=19.8, cf=0.004, units=1
    // RISING_TREE_WIND_FARM_III: cap=99.0, cf=0.019, units=1
    // TEHACHAPI_WIND_RESOURCE_II: cap=21.9, cf=0.004, units=1
    // TPC_WINDFARMS_LLC: cap=28.7, cf=0.005, units=1
    // VICTORY_GARDEN_TEHACHAPI: cap=21.1, cf=0.004, units=1
    // WINDSTAR_1: cap=120.0, cf=0.023, units=1
    name "wecc240_psse_G_2902_WT";
    parent "wecc240_psse_G_2902";
    latitude 35.05;
    longitude -118.2;
    generator WT;
    operating_capacity 3067.3 MW;
    startup_cost 0.0;
    shutdown_cost 0.0;
    fixed_cost 0.0;
    variable_cost 0.0;
    scarcity_cost 0.0;
}

object pypower.gen
{
    name "wecc240_psse_G_3801";
    parent wecc240_psse_N_3801;
    Pmax 2345.5 MW;
    Qmax 469.1 MW;
    Qmin -469.1 MW;
    status IN_SERVICE;
    object gencost
    {
        model POLYNOMIAL;
        startup 0.0 $;
        shutdown 0.0 $;
        costs "0.0,0.0,0.0";
    };
}
object pypower.powerplant
{
    // VANDENBERG_SOLAR_PROJECT: cap=22.5, cf=0.01, units=1
    name "wecc240_psse_G_3801_PV";
    parent "wecc240_psse_G_3801";
    latitude 35.23;
    longitude -120.9;
    generator PV;
    operating_capacity 22.5 MW;
    startup_cost 0.0;
    shutdown_cost 0.0;
    fixed_cost 0.0;
    variable_cost 0.0;
    scarcity_cost 0.0;
}

object pypower.powerplant
{
    // DIABLO_CANYON: cap=2323.0, cf=0.99, units=1
    name "wecc240_psse_G_3801_ST";
    parent "wecc240_psse_G_3801";
    latitude 35.23;
    longitude -120.9;
    generator ST;
    operating_capacity 2323.0 MW;
    startup_cost 6500.0;
    shutdown_cost 0.0;
    fixed_cost 1000.0;
    variable_cost 5.0;
    scarcity_cost 0.001;
}

object pypower.gen
{
    name "wecc240_psse_G_3806";
    parent wecc240_psse_N_3806;
    Pmax 168.9 MW;
    Qmax 33.8 MW;
    Qmin -33.8 MW;
    status IN_SERVICE;
    object gencost
    {
        model POLYNOMIAL;
        startup 0.0 $;
        shutdown 0.0 $;
        costs "0.0,0.0,0.0";
    };
}
object pypower.powerplant
{
    // SALINAS_RIVER_COGENERATION: cap=38.9, cf=0.23, units=1
    name "wecc240_psse_G_3806_CT";
    parent "wecc240_psse_G_3806";
    latitude 35.38;
    longitude -120.9;
    generator CT;
    operating_capacity 38.9 MW;
    startup_cost 25.0;
    shutdown_cost 0.0;
    fixed_cost 350.0;
    variable_cost 75.0;
    scarcity_cost 0.001;
}

object pypower.powerplant
{
    // CA_FLATS_SOLAR_130_LLC: cap=130.0, cf=0.77, units=1
    name "wecc240_psse_G_3806_PV";
    parent "wecc240_psse_G_3806";
    latitude 35.38;
    longitude -120.9;
    generator PV;
    operating_capacity 130.0 MW;
    startup_cost 0.0;
    shutdown_cost 0.0;
    fixed_cost 0.0;
    variable_cost 0.0;
    scarcity_cost 0.0;
}

object pypower.gen
{
    name "wecc240_psse_G_3802";
    parent wecc240_psse_N_3802;
    Pmax 1112.6 MW;
    Qmax 222.5 MW;
    Qmin -222.5 MW;
    status IN_SERVICE;
    object gencost
    {
        model POLYNOMIAL;
        startup 0.0 $;
        shutdown 0.0 $;
        costs "0.0,0.0,0.0";
    };
}
object pypower.powerplant
{
    // COALINGA_25D_COGEN: cap=13.6, cf=0.012, units=1
    // HENRIETTA_PEAKER: cap=98.0, cf=0.088, units=1
    name "wecc240_psse_G_3802_CT";
    parent "wecc240_psse_G_3802";
    latitude 36.14;
    longitude -120.1;
    generator CT;
    operating_capacity 111.6 MW;
    startup_cost 25.0;
    shutdown_cost 0.0;
    fixed_cost 350.0;
    variable_cost 75.0;
    scarcity_cost 0.001;
}

object pypower.powerplant
{
    // CORONAL_LOST_HILLS: cap=20.0, cf=0.018, units=1
    // FIVE_POINTS_1: cap=60.0, cf=0.054, units=1
    // FIVE_POINTS_SOLAR_STATION_2: cap=15.0, cf=0.013, units=1
    // GATES_SOLAR_STATION: cap=20.0, cf=0.018, units=1
    // HENRIETTA_SOLAR: cap=102.0, cf=0.092, units=1
    // HENRIETTA_SOLAR_PROJECT: cap=102.0, cf=0.092, units=1
    // HURON: cap=20.0, cf=0.018, units=1
    // HURON_SOLAR_STATION: cap=20.0, cf=0.018, units=1
    // KANSAS: cap=20.0, cf=0.018, units=1
    // KENT_SOUTH: cap=20.0, cf=0.018, units=1
    // KETTLEMAN_SOLAR_-CENTAURUS: cap=20.0, cf=0.018, units=1
    // NEXTERA_WESTSIDE_PV: cap=20.0, cf=0.018, units=1
    // RE_KANSAS_SOLAR_LLC: cap=20.0, cf=0.018, units=1
    // RE_KANSAS_SOUTH_LLC: cap=20.0, cf=0.018, units=1
    // RE_KENT_SOUTH_LLC: cap=20.0, cf=0.018, units=1
    // RE_MUSTANG: cap=100.0, cf=0.09, units=1
    // RE_MUSTANG_3: cap=100.0, cf=0.09, units=1
    // RE_MUSTANG_4: cap=100.0, cf=0.09, units=1
    // RE_MUSTANG_LLC: cap=100.0, cf=0.09, units=1
    // SAND_DRAG_LLC: cap=19.0, cf=0.017, units=1
    // SUN_CITY_PROJECT_LLC: cap=20.0, cf=0.018, units=1
    // WESTLANDS_SOLAR_PV_FARM: cap=18.0, cf=0.016, units=1
    // WESTSIDE_SOLAR_STATION: cap=15.0, cf=0.013, units=1
    // WEST_GATES_SOLAR_STATION: cap=10.0, cf=0.009, units=1
    // WHITNEY_POINT_SOLAR: cap=20.0, cf=0.018, units=1
    name "wecc240_psse_G_3802_PV";
    parent "wecc240_psse_G_3802";
    latitude 36.14;
    longitude -120.1;
    generator PV;
    operating_capacity 1001.0 MW;
    startup_cost 0.0;
    shutdown_cost 0.0;
    fixed_cost 0.0;
    variable_cost 0.0;
    scarcity_cost 0.0;
}

object pypower.gen
{
    name "wecc240_psse_G_3803";
    parent wecc240_psse_N_3803;
    Pmax 6817.8 MW;
    Qmax 1363.6 MW;
    Qmin -1363.6 MW;
    status IN_SERVICE;
    object gencost
    {
        model POLYNOMIAL;
        startup 0.0 $;
        shutdown 0.0 $;
        costs "0.0,0.0,0.0";
    };
}
object pypower.powerplant
{
    // ELK_HILLS_POWER_LLC: cap=623.0, cf=0.091, units=1
    // LA_PALOMA_GENERATING_LLC: cap=1200.0, cf=0.176, units=1
    // SUNRISE_POWER_LLC: cap=605.4, cf=0.089, units=1
    // WESTERN_POWER_STEAM_INC: cap=27.7, cf=0.004, units=1
    name "wecc240_psse_G_3803_CC";
    parent "wecc240_psse_G_3803";
    latitude 35.41;
    longitude -119.5;
    generator CC;
    operating_capacity 2456.1 MW;
    startup_cost 35.0;
    shutdown_cost 0.0;
    fixed_cost 500.0;
    variable_cost 50.0;
    scarcity_cost 0.001;
}

object pypower.powerplant
{
    // BADGER_CREEK_LIMITED: cap=46.0, cf=0.007, units=1
    // BEAR_MOUNTAIN_COGEN: cap=46.0, cf=0.007, units=1
    // BERRY_COGEN: cap=38.7, cf=0.006, units=1
    // BERRY_COGEN_TANNE_HILLS_18: cap=17.6, cf=0.003, units=1
    // CHALK_CLIFF_COGEN: cap=46.0, cf=0.007, units=1
    // CYMRIC_36W_COGEN: cap=12.4, cf=0.002, units=1
    // DOUBLE_C: cap=49.8, cf=0.007, units=1
    // ELLWOOD: cap=58.0, cf=0.009, units=1
    // HIGH_SIERRA: cap=49.8, cf=0.007, units=1
    // KERN_FRONT: cap=49.8, cf=0.007, units=1
    // KERN_RIVER_COGENERATION: cap=300.0, cf=0.044, units=1
    // KERN_RIVER_EASTRIDGE_COGEN: cap=48.8, cf=0.007, units=1
    // LIVE_OAK_COGEN: cap=46.0, cf=0.007, units=1
    // LOST_HILLS_COGENERATION_PLANT: cap=10.5, cf=0.002, units=1
    // MCKITTRICK_COGEN: cap=12.0, cf=0.002, units=1
    // MCKITTRICK_COGEN_FACILITY: cap=46.0, cf=0.007, units=1
    // MIDWAY_SUNSET_COGEN: cap=234.0, cf=0.034, units=1
    // SOUTHEAST_KERN_RIVER_COGEN: cap=30.8, cf=0.005, units=1
    // SOUTH_BELRIDGE_COGENERATION_FACILITY: cap=94.2, cf=0.014, units=1
    // SYCAMORE_COGENERATION: cap=300.0, cf=0.044, units=1
    // TAFT_26C_COGEN: cap=12.4, cf=0.002, units=1
    // WELLHEAD_POWER_DELANO_LLC: cap=48.5, cf=0.007, units=1
    // WESTERN_POWER_STEAM_INC: cap=27.7, cf=0.004, units=1
    name "wecc240_psse_G_3803_CT";
    parent "wecc240_psse_G_3803";
    latitude 35.41;
    longitude -119.5;
    generator CT;
    operating_capacity 1625.0 MW;
    startup_cost 25.0;
    shutdown_cost 0.0;
    fixed_cost 350.0;
    variable_cost 75.0;
    scarcity_cost 0.001;
}

object pypower.powerplant
{
    // KERN_RIVER_1: cap=26.4, cf=0.004, units=1
    name "wecc240_psse_G_3803_HT";
    parent "wecc240_psse_G_3803";
    latitude 35.41;
    longitude -119.5;
    generator HT;
    operating_capacity 26.4 MW;
    startup_cost 0.0;
    shutdown_cost 0.0;
    fixed_cost 200.0;
    variable_cost 0.0;
    scarcity_cost 0.001;
}

object pypower.powerplant
{
    // ADOBE: cap=20.0, cf=0.003, units=1
    // ALGONQUIN_SKIC20_SOLAR_LLC: cap=20.0, cf=0.003, units=1
    // ALGONQUIN_SKIC_10_SOLAR_LLC: cap=10.0, cf=0.001, units=1
    // ALPAUGH_50: cap=50.0, cf=0.007, units=1
    // ALPAUGH_NORTH: cap=20.0, cf=0.003, units=1
    // ATWELL_ISLAND: cap=20.2, cf=0.003, units=1
    // ATWELL_ISLAND_SOLAR: cap=20.2, cf=0.003, units=1
    // ATWELL_ISLAND_WEST_SOLAR: cap=20.0, cf=0.003, units=1
    // BLACKWELL: cap=32.0, cf=0.005, units=1
    // CALIFORNIA_VALLEY_SOLAR_RANCH: cap=249.8, cf=0.037, units=1
    // CA_VALLEY: cap=249.8, cf=0.037, units=1
    // CED_WHITE_RIVER: cap=20.0, cf=0.003, units=1
    // CUYAMA_SOLAR_LLC: cap=40.0, cf=0.006, units=1
    // DUCOR_1: cap=20.0, cf=0.003, units=1
    // DUCOR_2: cap=20.0, cf=0.003, units=1
    // DUCOR_3: cap=15.0, cf=0.002, units=1
    // DUCOR_4: cap=20.0, cf=0.003, units=1
    // GOOSE_LAKE_SOLAR: cap=12.0, cf=0.002, units=1
    // HAYWORTH_SOLAR: cap=27.0, cf=0.004, units=1
    // HAYWORTH_SOLAR_2: cap=27.0, cf=0.004, units=1
    // LOST_HILLS: cap=32.0, cf=0.005, units=1
    // MARICOPA_WEST: cap=20.0, cf=0.003, units=1
    // MORELOS: cap=15.0, cf=0.002, units=1
    // NICOLIS: cap=20.0, cf=0.003, units=1
    // PIONEER_GREEN_ENERGY: cap=20.0, cf=0.003, units=1
    // PUMPJACK_SOLAR_I: cap=20.0, cf=0.003, units=1
    // REDCREST_SOLAR: cap=16.6, cf=0.002, units=1
    // REDCREST_SOLAR_FARM: cap=16.6, cf=0.002, units=1
    // REDWOOD_4_SOLAR_FARM: cap=20.0, cf=0.003, units=1
    // REGULUS: cap=60.0, cf=0.009, units=1
    // REGULUS_SOLAR_PROJECT: cap=60.0, cf=0.009, units=1
    // RE_OLD_RIVER_ONE_LLC: cap=20.0, cf=0.003, units=1
    // RIO_BRAVO_1: cap=20.0, cf=0.003, units=1
    // RIO_BRAVO_2: cap=20.0, cf=0.003, units=1
    // RIO_BRAVO_SOLAR_1_LLC: cap=20.0, cf=0.003, units=1
    // RIO_BRAVO_SOLAR_II_LLC: cap=20.0, cf=0.003, units=1
    // SHAFTER: cap=20.0, cf=0.003, units=1
    // SHAFTER_SOLAR_LLC: cap=20.0, cf=0.003, units=1
    // SKIC_SOLAR: cap=20.0, cf=0.003, units=1
    // TOPAZ: cap=585.9, cf=0.086, units=1
    // TOPAZ_SOLAR_FARM: cap=585.9, cf=0.086, units=1
    // TROPICO: cap=14.0, cf=0.002, units=1
    // WHITE_RIVER_SOLAR: cap=20.0, cf=0.003, units=1
    // WHITE_RIVER_SOLAR_2: cap=19.8, cf=0.003, units=1
    // WILDWOOD_SOLAR_I_LLC: cap=19.5, cf=0.003, units=1
    // WOODMERE_SOLAR_FARM: cap=15.0, cf=0.002, units=1
    // WOODMERE_SOLAR_FARM_2: cap=15.0, cf=0.002, units=1
    name "wecc240_psse_G_3803_PV";
    parent "wecc240_psse_G_3803";
    latitude 35.41;
    longitude -119.5;
    generator PV;
    operating_capacity 2648.3 MW;
    startup_cost 0.0;
    shutdown_cost 0.0;
    fixed_cost 0.0;
    variable_cost 0.0;
    scarcity_cost 0.0;
}

object pypower.powerplant
{
    // MT_POSO_COGENERATION: cap=62.0, cf=0.009, units=1
    name "wecc240_psse_G_3803_ST";
    parent "wecc240_psse_G_3803";
    latitude 35.41;
    longitude -119.5;
    generator ST;
    operating_capacity 62.0 MW;
    startup_cost 6500.0;
    shutdown_cost 0.0;
    fixed_cost 1000.0;
    variable_cost 5.0;
    scarcity_cost 0.001;
}

object pypower.gen
{
    name "wecc240_psse_G_3105";
    parent wecc240_psse_N_3105;
    Pmax 13.4 MW;
    Qmax 2.7 MW;
    Qmin -2.7 MW;
    status IN_SERVICE;
    object gencost
    {
        model POLYNOMIAL;
        startup 0.0 $;
        shutdown 0.0 $;
        costs "0.0,0.0,0.0";
    };
}
object pypower.powerplant
{
    // PARNASSUS_CENTRAL_UTILITY_PLANT: cap=13.4, cf=1.0, units=1
    name "wecc240_psse_G_3105_CC";
    parent "wecc240_psse_G_3105";
    latitude 37.76;
    longitude -122.4;
    generator CC;
    operating_capacity 13.4 MW;
    startup_cost 35.0;
    shutdown_cost 0.0;
    fixed_cost 500.0;
    variable_cost 50.0;
    scarcity_cost 0.001;
}

object pypower.gen
{
    name "wecc240_psse_G_3101";
    parent wecc240_psse_N_3101;
    Pmax 600.0 MW;
    Qmax 120.0 MW;
    Qmin -120.0 MW;
    status IN_SERVICE;
    object gencost
    {
        model POLYNOMIAL;
        startup 0.0 $;
        shutdown 0.0 $;
        costs "0.0,0.0,0.0";
    };
}
object pypower.powerplant
{
    // RICHMOND_COGEN: cap=155.6, cf=0.259, units=1
    name "wecc240_psse_G_3101_CC";
    parent "wecc240_psse_G_3101";
    latitude 37.79;
    longitude -122.4;
    generator CC;
    operating_capacity 155.6 MW;
    startup_cost 35.0;
    shutdown_cost 0.0;
    fixed_cost 500.0;
    variable_cost 50.0;
    scarcity_cost 0.001;
}

object pypower.powerplant
{
    // ALAMEDA: cap=54.8, cf=0.091, units=1
    name "wecc240_psse_G_3101_CT";
    parent "wecc240_psse_G_3101";
    latitude 37.79;
    longitude -122.4;
    generator CT;
    operating_capacity 54.8 MW;
    startup_cost 25.0;
    shutdown_cost 0.0;
    fixed_cost 350.0;
    variable_cost 75.0;
    scarcity_cost 0.001;
}

object pypower.powerplant
{
    // MARIN_CLEAN_ENERGY_SOLAR_ONE: cap=10.5, cf=0.018, units=1
    name "wecc240_psse_G_3101_PV";
    parent "wecc240_psse_G_3101";
    latitude 37.79;
    longitude -122.4;
    generator PV;
    operating_capacity 10.5 MW;
    startup_cost 0.0;
    shutdown_cost 0.0;
    fixed_cost 0.0;
    variable_cost 0.0;
    scarcity_cost 0.0;
}

object pypower.powerplant
{
    // DYNEGY_OAKLAND_POWER_PLANT: cap=223.5, cf=0.372, units=1
    // RICHMOND_COGEN: cap=155.6, cf=0.259, units=1
    name "wecc240_psse_G_3101_ST";
    parent "wecc240_psse_G_3101";
    latitude 37.79;
    longitude -122.4;
    generator ST;
    operating_capacity 379.1 MW;
    startup_cost 6500.0;
    shutdown_cost 0.0;
    fixed_cost 1000.0;
    variable_cost 5.0;
    scarcity_cost 0.001;
}

object pypower.gen
{
    name "wecc240_psse_G_3902";
    parent wecc240_psse_N_3902;
    Pmax 2976.5 MW;
    Qmax 595.3 MW;
    Qmin -595.3 MW;
    status IN_SERVICE;
    object gencost
    {
        model POLYNOMIAL;
        startup 0.0 $;
        shutdown 0.0 $;
        costs "0.0,0.0,0.0";
    };
}
object pypower.powerplant
{
    // DYNEGY_MOSS_LANDING_POWER_PLANT: cap=1398.0, cf=0.47, units=1
    // KING_CITY_POWER_PLANT: cap=133.2, cf=0.045, units=1
    name "wecc240_psse_G_3902_CC";
    parent "wecc240_psse_G_3902";
    latitude 36.74;
    longitude -121.7;
    generator CC;
    operating_capacity 1531.2 MW;
    startup_cost 35.0;
    shutdown_cost 0.0;
    fixed_cost 500.0;
    variable_cost 50.0;
    scarcity_cost 0.001;
}

object pypower.powerplant
{
    // KING_CITY_PEAKING: cap=47.3, cf=0.016, units=1
    name "wecc240_psse_G_3902_CT";
    parent "wecc240_psse_G_3902";
    latitude 36.74;
    longitude -121.7;
    generator CT;
    operating_capacity 47.3 MW;
    startup_cost 25.0;
    shutdown_cost 0.0;
    fixed_cost 350.0;
    variable_cost 75.0;
    scarcity_cost 0.001;
}

object pypower.powerplant
{
    // DYNEGY_MOSS_LANDING_POWER_PLANT: cap=1398.0, cf=0.47, units=1
    name "wecc240_psse_G_3902_ST";
    parent "wecc240_psse_G_3902";
    latitude 36.74;
    longitude -121.7;
    generator ST;
    operating_capacity 1398.0 MW;
    startup_cost 6500.0;
    shutdown_cost 0.0;
    fixed_cost 1000.0;
    variable_cost 5.0;
    scarcity_cost 0.001;
}

object pypower.gen
{
    name "wecc240_psse_G_3301";
    parent wecc240_psse_N_3301;
    Pmax 900.0 MW;
    Qmax 180.0 MW;
    Qmin -180.0 MW;
    status IN_SERVICE;
    object gencost
    {
        model POLYNOMIAL;
        startup 0.0 $;
        shutdown 0.0 $;
        costs "0.0,0.0,0.0";
    };
}
object pypower.powerplant
{
    // GILROY_POWER_PLANT: cap=130.0, cf=0.144, units=1
    // METCALF_ENERGY_CENTER: cap=635.0, cf=0.706, units=1
    name "wecc240_psse_G_3301_CC";
    parent "wecc240_psse_G_3301";
    latitude 37.22;
    longitude -121.7;
    generator CC;
    operating_capacity 765.0 MW;
    startup_cost 35.0;
    shutdown_cost 0.0;
    fixed_cost 500.0;
    variable_cost 50.0;
    scarcity_cost 0.001;
}

object pypower.powerplant
{
    // GILROY_PEAKING_ENERGY_CENTER: cap=135.0, cf=0.15, units=1
    name "wecc240_psse_G_3301_CT";
    parent "wecc240_psse_G_3301";
    latitude 37.22;
    longitude -121.7;
    generator CT;
    operating_capacity 135.0 MW;
    startup_cost 25.0;
    shutdown_cost 0.0;
    fixed_cost 350.0;
    variable_cost 75.0;
    scarcity_cost 0.001;
}

object pypower.gen
{
    name "wecc240_psse_G_3901";
    parent wecc240_psse_N_3901;
    Pmax 1097.0 MW;
    Qmax 219.4 MW;
    Qmin -219.4 MW;
    status IN_SERVICE;
    object gencost
    {
        model POLYNOMIAL;
        startup 0.0 $;
        shutdown 0.0 $;
        costs "0.0,0.0,0.0";
    };
}
object pypower.powerplant
{
    // WALNUT_ENERGY_CENTER: cap=300.6, cf=0.274, units=1
    name "wecc240_psse_G_3901_CC";
    parent "wecc240_psse_G_3901";
    latitude 37.05;
    longitude -121.0;
    generator CC;
    operating_capacity 300.6 MW;
    startup_cost 35.0;
    shutdown_cost 0.0;
    fixed_cost 500.0;
    variable_cost 50.0;
    scarcity_cost 0.001;
}

object pypower.powerplant
{
    // COVANTA_STANISLAUS_ENERGY: cap=24.0, cf=0.022, units=1
    // WALNUT: cap=49.8, cf=0.045, units=1
    name "wecc240_psse_G_3901_CT";
    parent "wecc240_psse_G_3901";
    latitude 37.05;
    longitude -121.0;
    generator CT;
    operating_capacity 73.8 MW;
    startup_cost 25.0;
    shutdown_cost 0.0;
    fixed_cost 350.0;
    variable_cost 75.0;
    scarcity_cost 0.001;
}

object pypower.powerplant
{
    // ONEILL: cap=25.2, cf=0.023, units=1
    // W_R_GIANELLI: cap=424.0, cf=0.387, units=1
    name "wecc240_psse_G_3901_HT";
    parent "wecc240_psse_G_3901";
    latitude 37.05;
    longitude -121.0;
    generator HT;
    operating_capacity 449.2 MW;
    startup_cost 0.0;
    shutdown_cost 0.0;
    fixed_cost 200.0;
    variable_cost 0.0;
    scarcity_cost 0.001;
}

object pypower.powerplant
{
    // FRONTIER_SOLAR_LLC: cap=20.0, cf=0.018, units=1
    // QUINTO: cap=108.0, cf=0.098, units=1
    // QUINTO_SOLAR_PV_PROJECT: cap=108.0, cf=0.098, units=1
    // VEGA_SOLAR: cap=20.0, cf=0.018, units=1
    name "wecc240_psse_G_3901_PV";
    parent "wecc240_psse_G_3901";
    latitude 37.05;
    longitude -121.0;
    generator PV;
    operating_capacity 256.0 MW;
    startup_cost 0.0;
    shutdown_cost 0.0;
    fixed_cost 0.0;
    variable_cost 0.0;
    scarcity_cost 0.0;
}

object pypower.powerplant
{
    // DINOSAUR_POINT: cap=17.4, cf=0.016, units=1
    name "wecc240_psse_G_3901_WT";
    parent "wecc240_psse_G_3901";
    latitude 37.05;
    longitude -121.0;
    generator WT;
    operating_capacity 17.4 MW;
    startup_cost 0.0;
    shutdown_cost 0.0;
    fixed_cost 0.0;
    variable_cost 0.0;
    scarcity_cost 0.0;
}

object pypower.gen
{
    name "wecc240_psse_G_3304";
    parent wecc240_psse_N_3304;
    Pmax 41.4 MW;
    Qmax 8.3 MW;
    Qmin -8.3 MW;
    status IN_SERVICE;
    object gencost
    {
        model POLYNOMIAL;
        startup 0.0 $;
        shutdown 0.0 $;
        costs "0.0,0.0,0.0";
    };
}
object pypower.powerplant
{
    // JEFFERSON_SMURFIT_SANTA_CLARA_MILL: cap=27.0, cf=0.652, units=1
    name "wecc240_psse_G_3304_CC";
    parent "wecc240_psse_G_3304";
    latitude 37.32;
    longitude -122.1;
    generator CC;
    operating_capacity 27.0 MW;
    startup_cost 35.0;
    shutdown_cost 0.0;
    fixed_cost 500.0;
    variable_cost 50.0;
    scarcity_cost 0.001;
}

object pypower.powerplant
{
    // APPLE_CAMPUS_2_PV: cap=14.4, cf=0.348, units=1
    name "wecc240_psse_G_3304_PV";
    parent "wecc240_psse_G_3304";
    latitude 37.32;
    longitude -122.1;
    generator PV;
    operating_capacity 14.4 MW;
    startup_cost 0.0;
    shutdown_cost 0.0;
    fixed_cost 0.0;
    variable_cost 0.0;
    scarcity_cost 0.0;
}

object pypower.gen
{
    name "wecc240_psse_G_3103";
    parent wecc240_psse_N_3103;
    Pmax 11.4 MW;
    Qmax 2.3 MW;
    Qmin -2.3 MW;
    status IN_SERVICE;
    object gencost
    {
        model POLYNOMIAL;
        startup 0.0 $;
        shutdown 0.0 $;
        costs "0.0,0.0,0.0";
    };
}
object pypower.powerplant
{
    // AMERESCO_OX_MOUNTAIN: cap=11.4, cf=1.0, units=1
    name "wecc240_psse_G_3103_CT";
    parent "wecc240_psse_G_3103";
    latitude 37.58;
    longitude -122.3;
    generator CT;
    operating_capacity 11.4 MW;
    startup_cost 25.0;
    shutdown_cost 0.0;
    fixed_cost 350.0;
    variable_cost 75.0;
    scarcity_cost 0.001;
}

object pypower.gen
{
    name "wecc240_psse_G_3305";
    parent wecc240_psse_N_3305;
    Pmax 655.0 MW;
    Qmax 131.0 MW;
    Qmin -131.0 MW;
    status IN_SERVICE;
    object gencost
    {
        model POLYNOMIAL;
        startup 0.0 $;
        shutdown 0.0 $;
        costs "0.0,0.0,0.0";
    };
}
object pypower.powerplant
{
    // RUSSELL_CITY_ENERGY_CENTER: cap=655.0, cf=1.0, units=1
    name "wecc240_psse_G_3305_CC";
    parent "wecc240_psse_G_3305";
    latitude 37.49;
    longitude -122.1;
    generator CC;
    operating_capacity 655.0 MW;
    startup_cost 35.0;
    shutdown_cost 0.0;
    fixed_cost 500.0;
    variable_cost 50.0;
    scarcity_cost 0.001;
}

object pypower.gen
{
    name "wecc240_psse_G_3203";
    parent wecc240_psse_N_3203;
    Pmax 578.7 MW;
    Qmax 115.7 MW;
    Qmin -115.7 MW;
    status IN_SERVICE;
    object gencost
    {
        model POLYNOMIAL;
        startup 0.0 $;
        shutdown 0.0 $;
        costs "0.0,0.0,0.0";
    };
}
object pypower.powerplant
{
    // AGNEWS_POWER_PLANT: cap=32.0, cf=0.055, units=1
    // DONALD_VON_RAESFELD_POWER_PLANT: cap=154.0, cf=0.266, units=1
    // LOS_ESTEROS_CRITICAL_ENERGY_CENTER: cap=306.1, cf=0.529, units=1
    name "wecc240_psse_G_3203_CC";
    parent "wecc240_psse_G_3203";
    latitude 37.5;
    longitude -122.0;
    generator CC;
    operating_capacity 492.1 MW;
    startup_cost 35.0;
    shutdown_cost 0.0;
    fixed_cost 500.0;
    variable_cost 50.0;
    scarcity_cost 0.001;
}

object pypower.powerplant
{
    // GIANERA: cap=64.6, cf=0.112, units=1
    name "wecc240_psse_G_3203_CT";
    parent "wecc240_psse_G_3203";
    latitude 37.5;
    longitude -122.0;
    generator CT;
    operating_capacity 64.6 MW;
    startup_cost 25.0;
    shutdown_cost 0.0;
    fixed_cost 350.0;
    variable_cost 75.0;
    scarcity_cost 0.001;
}

object pypower.powerplant
{
    // SJ_SC_WPCP: cap=11.0, cf=0.019, units=1
    name "wecc240_psse_G_3203_IC";
    parent "wecc240_psse_G_3203";
    latitude 37.5;
    longitude -122.0;
    generator IC;
    operating_capacity 11.0 MW;
    startup_cost 0.0;
    shutdown_cost 0.0;
    fixed_cost 0.0;
    variable_cost 50.0;
    scarcity_cost 0.001;
}

object pypower.powerplant
{
    // SJ_SC_WPCP: cap=11.0, cf=0.019, units=1
    name "wecc240_psse_G_3203_ST";
    parent "wecc240_psse_G_3203";
    latitude 37.5;
    longitude -122.0;
    generator ST;
    operating_capacity 11.0 MW;
    startup_cost 6500.0;
    shutdown_cost 0.0;
    fixed_cost 1000.0;
    variable_cost 5.0;
    scarcity_cost 0.001;
}

object pypower.gen
{
    name "wecc240_psse_G_3205";
    parent wecc240_psse_N_3205;
    Pmax 358.1 MW;
    Qmax 71.6 MW;
    Qmin -71.6 MW;
    status IN_SERVICE;
    object gencost
    {
        model POLYNOMIAL;
        startup 0.0 $;
        shutdown 0.0 $;
        costs "0.0,0.0,0.0";
    };
}
object pypower.powerplant
{
    // CROCKETT_COGEN_PROJECT: cap=247.4, cf=0.691, units=1
    // PE_BERKELEY: cap=28.5, cf=0.08, units=1
    name "wecc240_psse_G_3205_CC";
    parent "wecc240_psse_G_3205";
    latitude 37.91;
    longitude -122.2;
    generator CC;
    operating_capacity 275.9 MW;
    startup_cost 35.0;
    shutdown_cost 0.0;
    fixed_cost 500.0;
    variable_cost 50.0;
    scarcity_cost 0.001;
}

object pypower.powerplant
{
    // PHILLIPS_66_CARBON_PLANT: cap=27.3, cf=0.076, units=1
    // PHILLIPS_66_RODEO_REFINERY: cap=54.9, cf=0.153, units=1
    name "wecc240_psse_G_3205_ST";
    parent "wecc240_psse_G_3205";
    latitude 37.91;
    longitude -122.2;
    generator ST;
    operating_capacity 82.2 MW;
    startup_cost 6500.0;
    shutdown_cost 0.0;
    fixed_cost 1000.0;
    variable_cost 5.0;
    scarcity_cost 0.001;
}

object pypower.gen
{
    name "wecc240_psse_G_3903";
    parent wecc240_psse_N_3903;
    Pmax 801.8 MW;
    Qmax 160.4 MW;
    Qmin -160.4 MW;
    status IN_SERVICE;
    object gencost
    {
        model POLYNOMIAL;
        startup 0.0 $;
        shutdown 0.0 $;
        costs "0.0,0.0,0.0";
    };
}
object pypower.powerplant
{
    // TRACY_COMBINED_CYCLE_POWER_PLANT: cap=336.1, cf=0.419, units=1
    name "wecc240_psse_G_3903_CC";
    parent "wecc240_psse_G_3903";
    latitude 37.71;
    longitude -121.6;
    generator CC;
    operating_capacity 336.1 MW;
    startup_cost 35.0;
    shutdown_cost 0.0;
    fixed_cost 500.0;
    variable_cost 50.0;
    scarcity_cost 0.001;
}

object pypower.powerplant
{
    // MARIPOSA_ENERGY_PROJECT: cap=199.6, cf=0.249, units=1
    name "wecc240_psse_G_3903_CT";
    parent "wecc240_psse_G_3903";
    latitude 37.71;
    longitude -121.6;
    generator CT;
    operating_capacity 199.6 MW;
    startup_cost 25.0;
    shutdown_cost 0.0;
    fixed_cost 350.0;
    variable_cost 75.0;
    scarcity_cost 0.001;
}

object pypower.powerplant
{
    // BUENA_VISTA_ENERGY_LLC: cap=38.0, cf=0.047, units=1
    // DIABLO_WIND_LLC: cap=18.0, cf=0.022, units=1
    // GOLDEN_HILLS_NORTH_WIND_ENERGY_CENTER: cap=46.0, cf=0.057, units=1
    // GOLDEN_HILLS_WIND: cap=85.9, cf=0.107, units=1
    // VASCO_WINDS: cap=78.2, cf=0.098, units=1
    name "wecc240_psse_G_3903_WT";
    parent "wecc240_psse_G_3903";
    latitude 37.71;
    longitude -121.6;
    generator WT;
    operating_capacity 266.1 MW;
    startup_cost 0.0;
    shutdown_cost 0.0;
    fixed_cost 0.0;
    variable_cost 0.0;
    scarcity_cost 0.0;
}

object pypower.gen
{
    name "wecc240_psse_G_8002";
    parent wecc240_psse_N_8002;
    Pmax 563.4 MW;
    Qmax 112.7 MW;
    Qmin -112.7 MW;
    status IN_SERVICE;
    object gencost
    {
        model POLYNOMIAL;
        startup 0.0 $;
        shutdown 0.0 $;
        costs "0.0,0.0,0.0";
    };
}
object pypower.powerplant
{
    // LODI_ENERGY_CENTER: cap=288.9, cf=0.513, units=1
    name "wecc240_psse_G_8002_CC";
    parent "wecc240_psse_G_8002";
    latitude 37.75;
    longitude -121.4;
    generator CC;
    operating_capacity 288.9 MW;
    startup_cost 35.0;
    shutdown_cost 0.0;
    fixed_cost 500.0;
    variable_cost 50.0;
    scarcity_cost 0.001;
}

object pypower.powerplant
{
    // COMBUSTION_TURBINE_PROJECT_NO_2: cap=50.0, cf=0.089, units=1
    // RIPON_GENERATION_STATION: cap=121.0, cf=0.215, units=1
    // RIPON_MILL: cap=49.5, cf=0.088, units=1
    name "wecc240_psse_G_8002_CT";
    parent "wecc240_psse_G_8002";
    latitude 37.75;
    longitude -121.4;
    generator CT;
    operating_capacity 220.5 MW;
    startup_cost 25.0;
    shutdown_cost 0.0;
    fixed_cost 350.0;
    variable_cost 75.0;
    scarcity_cost 0.001;
}

object pypower.powerplant
{
    // STOCKTON_BIOMASS: cap=54.0, cf=0.096, units=1
    name "wecc240_psse_G_8002_ST";
    parent "wecc240_psse_G_8002";
    latitude 37.75;
    longitude -121.4;
    generator ST;
    operating_capacity 54.0 MW;
    startup_cost 6500.0;
    shutdown_cost 0.0;
    fixed_cost 1000.0;
    variable_cost 5.0;
    scarcity_cost 0.001;
}

object pypower.gen
{
    name "wecc240_psse_G_3501";
    parent wecc240_psse_N_3501;
    Pmax 1772.4 MW;
    Qmax 354.5 MW;
    Qmin -354.5 MW;
    status IN_SERVICE;
    object gencost
    {
        model POLYNOMIAL;
        startup 0.0 $;
        shutdown 0.0 $;
        costs "0.0,0.0,0.0";
    };
}
object pypower.powerplant
{
    // AIDLIN_GEOTHERMAL_POWER_PLANT: cap=25.0, cf=0.014, units=1
    // CALISTOGA_POWER_PLANT: cap=176.4, cf=0.1, units=1
    // GEOTHERMAL_1: cap=110.0, cf=0.062, units=1
    // GEOTHERMAL_2: cap=110.0, cf=0.062, units=1
    // GEYSERS_UNIT_5-20: cap=1273.0, cf=0.718, units=1
    // SONOMA_CALIFORNIA_GEOTHERMAL: cap=78.0, cf=0.044, units=1
    name "wecc240_psse_G_3501_ST";
    parent "wecc240_psse_G_3501";
    latitude 38.5;
    longitude -122.8;
    generator ST;
    operating_capacity 1772.4 MW;
    startup_cost 6500.0;
    shutdown_cost 0.0;
    fixed_cost 1000.0;
    variable_cost 5.0;
    scarcity_cost 0.001;
}

object pypower.gen
{
    name "wecc240_psse_G_3201";
    parent wecc240_psse_N_3201;
    Pmax 364.5 MW;
    Qmax 72.9 MW;
    Qmin -72.9 MW;
    status IN_SERVICE;
    object gencost
    {
        model POLYNOMIAL;
        startup 0.0 $;
        shutdown 0.0 $;
        costs "0.0,0.0,0.0";
    };
}
object pypower.powerplant
{
    // FOSTER_WHEELER_MARTINEZ: cap=113.5, cf=0.311, units=1
    // MARTINEZ_REFINING: cap=100.0, cf=0.274, units=1
    name "wecc240_psse_G_3201_CC";
    parent "wecc240_psse_G_3201";
    latitude 37.98;
    longitude -122.0;
    generator CC;
    operating_capacity 213.5 MW;
    startup_cost 35.0;
    shutdown_cost 0.0;
    fixed_cost 500.0;
    variable_cost 50.0;
    scarcity_cost 0.001;
}

object pypower.powerplant
{
    // VALERO_REFINERY_COGENERATION_UNIT_1: cap=51.0, cf=0.14, units=1
    name "wecc240_psse_G_3201_CT";
    parent "wecc240_psse_G_3201";
    latitude 37.98;
    longitude -122.0;
    generator CT;
    operating_capacity 51.0 MW;
    startup_cost 25.0;
    shutdown_cost 0.0;
    fixed_cost 350.0;
    variable_cost 75.0;
    scarcity_cost 0.001;
}

object pypower.powerplant
{
    // MARTINEZ_REFINING: cap=100.0, cf=0.274, units=1
    name "wecc240_psse_G_3201_ST";
    parent "wecc240_psse_G_3201";
    latitude 37.98;
    longitude -122.0;
    generator ST;
    operating_capacity 100.0 MW;
    startup_cost 6500.0;
    shutdown_cost 0.0;
    fixed_cost 1000.0;
    variable_cost 5.0;
    scarcity_cost 0.001;
}

object pypower.gen
{
    name "wecc240_psse_G_3204";
    parent wecc240_psse_N_3204;
    Pmax 4208.4 MW;
    Qmax 841.7 MW;
    Qmin -841.7 MW;
    status IN_SERVICE;
    object gencost
    {
        model POLYNOMIAL;
        startup 0.0 $;
        shutdown 0.0 $;
        costs "0.0,0.0,0.0";
    };
}
object pypower.powerplant
{
    // DELTA_ENERGY_CENTER: cap=943.5, cf=0.224, units=1
    // GATEWAY_GENERATING_STATION: cap=619.7, cf=0.147, units=1
    // LOS_MEDANOS_ENERGY_CENTER: cap=678.3, cf=0.161, units=1
    name "wecc240_psse_G_3204_CC";
    parent "wecc240_psse_G_3204";
    latitude 38.04;
    longitude -121.9;
    generator CC;
    operating_capacity 2241.5 MW;
    startup_cost 35.0;
    shutdown_cost 0.0;
    fixed_cost 500.0;
    variable_cost 50.0;
    scarcity_cost 0.001;
}

object pypower.powerplant
{
    // LAMBIE_ENERGY_CENTER: cap=47.0, cf=0.011, units=1
    // MARSH_LANDING_GENERATING_STATION: cap=828.0, cf=0.197, units=1
    // RIVERVIEW_ENERGY_CENTER: cap=47.0, cf=0.011, units=1
    name "wecc240_psse_G_3204_CT";
    parent "wecc240_psse_G_3204";
    latitude 38.04;
    longitude -121.9;
    generator CT;
    operating_capacity 922.0 MW;
    startup_cost 25.0;
    shutdown_cost 0.0;
    fixed_cost 350.0;
    variable_cost 75.0;
    scarcity_cost 0.001;
}

object pypower.powerplant
{
    // COLUMBIA_1: cap=19.2, cf=0.005, units=1
    name "wecc240_psse_G_3204_PV";
    parent "wecc240_psse_G_3204";
    latitude 38.04;
    longitude -121.9;
    generator PV;
    operating_capacity 19.2 MW;
    startup_cost 0.0;
    shutdown_cost 0.0;
    fixed_cost 0.0;
    variable_cost 0.0;
    scarcity_cost 0.0;
}

object pypower.powerplant
{
    // EDF_RENEWABLE_WINDFARM_V_INC: cap=15.5, cf=0.004, units=1
    // FPL_ENERGY_MONTEZUMA_WINDS_LLC: cap=36.8, cf=0.009, units=1
    // HIGH_WINDS_LLC: cap=162.0, cf=0.038, units=1
    // MONTEZUMA_WIND_II: cap=78.2, cf=0.019, units=1
    // SHILOH_III_WIND_PROJECT_LLC: cap=102.5, cf=0.024, units=1
    // SHILOH_IV_WIND_PROJECT_LLC: cap=102.5, cf=0.024, units=1
    // SHILOH_I_WIND_PROJECT: cap=150.0, cf=0.036, units=1
    // SHILOH_WIND_PROJECT_2_LLC: cap=150.0, cf=0.036, units=1
    // SOLANO_WIND: cap=228.2, cf=0.054, units=1
    name "wecc240_psse_G_3204_WT";
    parent "wecc240_psse_G_3204";
    latitude 38.04;
    longitude -121.9;
    generator WT;
    operating_capacity 1025.7 MW;
    startup_cost 0.0;
    shutdown_cost 0.0;
    fixed_cost 0.0;
    variable_cost 0.0;
    scarcity_cost 0.0;
}

object pypower.gen
{
    name "wecc240_psse_G_3904";
    parent wecc240_psse_N_3904;
    Pmax 226.0 MW;
    Qmax 45.2 MW;
    Qmin -45.2 MW;
    status IN_SERVICE;
    object gencost
    {
        model POLYNOMIAL;
        startup 0.0 $;
        shutdown 0.0 $;
        costs "0.0,0.0,0.0";
    };
}
object pypower.powerplant
{
    // CALPEAK_POWER_VACA_DIXON_PEAKER_PLANT: cap=60.5, cf=0.268, units=1
    // CREED_ENERGY_CENTER: cap=47.0, cf=0.208, units=1
    // GOOSE_HAVEN_ENERGY_CENTER: cap=47.0, cf=0.208, units=1
    // WOLFSKILL_ENERGY_CENTER: cap=47.0, cf=0.208, units=1
    name "wecc240_psse_G_3904_CT";
    parent "wecc240_psse_G_3904";
    latitude 38.41;
    longitude -121.9;
    generator CT;
    operating_capacity 201.5 MW;
    startup_cost 25.0;
    shutdown_cost 0.0;
    fixed_cost 350.0;
    variable_cost 75.0;
    scarcity_cost 0.001;
}

object pypower.powerplant
{
    // MONTICELLO_DAM: cap=11.5, cf=0.051, units=1
    name "wecc240_psse_G_3904_HT";
    parent "wecc240_psse_G_3904";
    latitude 38.41;
    longitude -121.9;
    generator HT;
    operating_capacity 11.5 MW;
    startup_cost 0.0;
    shutdown_cost 0.0;
    fixed_cost 200.0;
    variable_cost 0.0;
    scarcity_cost 0.001;
}

object pypower.powerplant
{
    // UC_DAVIS_SOUTH_CAMPUS: cap=13.0, cf=0.058, units=1
    name "wecc240_psse_G_3904_PV";
    parent "wecc240_psse_G_3904";
    latitude 38.41;
    longitude -121.9;
    generator PV;
    operating_capacity 13.0 MW;
    startup_cost 0.0;
    shutdown_cost 0.0;
    fixed_cost 0.0;
    variable_cost 0.0;
    scarcity_cost 0.0;
}

object pypower.gen
{
    name "wecc240_psse_G_3907";
    parent wecc240_psse_N_3907;
    Pmax 2183.4 MW;
    Qmax 436.7 MW;
    Qmin -436.7 MW;
    status IN_SERVICE;
    object gencost
    {
        model POLYNOMIAL;
        startup 0.0 $;
        shutdown 0.0 $;
        costs "0.0,0.0,0.0";
    };
}
object pypower.powerplant
{
    // WOODLAND: cap=199.0, cf=0.091, units=1
    name "wecc240_psse_G_3907_CC";
    parent "wecc240_psse_G_3907";
    latitude 38.02;
    longitude -121.0;
    generator CC;
    operating_capacity 199.0 MW;
    startup_cost 35.0;
    shutdown_cost 0.0;
    fixed_cost 500.0;
    variable_cost 50.0;
    scarcity_cost 0.001;
}

object pypower.powerplant
{
    // ALMOND_POWER_PLANT: cap=223.5, cf=0.102, units=1
    // MCCLURE: cap=142.4, cf=0.065, units=1
    // WOODLAND: cap=199.0, cf=0.091, units=1
    name "wecc240_psse_G_3907_CT";
    parent "wecc240_psse_G_3907";
    latitude 38.02;
    longitude -121.0;
    generator CT;
    operating_capacity 564.9 MW;
    startup_cost 25.0;
    shutdown_cost 0.0;
    fixed_cost 350.0;
    variable_cost 75.0;
    scarcity_cost 0.001;
}

object pypower.powerplant
{
    // BEARDSLEY: cap=10.0, cf=0.005, units=1
    // COLLIERVILLE_POWERHOUSE: cap=253.0, cf=0.116, units=1
    // DONNELLS: cap=72.0, cf=0.033, units=1
    // DON_PEDRO: cap=170.8, cf=0.078, units=1
    // MOCCASIN: cap=100.0, cf=0.046, units=1
    // NEW_MELONES: cap=300.0, cf=0.137, units=1
    // SAND_BAR_POWER_PLANT: cap=16.2, cf=0.007, units=1
    // STANISLAUS: cap=81.9, cf=0.038, units=1
    // TULLOCH: cap=24.2, cf=0.011, units=1
    name "wecc240_psse_G_3907_HT";
    parent "wecc240_psse_G_3907";
    latitude 38.02;
    longitude -121.0;
    generator HT;
    operating_capacity 1028.1 MW;
    startup_cost 0.0;
    shutdown_cost 0.0;
    fixed_cost 200.0;
    variable_cost 0.0;
    scarcity_cost 0.001;
}

object pypower.powerplant
{
    // WOODLAND: cap=199.0, cf=0.091, units=1
    name "wecc240_psse_G_3907_IC";
    parent "wecc240_psse_G_3907";
    latitude 38.02;
    longitude -121.0;
    generator IC;
    operating_capacity 199.0 MW;
    startup_cost 0.0;
    shutdown_cost 0.0;
    fixed_cost 0.0;
    variable_cost 50.0;
    scarcity_cost 0.001;
}

object pypower.powerplant
{
    // RET_MODESTO_SOLAR: cap=25.0, cf=0.011, units=1
    name "wecc240_psse_G_3907_PV";
    parent "wecc240_psse_G_3907";
    latitude 38.02;
    longitude -121.0;
    generator PV;
    operating_capacity 25.0 MW;
    startup_cost 0.0;
    shutdown_cost 0.0;
    fixed_cost 0.0;
    variable_cost 0.0;
    scarcity_cost 0.0;
}

object pypower.powerplant
{
    // MCCLURE: cap=142.4, cf=0.065, units=1
    // PACIFIC-ULTRAPOWER_CHINESE_STATION: cap=25.0, cf=0.011, units=1
    name "wecc240_psse_G_3907_ST";
    parent "wecc240_psse_G_3907";
    latitude 38.02;
    longitude -121.0;
    generator ST;
    operating_capacity 167.4 MW;
    startup_cost 6500.0;
    shutdown_cost 0.0;
    fixed_cost 1000.0;
    variable_cost 5.0;
    scarcity_cost 0.001;
}

object pypower.gen
{
    name "wecc240_psse_G_3908";
    parent wecc240_psse_N_3908;
    Pmax 905.7 MW;
    Qmax 181.1 MW;
    Qmin -181.1 MW;
    status IN_SERVICE;
    object gencost
    {
        model POLYNOMIAL;
        startup 0.0 $;
        shutdown 0.0 $;
        costs "0.0,0.0,0.0";
    };
}
object pypower.powerplant
{
    // CARSON_ICE-GEN_PROJECT: cap=125.5, cf=0.139, units=1
    // SCA_COGEN_2: cap=193.4, cf=0.214, units=1
    // SPA_COGEN_3: cap=173.9, cf=0.192, units=1
    name "wecc240_psse_G_3908_CC";
    parent "wecc240_psse_G_3908";
    latitude 38.55;
    longitude -121.4;
    generator CC;
    operating_capacity 492.8 MW;
    startup_cost 35.0;
    shutdown_cost 0.0;
    fixed_cost 500.0;
    variable_cost 50.0;
    scarcity_cost 0.001;
}

object pypower.powerplant
{
    // CARSON_ICE-GEN_PROJECT: cap=125.5, cf=0.139, units=1
    // MCCLELLAN_CA: cap=77.0, cf=0.085, units=1
    // SCA_COGEN_2: cap=193.4, cf=0.214, units=1
    name "wecc240_psse_G_3908_CT";
    parent "wecc240_psse_G_3908";
    latitude 38.55;
    longitude -121.4;
    generator CT;
    operating_capacity 395.9 MW;
    startup_cost 25.0;
    shutdown_cost 0.0;
    fixed_cost 350.0;
    variable_cost 75.0;
    scarcity_cost 0.001;
}

object pypower.powerplant
{
    // SMUD_AT_GRUNDMAN: cap=17.0, cf=0.019, units=1
    name "wecc240_psse_G_3908_PV";
    parent "wecc240_psse_G_3908";
    latitude 38.55;
    longitude -121.4;
    generator PV;
    operating_capacity 17.0 MW;
    startup_cost 0.0;
    shutdown_cost 0.0;
    fixed_cost 0.0;
    variable_cost 0.0;
    scarcity_cost 0.0;
}

object pypower.gen
{
    name "wecc240_psse_G_8004";
    parent wecc240_psse_N_8004;
    Pmax 785.5 MW;
    Qmax 157.1 MW;
    Qmin -157.1 MW;
    status IN_SERVICE;
    object gencost
    {
        model POLYNOMIAL;
        startup 0.0 $;
        shutdown 0.0 $;
        costs "0.0,0.0,0.0";
    };
}
object pypower.powerplant
{
    // COSUMNES: cap=530.0, cf=0.675, units=1
    name "wecc240_psse_G_8004_CC";
    parent "wecc240_psse_G_8004";
    latitude 38.35;
    longitude -121.1;
    generator CC;
    operating_capacity 530.0 MW;
    startup_cost 35.0;
    shutdown_cost 0.0;
    fixed_cost 500.0;
    variable_cost 50.0;
    scarcity_cost 0.001;
}

object pypower.powerplant
{
    // CAMANCHE: cap=10.8, cf=0.014, units=1
    // ELECTRA: cap=102.5, cf=0.13, units=1
    // PARDEE: cap=23.6, cf=0.03, units=1
    // SALT_SPRINGS: cap=42.0, cf=0.053, units=1
    // TIGER_CREEK: cap=52.2, cf=0.066, units=1
    // WEST_POINT_PH: cap=13.6, cf=0.017, units=1
    name "wecc240_psse_G_8004_HT";
    parent "wecc240_psse_G_8004";
    latitude 38.35;
    longitude -121.1;
    generator HT;
    operating_capacity 244.7 MW;
    startup_cost 0.0;
    shutdown_cost 0.0;
    fixed_cost 200.0;
    variable_cost 0.0;
    scarcity_cost 0.001;
}

object pypower.powerplant
{
    // RANCHO_SECO_SOLAR_LLC: cap=10.8, cf=0.014, units=1
    name "wecc240_psse_G_8004_PV";
    parent "wecc240_psse_G_8004";
    latitude 38.35;
    longitude -121.1;
    generator PV;
    operating_capacity 10.8 MW;
    startup_cost 0.0;
    shutdown_cost 0.0;
    fixed_cost 0.0;
    variable_cost 0.0;
    scarcity_cost 0.0;
}

object pypower.gen
{
    name "wecc240_psse_G_3913";
    parent wecc240_psse_N_3913;
    Pmax 1136.3 MW;
    Qmax 227.3 MW;
    Qmin -227.3 MW;
    status IN_SERVICE;
    object gencost
    {
        model POLYNOMIAL;
        startup 0.0 $;
        shutdown 0.0 $;
        costs "0.0,0.0,0.0";
    };
}
object pypower.powerplant
{
    // CAMINO: cap=157.8, cf=0.139, units=1
    // EL_DORADO: cap=20.0, cf=0.018, units=1
    // FOLSOM: cap=198.6, cf=0.175, units=1
    // HALSEY: cap=13.6, cf=0.012, units=1
    // JAYBIRD: cap=161.6, cf=0.142, units=1
    // JONES_FORK: cap=10.0, cf=0.009, units=1
    // MIDDLE_FORK: cap=122.4, cf=0.108, units=1
    // NEWCASTLE: cap=12.7, cf=0.011, units=1
    // NIMBUS: cap=13.4, cf=0.012, units=1
    // RALSTON: cap=79.2, cf=0.07, units=1
    // ROBBS_PEAK: cap=25.5, cf=0.022, units=1
    // UNION_VALLEY: cap=38.6, cf=0.034, units=1
    // WHITE_ROCK_SLAB_CREEK: cap=266.5, cf=0.235, units=1
    // WISE: cap=16.4, cf=0.014, units=1
    name "wecc240_psse_G_3913_HT";
    parent "wecc240_psse_G_3913";
    latitude 38.66;
    longitude -121.1;
    generator HT;
    operating_capacity 1136.3 MW;
    startup_cost 0.0;
    shutdown_cost 0.0;
    fixed_cost 200.0;
    variable_cost 0.0;
    scarcity_cost 0.001;
}

object pypower.gen
{
    name "wecc240_psse_G_3910";
    parent wecc240_psse_N_3910;
    Pmax 28.6 MW;
    Qmax 5.7 MW;
    Qmin -5.7 MW;
    status IN_SERVICE;
    object gencost
    {
        model POLYNOMIAL;
        startup 0.0 $;
        shutdown 0.0 $;
        costs "0.0,0.0,0.0";
    };
}
object pypower.powerplant
{
    // WADHAM_ENERGY_LP: cap=28.6, cf=1.0, units=1
    name "wecc240_psse_G_3910_ST";
    parent "wecc240_psse_G_3910";
    latitude 39.02;
    longitude -122.3;
    generator ST;
    operating_capacity 28.6 MW;
    startup_cost 6500.0;
    shutdown_cost 0.0;
    fixed_cost 1000.0;
    variable_cost 5.0;
    scarcity_cost 0.001;
}

object pypower.gen
{
    name "wecc240_psse_G_3405";
    parent wecc240_psse_N_3405;
    Pmax 807.3 MW;
    Qmax 161.5 MW;
    Qmin -161.5 MW;
    status IN_SERVICE;
    object gencost
    {
        model POLYNOMIAL;
        startup 0.0 $;
        shutdown 0.0 $;
        costs "0.0,0.0,0.0";
    };
}
object pypower.powerplant
{
    // SUTTER_ENERGY_CENTER: cap=636.0, cf=0.788, units=1
    name "wecc240_psse_G_3405_CC";
    parent "wecc240_psse_G_3405";
    latitude 38.98;
    longitude -121.6;
    generator CC;
    operating_capacity 636.0 MW;
    startup_cost 35.0;
    shutdown_cost 0.0;
    fixed_cost 500.0;
    variable_cost 50.0;
    scarcity_cost 0.001;
}
object pypower.powerplant
{
    // FEATHER_RIVER_ENERGY_CENTER: cap=47.0, cf=0.058, units=1
    // YUBA_CITY_COGEN_PARTNERS: cap=49.0, cf=0.061, units=1
    // YUBA_CITY_ENERGY_CENTER: cap=47.3, cf=0.059, units=1
    name "wecc240_psse_G_3405_CT";
    parent "wecc240_psse_G_3405";
    latitude 38.98;
    longitude -121.6;
    generator CT;
    operating_capacity 143.3 MW;
    startup_cost 25.0;
    shutdown_cost 0.0;
    fixed_cost 350.0;
    variable_cost 75.0;
    scarcity_cost 0.001;
}

object pypower.powerplant
{
    // WOODLAND_BIOMASS_POWER_LTD: cap=28.0, cf=0.035, units=1
    name "wecc240_psse_G_3405_ST";
    parent "wecc240_psse_G_3405";
    latitude 38.98;
    longitude -121.6;
    generator ST;
    operating_capacity 28.0 MW;
    startup_cost 6500.0;
    shutdown_cost 0.0;
    fixed_cost 1000.0;
    variable_cost 5.0;
    scarcity_cost 0.001;
}

object pypower.gen
{
    name "wecc240_psse_G_3920";
    parent wecc240_psse_N_3920;
    Pmax 211.1 MW;
    Qmax 42.2 MW;
    Qmin -42.2 MW;
    status IN_SERVICE;
    object gencost
    {
        model POLYNOMIAL;
        startup 0.0 $;
        shutdown 0.0 $;
        costs "0.0,0.0,0.0";
    };
}
object pypower.powerplant
{
    // ROSEVILLE_ENERGY_PARK: cap=164.0, cf=0.777, units=1
    name "wecc240_psse_G_3920_CC";
    parent "wecc240_psse_G_3920";
    latitude 38.94;
    longitude -121.5;
    generator CC;
    operating_capacity 164.0 MW;
    startup_cost 35.0;
    shutdown_cost 0.0;
    fixed_cost 500.0;
    variable_cost 50.0;
    scarcity_cost 0.001;
}

object pypower.powerplant
{
    // RIO_BRAVO_ROCKLIN: cap=27.9, cf=0.132, units=1
    // SIERRA_PACIFIC_LINCOLN_FACILITY: cap=19.2, cf=0.091, units=1
    name "wecc240_psse_G_3920_ST";
    parent "wecc240_psse_G_3920";
    latitude 38.94;
    longitude -121.5;
    generator ST;
    operating_capacity 47.1 MW;
    startup_cost 6500.0;
    shutdown_cost 0.0;
    fixed_cost 1000.0;
    variable_cost 5.0;
    scarcity_cost 0.001;
}

object pypower.gen
{
    name "wecc240_psse_G_3909";
    parent wecc240_psse_N_3909;
    Pmax 678.2 MW;
    Qmax 135.6 MW;
    Qmin -135.6 MW;
    status IN_SERVICE;
    object gencost
    {
        model POLYNOMIAL;
        startup 0.0 $;
        shutdown 0.0 $;
        costs "0.0,0.0,0.0";
    };
}
object pypower.powerplant
{
    // CHICAGO_PARK: cap=44.0, cf=0.065, units=1
    // COLGATE: cap=315.0, cf=0.464, units=1
    // DRUM_1: cap=49.2, cf=0.073, units=1
    // DRUM_2: cap=53.1, cf=0.078, units=1
    // DUTCH_FLAT: cap=22.0, cf=0.032, units=1
    // DUTCH_FLAT_2: cap=27.3, cf=0.04, units=1
    // NARROWS_2: cap=46.7, cf=0.069, units=1
    // NARROWS_PH: cap=10.2, cf=0.015, units=1
    // ROLLINS: cap=12.1, cf=0.018, units=1
    // SLY_CREEK: cap=12.1, cf=0.018, units=1
    // WOODLEAF: cap=59.0, cf=0.087, units=1
    name "wecc240_psse_G_3909_HT";
    parent "wecc240_psse_G_3909";
    latitude 39.26;
    longitude -121.3;
    generator HT;
    operating_capacity 650.7 MW;
    startup_cost 0.0;
    shutdown_cost 0.0;
    fixed_cost 200.0;
    variable_cost 0.0;
    scarcity_cost 0.001;
}

object pypower.powerplant
{
    // SIERRA_PACIFIC_QUINCY_FACILITY: cap=27.5, cf=0.041, units=1
    name "wecc240_psse_G_3909_ST";
    parent "wecc240_psse_G_3909";
    latitude 39.26;
    longitude -121.3;
    generator ST;
    operating_capacity 27.5 MW;
    startup_cost 6500.0;
    shutdown_cost 0.0;
    fixed_cost 1000.0;
    variable_cost 5.0;
    scarcity_cost 0.001;
}

object pypower.gen
{
    name "wecc240_psse_G_3404";
    parent wecc240_psse_N_3404;
    Pmax 1190.5 MW;
    Qmax 238.1 MW;
    Qmin -238.1 MW;
    status IN_SERVICE;
    object gencost
    {
        model POLYNOMIAL;
        startup 0.0 $;
        shutdown 0.0 $;
        costs "0.0,0.0,0.0";
    };
}
object pypower.powerplant
{
    // CALPEAK_POWER_PANOCHE_PEAKER_PLANT: cap=60.5, cf=0.051, units=1
    // MIDWAY_PEAKING_LLC: cap=139.8, cf=0.117, units=1
    // PANOCHE_ENERGY_CENTER: cap=432.0, cf=0.363, units=1
    // PANOCHE_PEAKER: cap=49.9, cf=0.042, units=1
    name "wecc240_psse_G_3404_CT";
    parent "wecc240_psse_G_3404";
    latitude 36.68;
    longitude -120.5;
    generator CT;
    operating_capacity 682.2 MW;
    startup_cost 25.0;
    shutdown_cost 0.0;
    fixed_cost 350.0;
    variable_cost 75.0;
    scarcity_cost 0.001;
}

object pypower.powerplant
{
    // ADAMS_E: cap=19.0, cf=0.016, units=1
    // ADERA: cap=20.0, cf=0.017, units=1
    // CANTUA_SOLAR_STATION: cap=20.0, cf=0.017, units=1
    // GIFFEN: cap=10.0, cf=0.008, units=1
    // GIFFEN_SOLAR_PARK: cap=20.0, cf=0.017, units=1
    // GREAT_VALLEY_SOLAR_PORTFOLIO_HOLDINGS_LLC: cap=100.0, cf=0.084, units=1
    // NORTH_STAR_SOLAR: cap=62.5, cf=0.052, units=1
    // RE_ADAMS_EAST_LLC: cap=19.0, cf=0.016, units=1
    // RE_TRANQUILLITY: cap=205.3, cf=0.172, units=1
    // STROUD_SOLAR_STATION: cap=20.0, cf=0.017, units=1
    name "wecc240_psse_G_3404_PV";
    parent "wecc240_psse_G_3404";
    latitude 36.68;
    longitude -120.5;
    generator PV;
    operating_capacity 495.8 MW;
    startup_cost 0.0;
    shutdown_cost 0.0;
    fixed_cost 0.0;
    variable_cost 0.0;
    scarcity_cost 0.0;
}

object pypower.powerplant
{
    // EL_NIDO_FACILITY: cap=12.5, cf=0.01, units=1
    name "wecc240_psse_G_3404_ST";
    parent "wecc240_psse_G_3404";
    latitude 36.68;
    longitude -120.5;
    generator ST;
    operating_capacity 12.5 MW;
    startup_cost 6500.0;
    shutdown_cost 0.0;
    fixed_cost 1000.0;
    variable_cost 5.0;
    scarcity_cost 0.001;
}

object pypower.gen
{
    name "wecc240_psse_G_3401";
    parent wecc240_psse_N_3401;
    Pmax 877.0 MW;
    Qmax 175.4 MW;
    Qmin -175.4 MW;
    status IN_SERVICE;
    object gencost
    {
        model POLYNOMIAL;
        startup 0.0 $;
        shutdown 0.0 $;
        costs "0.0,0.0,0.0";
    };
}
object pypower.powerplant
{
    // FRESNO_COGEN_PARTNERS: cap=82.6, cf=0.094, units=1
    name "wecc240_psse_G_3401_CC";
    parent "wecc240_psse_G_3401";
    latitude 36.85;
    longitude -119.9;
    generator CC;
    operating_capacity 82.6 MW;
    startup_cost 35.0;
    shutdown_cost 0.0;
    fixed_cost 500.0;
    variable_cost 50.0;
    scarcity_cost 0.001;
}

object pypower.powerplant
{
    // FRESNO_COGEN_PARTNERS: cap=82.6, cf=0.094, units=1
    name "wecc240_psse_G_3401_CT";
    parent "wecc240_psse_G_3401";
    latitude 36.85;
    longitude -119.9;
    generator CT;
    operating_capacity 82.6 MW;
    startup_cost 25.0;
    shutdown_cost 0.0;
    fixed_cost 350.0;
    variable_cost 75.0;
    scarcity_cost 0.001;
}

object pypower.powerplant
{
    // A_G_WISHON: cap=12.8, cf=0.015, units=1
    // BIG_CREEK_4: cap=100.0, cf=0.114, units=1
    // DION_R_HOLM: cap=156.8, cf=0.179, units=1
    // EXCHEQUER: cap=94.5, cf=0.108, units=1
    // FRIANT_HYDRO_FACILITY: cap=30.6, cf=0.035, units=1
    // KERCKHOFF_2: cap=139.5, cf=0.159, units=1
    // R_C_KIRKWOOD: cap=115.5, cf=0.132, units=1
    name "wecc240_psse_G_3401_HT";
    parent "wecc240_psse_G_3401";
    latitude 36.85;
    longitude -119.9;
    generator HT;
    operating_capacity 649.7 MW;
    startup_cost 0.0;
    shutdown_cost 0.0;
    fixed_cost 200.0;
    variable_cost 0.0;
    scarcity_cost 0.001;
}

object pypower.powerplant
{
    // CHOWCHILLA_II: cap=49.6, cf=0.057, units=1
    name "wecc240_psse_G_3401_IC";
    parent "wecc240_psse_G_3401";
    latitude 36.85;
    longitude -119.9;
    generator IC;
    operating_capacity 49.6 MW;
    startup_cost 0.0;
    shutdown_cost 0.0;
    fixed_cost 0.0;
    variable_cost 50.0;
    scarcity_cost 0.001;
}

object pypower.powerplant
{
    // AMPERSAND_CHOWCHILLA_BIOMASS_LLC: cap=12.5, cf=0.014, units=1
    name "wecc240_psse_G_3401_ST";
    parent "wecc240_psse_G_3401";
    latitude 36.85;
    longitude -119.9;
    generator ST;
    operating_capacity 12.5 MW;
    startup_cost 6500.0;
    shutdown_cost 0.0;
    fixed_cost 1000.0;
    variable_cost 5.0;
    scarcity_cost 0.001;
}

object pypower.gen
{
    name "wecc240_psse_G_3403";
    parent wecc240_psse_N_3403;
    Pmax 687.5 MW;
    Qmax 137.5 MW;
    Qmin -137.5 MW;
    status IN_SERVICE;
    object gencost
    {
        model POLYNOMIAL;
        startup 0.0 $;
        shutdown 0.0 $;
        costs "0.0,0.0,0.0";
    };
}
object pypower.powerplant
{
    // ALGONQUIN_POWER_SANGER_LLC: cap=61.5, cf=0.089, units=1
    // KINGSBURG_COGEN: cap=36.2, cf=0.053, units=1
    name "wecc240_psse_G_3403_CC";
    parent "wecc240_psse_G_3403";
    latitude 36.61;
    longitude -119.6;
    generator CC;
    operating_capacity 97.7 MW;
    startup_cost 35.0;
    shutdown_cost 0.0;
    fixed_cost 500.0;
    variable_cost 50.0;
    scarcity_cost 0.001;
}

object pypower.powerplant
{
    // HANFORD_ENERGY_PARK_PEAKER: cap=92.2, cf=0.134, units=1
    // KINGS_RIVER: cap=121.0, cf=0.176, units=1
    name "wecc240_psse_G_3403_CT";
    parent "wecc240_psse_G_3403";
    latitude 36.61;
    longitude -119.6;
    generator CT;
    operating_capacity 213.2 MW;
    startup_cost 25.0;
    shutdown_cost 0.0;
    fixed_cost 350.0;
    variable_cost 75.0;
    scarcity_cost 0.001;
}

object pypower.powerplant
{
    // PINE_FLAT: cap=165.0, cf=0.24, units=1
    name "wecc240_psse_G_3403_HT";
    parent "wecc240_psse_G_3403";
    latitude 36.61;
    longitude -119.6;
    generator HT;
    operating_capacity 165.0 MW;
    startup_cost 0.0;
    shutdown_cost 0.0;
    fixed_cost 200.0;
    variable_cost 0.0;
    scarcity_cost 0.001;
}

object pypower.powerplant
{
    // CED_CORCORAN_2: cap=19.8, cf=0.029, units=1
    // CITY_OF_CORCORAN: cap=12.0, cf=0.017, units=1
    // CITY_OF_CORCORAN_SOLAR: cap=12.0, cf=0.017, units=1
    // CORCORAN: cap=20.0, cf=0.029, units=1
    // CORCORAN_IRRIGATION: cap=20.0, cf=0.029, units=1
    // CORCORAN_IRRIGATION_DISTRICT_SOLAR: cap=20.0, cf=0.029, units=1
    // CORCORAN_SOLAR: cap=20.0, cf=0.029, units=1
    // CORCORAN_SOLAR_2: cap=19.8, cf=0.029, units=1
    // CORCORAN_SOLAR_3: cap=20.0, cf=0.029, units=1
    // GUERNSEY_SOLAR_STATION: cap=20.0, cf=0.029, units=1
    name "wecc240_psse_G_3403_PV";
    parent "wecc240_psse_G_3403";
    latitude 36.61;
    longitude -119.6;
    generator PV;
    operating_capacity 183.6 MW;
    startup_cost 0.0;
    shutdown_cost 0.0;
    fixed_cost 0.0;
    variable_cost 0.0;
    scarcity_cost 0.0;
}

object pypower.powerplant
{
    // RIO_BRAVO_FRESNO: cap=28.0, cf=0.041, units=1
    name "wecc240_psse_G_3403_ST";
    parent "wecc240_psse_G_3403";
    latitude 36.61;
    longitude -119.6;
    generator ST;
    operating_capacity 28.0 MW;
    startup_cost 6500.0;
    shutdown_cost 0.0;
    fixed_cost 1000.0;
    variable_cost 5.0;
    scarcity_cost 0.001;
}

object pypower.gen
{
    name "wecc240_psse_G_3402";
    parent wecc240_psse_N_3402;
    Pmax 1839.7 MW;
    Qmax 367.9 MW;
    Qmin -367.9 MW;
    status IN_SERVICE;
    object gencost
    {
        model POLYNOMIAL;
        startup 0.0 $;
        shutdown 0.0 $;
        costs "0.0,0.0,0.0";
    };
}
object pypower.powerplant
{
    // BALCH_1: cap=31.0, cf=0.017, units=1
    // BALCH_2: cap=97.2, cf=0.053, units=1
    // BIG_CREEK_1: cap=88.4, cf=0.048, units=1
    // BIG_CREEK_3: cap=174.5, cf=0.095, units=1
    // CONTROL_GORGE: cap=37.5, cf=0.02, units=1
    // HAAS: cap=135.0, cf=0.073, units=1
    // HELMS_PUMPED_STORAGE: cap=1053.0, cf=0.572, units=1
    // KINGS_RIVER_PH: cap=48.6, cf=0.026, units=1
    // MIDDLE_GORGE: cap=37.5, cf=0.02, units=1
    // POOLE: cap=11.3, cf=0.006, units=1
    // RUSH_CREEK: cap=13.1, cf=0.007, units=1
    // TERMINUS_HYDROELECTRIC_PROJECT: cap=20.1, cf=0.011, units=1
    // UPPER_GORGE: cap=37.5, cf=0.02, units=1
    name "wecc240_psse_G_3402_HT";
    parent "wecc240_psse_G_3402";
    latitude 37.04;
    longitude -118.9;
    generator HT;
    operating_capacity 1784.7 MW;
    startup_cost 0.0;
    shutdown_cost 0.0;
    fixed_cost 200.0;
    variable_cost 0.0;
    scarcity_cost 0.001;
}

object pypower.powerplant
{
    // MAMMOTH_PACIFIC_I: cap=10.0, cf=0.005, units=1
    // MAMMOTH_PACIFIC_II: cap=30.0, cf=0.016, units=1
    // PLES_I: cap=15.0, cf=0.008, units=1
    name "wecc240_psse_G_3402_ST";
    parent "wecc240_psse_G_3402";
    latitude 37.04;
    longitude -118.9;
    generator ST;
    operating_capacity 55.0 MW;
    startup_cost 6500.0;
    shutdown_cost 0.0;
    fixed_cost 1000.0;
    variable_cost 5.0;
    scarcity_cost 0.001;
}

object pypower.gen
{
    name "wecc240_psse_G_2501";
    parent wecc240_psse_N_2501;
    Pmax 259.5 MW;
    Qmax 51.9 MW;
    Qmin -51.9 MW;
    status IN_SERVICE;
    object gencost
    {
        model POLYNOMIAL;
        startup 0.0 $;
        shutdown 0.0 $;
        costs "0.0,0.0,0.0";
    };
}
object pypower.powerplant
{
    // BOWERMAN_POWER_LFG_LLC: cap=23.8, cf=0.092, units=1
    // BREA_EXPANSION_PLANT: cap=35.7, cf=0.138, units=1
    // CANYON_POWER_PLANT: cap=200.0, cf=0.771, units=1
    name "wecc240_psse_G_2501_CT";
    parent "wecc240_psse_G_2501";
    latitude 33.83;
    longitude -117.8;
    generator CT;
    operating_capacity 259.5 MW;
    startup_cost 25.0;
    shutdown_cost 0.0;
    fixed_cost 350.0;
    variable_cost 75.0;
    scarcity_cost 0.001;
}

object pypower.gen
{
    name "wecc240_psse_G_2408";
    parent wecc240_psse_N_2408;
    Pmax 603.4 MW;
    Qmax 120.7 MW;
    Qmin -120.7 MW;
    status IN_SERVICE;
    object gencost
    {
        model POLYNOMIAL;
        startup 0.0 $;
        shutdown 0.0 $;
        costs "0.0,0.0,0.0";
    };
}
object pypower.powerplant
{
    // MILLERCOORS_IRWINDALE_BREWERY: cap=13.9, cf=0.023, units=1
    // MM_WEST_COVINA: cap=11.7, cf=0.019, units=1
    // PUENTE_HILLS_ENERGY_RECOVERY: cap=50.0, cf=0.083, units=1
    // WALNUT_CREEK_ENERGY_PARK: cap=500.0, cf=0.829, units=1
    name "wecc240_psse_G_2408_CT";
    parent "wecc240_psse_G_2408";
    latitude 34.04;
    longitude -118.1;
    generator CT;
    operating_capacity 575.6 MW;
    startup_cost 25.0;
    shutdown_cost 0.0;
    fixed_cost 350.0;
    variable_cost 75.0;
    scarcity_cost 0.001;
}

object pypower.powerplant
{
    // MILLERCOORS_IRWINDALE_BREWERY: cap=13.9, cf=0.023, units=1
    name "wecc240_psse_G_2408_PV";
    parent "wecc240_psse_G_2408";
    latitude 34.04;
    longitude -118.1;
    generator PV;
    operating_capacity 13.9 MW;
    startup_cost 0.0;
    shutdown_cost 0.0;
    fixed_cost 0.0;
    variable_cost 0.0;
    scarcity_cost 0.0;
}

object pypower.powerplant
{
    // MILLERCOORS_IRWINDALE_BREWERY: cap=13.9, cf=0.023, units=1
    name "wecc240_psse_G_2408_ST";
    parent "wecc240_psse_G_2408";
    latitude 34.04;
    longitude -118.1;
    generator ST;
    operating_capacity 13.9 MW;
    startup_cost 6500.0;
    shutdown_cost 0.0;
    fixed_cost 1000.0;
    variable_cost 5.0;
    scarcity_cost 0.001;
}

object pypower.gen
{
    name "wecc240_psse_G_2402";
    parent wecc240_psse_N_2402;
    Pmax 805.2 MW;
    Qmax 161.0 MW;
    Qmin -161.0 MW;
    status IN_SERVICE;
    object gencost
    {
        model POLYNOMIAL;
        startup 0.0 $;
        shutdown 0.0 $;
        costs "0.0,0.0,0.0";
    };
}
object pypower.powerplant
{
    // CLEARWATER_POWER_PLANT: cap=49.0, cf=0.061, units=1
    // OLS_ENERGY_CHINO: cap=30.8, cf=0.038, units=1
    name "wecc240_psse_G_2402_CC";
    parent "wecc240_psse_G_2402";
    latitude 34.01;
    longitude -117.6;
    generator CC;
    operating_capacity 79.8 MW;
    startup_cost 35.0;
    shutdown_cost 0.0;
    fixed_cost 500.0;
    variable_cost 50.0;
    scarcity_cost 0.001;
}

object pypower.powerplant
{
    // AGUA_MANSA_POWER_PLANT: cap=60.5, cf=0.075, units=1
    // CENTURY_GENERATING_FACILITY: cap=44.8, cf=0.056, units=1
    // DREWS_GENERATING_FACILITY: cap=44.8, cf=0.056, units=1
    // GRAPELAND_PEAKER: cap=59.8, cf=0.074, units=1
    // MIRA_LOMA_PEAKER: cap=49.8, cf=0.062, units=1
    // NEW-INDY_ONTARIO_MILL: cap=34.0, cf=0.042, units=1
    // RIVERSIDE_ENERGY_RESOURCE_CENTER: cap=196.0, cf=0.243, units=1
    // SAN_GABRIEL_FACILITY: cap=66.0, cf=0.082, units=1
    name "wecc240_psse_G_2402_CT";
    parent "wecc240_psse_G_2402";
    latitude 34.01;
    longitude -117.6;
    generator CT;
    operating_capacity 555.7 MW;
    startup_cost 25.0;
    shutdown_cost 0.0;
    fixed_cost 350.0;
    variable_cost 75.0;
    scarcity_cost 0.001;
}

object pypower.powerplant
{
    // GRAPELAND_PEAKER: cap=59.8, cf=0.074, units=1
    // MIRA_LOMA_ENERGY_STORAGE_FACILITY: cap=20.0, cf=0.025, units=1
    // SAN_GABRIEL_FACILITY: cap=66.0, cf=0.082, units=1
    name "wecc240_psse_G_2402_ES";
    parent "wecc240_psse_G_2402";
    latitude 34.01;
    longitude -117.6;
    generator ES;
    operating_capacity 145.8 MW;
    startup_cost 0.0;
    shutdown_cost 0.0;
    fixed_cost 0.0;
    variable_cost 5.0;
    scarcity_cost 0.0;
}

object pypower.powerplant
{
    // ETIWANDA: cap=23.9, cf=0.03, units=1
    name "wecc240_psse_G_2402_HT";
    parent "wecc240_psse_G_2402";
    latitude 34.01;
    longitude -117.6;
    generator HT;
    operating_capacity 23.9 MW;
    startup_cost 0.0;
    shutdown_cost 0.0;
    fixed_cost 200.0;
    variable_cost 0.0;
    scarcity_cost 0.001;
}

object pypower.gen
{
    name "wecc240_psse_G_2403";
    parent wecc240_psse_N_2403;
    Pmax 2199.6 MW;
    Qmax 439.9 MW;
    Qmin -439.9 MW;
    status IN_SERVICE;
    object gencost
    {
        model POLYNOMIAL;
        startup 0.0 $;
        shutdown 0.0 $;
        costs "0.0,0.0,0.0";
    };
}
object pypower.powerplant
{
    // LOMA_LINDA_UNIVERSITY_COGEN: cap=12.1, cf=0.006, units=1
    // MOUNTAINVIEW_GENERATING_STATION: cap=1036.8, cf=0.471, units=1
    name "wecc240_psse_G_2403_CC";
    parent "wecc240_psse_G_2403";
    latitude 33.8;
    longitude -117.2;
    generator CC;
    operating_capacity 1048.9 MW;
    startup_cost 35.0;
    shutdown_cost 0.0;
    fixed_cost 500.0;
    variable_cost 50.0;
    scarcity_cost 0.001;
}

object pypower.powerplant
{
    // LOMA_LINDA_UNIVERSITY_COGEN: cap=12.1, cf=0.006, units=1
    // SPRINGS_GENERATING_STATION: cap=40.0, cf=0.018, units=1
    name "wecc240_psse_G_2403_CT";
    parent "wecc240_psse_G_2403";
    latitude 33.8;
    longitude -117.2;
    generator CT;
    operating_capacity 52.1 MW;
    startup_cost 25.0;
    shutdown_cost 0.0;
    fixed_cost 350.0;
    variable_cost 75.0;
    scarcity_cost 0.001;
}

object pypower.powerplant
{
    // DIAMOND_VALLEY_LAKE: cap=29.7, cf=0.014, units=1
    name "wecc240_psse_G_2403_HT";
    parent "wecc240_psse_G_2403";
    latitude 33.8;
    longitude -117.2;
    generator HT;
    operating_capacity 29.7 MW;
    startup_cost 0.0;
    shutdown_cost 0.0;
    fixed_cost 200.0;
    variable_cost 0.0;
    scarcity_cost 0.001;
}

object pypower.powerplant
{
    // AP_NORTH_LAKE_I: cap=20.0, cf=0.009, units=1
    name "wecc240_psse_G_2403_PV";
    parent "wecc240_psse_G_2403";
    latitude 33.8;
    longitude -117.2;
    generator PV;
    operating_capacity 20.0 MW;
    startup_cost 0.0;
    shutdown_cost 0.0;
    fixed_cost 0.0;
    variable_cost 0.0;
    scarcity_cost 0.0;
}

object pypower.powerplant
{
    // LOMA_LINDA_UNIVERSITY_COGEN: cap=12.1, cf=0.006, units=1
    // MOUNTAINVIEW_GENERATING_STATION: cap=1036.8, cf=0.471, units=1
    name "wecc240_psse_G_2403_ST";
    parent "wecc240_psse_G_2403";
    latitude 33.8;
    longitude -117.2;
    generator ST;
    operating_capacity 1048.9 MW;
    startup_cost 6500.0;
    shutdown_cost 0.0;
    fixed_cost 1000.0;
    variable_cost 5.0;
    scarcity_cost 0.001;
}

object pypower.gen
{
    name "wecc240_psse_G_2401";
    parent wecc240_psse_N_2401;
    Pmax 308.9 MW;
    Qmax 61.8 MW;
    Qmin -61.8 MW;
    status IN_SERVICE;
    object gencost
    {
        model POLYNOMIAL;
        startup 0.0 $;
        shutdown 0.0 $;
        costs "0.0,0.0,0.0";
    };
}
object pypower.powerplant
{
    // DEVIL_CANYON: cap=276.2, cf=0.894, units=1
    // MOJAVE_SIPHON: cap=32.7, cf=0.106, units=1
    name "wecc240_psse_G_2401_HT";
    parent "wecc240_psse_G_2401";
    latitude 34.37;
    longitude -117.4;
    generator HT;
    operating_capacity 308.9 MW;
    startup_cost 0.0;
    shutdown_cost 0.0;
    fixed_cost 200.0;
    variable_cost 0.0;
    scarcity_cost 0.001;
}

object pypower.gen
{
    name "wecc240_psse_G_2404";
    parent wecc240_psse_N_2404;
    Pmax 536.4 MW;
    Qmax 107.3 MW;
    Qmin -107.3 MW;
    status IN_SERVICE;
    object gencost
    {
        model POLYNOMIAL;
        startup 0.0 $;
        shutdown 0.0 $;
        costs "0.0,0.0,0.0";
    };
}
object pypower.powerplant
{
    // ANTELOPE_BIG_SKY_RANCH: cap=20.0, cf=0.037, units=1
    // ANTELOPE_DSR_1: cap=50.0, cf=0.093, units=1
    // BAYSHORE_SOLAR_A_LLC: cap=20.0, cf=0.037, units=1
    // BAYSHORE_SOLAR_B_LLC: cap=20.0, cf=0.037, units=1
    // BAYSHORE_SOLAR_C_LLC: cap=20.0, cf=0.037, units=1
    // BLUE_SKY_RANCH_B: cap=20.0, cf=0.037, units=1
    // CENTRAL_ANTELOPE_C: cap=20.0, cf=0.037, units=1
    // ELEVATION_SOLAR_C: cap=40.0, cf=0.075, units=1
    // NORTH_LANCASTER_RANCH: cap=20.0, cf=0.037, units=1
    // OASIS_SOLAR: cap=20.0, cf=0.037, units=1
    // PORTAL_RIDGE_SOLAR_B_LLC: cap=20.0, cf=0.037, units=1
    // PORTAL_RIDGE_SOLAR_C_LLC: cap=11.4, cf=0.021, units=1
    // SEPV_PALMDALE_EAST: cap=10.0, cf=0.019, units=1
    // SIERRA_SOLAR_GREENWORKS: cap=20.0, cf=0.037, units=1
    // SIERRA_SOLAR_GREENWORKS_2: cap=20.0, cf=0.037, units=1
    // SOLVERDE_1: cap=85.0, cf=0.158, units=1
    // SUMMER_SOLAR: cap=20.0, cf=0.037, units=1
    // TA-HIGH_DESERT_LLC: cap=20.0, cf=0.037, units=1
    // WESTERN_ANTELOPE_BLUE_SKY_RANCH_A: cap=20.0, cf=0.037, units=1
    // WESTERN_ANTELOPE_DRY_RANCH: cap=10.0, cf=0.019, units=1
    // WESTERN_ANTELOPE_DRY_RANCH_2: cap=10.0, cf=0.019, units=1
    // W_ANTELOPE_SOLAR: cap=20.0, cf=0.037, units=1
    // W_ANTELOPE_SOLAR_PARK: cap=20.0, cf=0.037, units=1
    name "wecc240_psse_G_2404_PV";
    parent "wecc240_psse_G_2404";
    latitude 34.49;
    longitude -118.1;
    generator PV;
    operating_capacity 536.4 MW;
    startup_cost 0.0;
    shutdown_cost 0.0;
    fixed_cost 0.0;
    variable_cost 0.0;
    scarcity_cost 0.0;
}

object pypower.gen
{
    name "wecc240_psse_G_2600";
    parent wecc240_psse_N_2600;
    Pmax 50.0 MW;
    Qmax 10.0 MW;
    Qmin -10.0 MW;
    status IN_SERVICE;
    object gencost
    {
        model POLYNOMIAL;
        startup 0.0 $;
        shutdown 0.0 $;
        costs "0.0,0.0,0.0";
    };
}
object pypower.powerplant
{
    // ADELANTO_SOLAR_PROJECT: cap=10.0, cf=0.2, units=1
    // RE_VICTOR_PHELAN_SOLAR_ONE_LLC: cap=20.0, cf=0.4, units=1
    // VICTOR_PHELAN_1: cap=20.0, cf=0.4, units=1
    name "wecc240_psse_G_2600_PV";
    parent "wecc240_psse_G_2600";
    latitude 34.55;
    longitude -117.4;
    generator PV;
    operating_capacity 50.0 MW;
    startup_cost 0.0;
    shutdown_cost 0.0;
    fixed_cost 0.0;
    variable_cost 0.0;
    scarcity_cost 0.0;
}

object pypower.gen
{
    name "wecc240_psse_G_2603";
    parent wecc240_psse_N_2603;
    Pmax 1406.0 MW;
    Qmax 281.2 MW;
    Qmin -281.2 MW;
    status IN_SERVICE;
    object gencost
    {
        model POLYNOMIAL;
        startup 0.0 $;
        shutdown 0.0 $;
        costs "0.0,0.0,0.0";
    };
}
object pypower.powerplant
{
    // HIGH_DESERT_POWER_PLANT: cap=852.0, cf=0.606, units=1
    name "wecc240_psse_G_2603_CC";
    parent "wecc240_psse_G_2603";
    latitude 34.57;
    longitude -117.3;
    generator CC;
    operating_capacity 852.0 MW;
    startup_cost 35.0;
    shutdown_cost 0.0;
    fixed_cost 500.0;
    variable_cost 50.0;
    scarcity_cost 0.001;
}

object pypower.powerplant
{
    // ADELANTO_I: cap=20.0, cf=0.014, units=1
    // ALAMO_SOLAR: cap=20.0, cf=0.014, units=1
    // LONE_VALLEY_SOLAR_PARK_II_LLC: cap=20.0, cf=0.014, units=1
    // LONE_VALLEY_SOLAR_PARK_I_LLC: cap=10.0, cf=0.007, units=1
    // LONG_BOAT_SOLAR: cap=20.0, cf=0.014, units=1
    name "wecc240_psse_G_2603_PV";
    parent "wecc240_psse_G_2603";
    latitude 34.57;
    longitude -117.3;
    generator PV;
    operating_capacity 90.0 MW;
    startup_cost 0.0;
    shutdown_cost 0.0;
    fixed_cost 0.0;
    variable_cost 0.0;
    scarcity_cost 0.0;
}

object pypower.powerplant
{
    // MOJAVE_SOLAR_PROJECT: cap=280.0, cf=0.199, units=1
    // SEGS_IX: cap=92.0, cf=0.065, units=1
    // SEGS_VIII: cap=92.0, cf=0.065, units=1
    name "wecc240_psse_G_2603_ST";
    parent "wecc240_psse_G_2603";
    latitude 34.57;
    longitude -117.3;
    generator ST;
    operating_capacity 464.0 MW;
    startup_cost 6500.0;
    shutdown_cost 0.0;
    fixed_cost 1000.0;
    variable_cost 5.0;
    scarcity_cost 0.001;
}

object pypower.gen
{
    name "wecc240_psse_G_2400";
    parent wecc240_psse_N_2400;
    Pmax 1713.8 MW;
    Qmax 342.8 MW;
    Qmin -342.8 MW;
    status IN_SERVICE;
    object gencost
    {
        model POLYNOMIAL;
        startup 0.0 $;
        shutdown 0.0 $;
        costs "0.0,0.0,0.0";
    };
}
object pypower.powerplant
{
    // COACHELLA: cap=92.4, cf=0.054, units=1
    // CPV_SENTINEL_ENERGY_PROJECT: cap=800.0, cf=0.467, units=1
    // INDIGO_ENERGY_FACILITY: cap=149.7, cf=0.087, units=1
    // MCAGCC_COGEN_PLANT_1: cap=16.4, cf=0.01, units=1
    name "wecc240_psse_G_2400_CT";
    parent "wecc240_psse_G_2400";
    latitude 33.93;
    longitude -116.6;
    generator CT;
    operating_capacity 1058.5 MW;
    startup_cost 25.0;
    shutdown_cost 0.0;
    fixed_cost 350.0;
    variable_cost 75.0;
    scarcity_cost 0.001;
}

object pypower.powerplant
{
    // CASCADE_SOLAR: cap=18.5, cf=0.011, units=1
    // NRG_SOLAR_BORREGO_I: cap=26.0, cf=0.015, units=1
    // SEPV_8: cap=12.0, cf=0.007, units=1
    name "wecc240_psse_G_2400_PV";
    parent "wecc240_psse_G_2400";
    latitude 33.93;
    longitude -116.6;
    generator PV;
    operating_capacity 56.5 MW;
    startup_cost 0.0;
    shutdown_cost 0.0;
    fixed_cost 0.0;
    variable_cost 0.0;
    scarcity_cost 0.0;
}

object pypower.powerplant
{
    // DESERT_VIEW_POWER: cap=55.5, cf=0.032, units=1
    name "wecc240_psse_G_2400_ST";
    parent "wecc240_psse_G_2400";
    latitude 33.93;
    longitude -116.6;
    generator ST;
    operating_capacity 55.5 MW;
    startup_cost 6500.0;
    shutdown_cost 0.0;
    fixed_cost 1000.0;
    variable_cost 5.0;
    scarcity_cost 0.001;
}

object pypower.powerplant
{
    // CABAZON_WIND_FARM: cap=39.7, cf=0.023, units=1
    // CABAZON_WIND_PARTNERS: cap=41.0, cf=0.024, units=1
    // DILLON_WIND_LLC: cap=45.0, cf=0.026, units=1
    // EDOM_HILLS_PROJECT_1_LLC: cap=20.0, cf=0.012, units=1
    // GREEN_POWER_I: cap=16.5, cf=0.01, units=1
    // KAREN_AVENUE_WINDFARM: cap=11.7, cf=0.007, units=1
    // MESA_WIND_POWER_CORP: cap=29.9, cf=0.017, units=1
    // MOUNTAIN_VIEW_I2: cap=66.6, cf=0.039, units=1
    // MOUNTAIN_VIEW_III: cap=22.4, cf=0.013, units=1
    // MOUNTAIN_VIEW_IV: cap=49.0, cf=0.029, units=1
    // SAN_GORGONIO_FARMS_WIND_FARM: cap=31.0, cf=0.018, units=1
    // SAN_GORGONIO_WESTWINDS_II_LLC: cap=43.4, cf=0.025, units=1
    // SAN_GORGONIO_WINDPLANT_WPP1993: cap=49.5, cf=0.029, units=1
    // WHITEWATER_HILL_WIND_PARTNERS: cap=61.5, cf=0.036, units=1
    // WINDPARK_UNLIMITED_2: cap=16.1, cf=0.009, units=1
    name "wecc240_psse_G_2400_WT";
    parent "wecc240_psse_G_2400";
    latitude 33.93;
    longitude -116.6;
    generator WT;
    operating_capacity 543.3 MW;
    startup_cost 0.0;
    shutdown_cost 0.0;
    fixed_cost 0.0;
    variable_cost 0.0;
    scarcity_cost 0.0;
}

object pypower.gen
{
    name "wecc240_psse_G_1403";
    parent wecc240_psse_N_1403;
    Pmax 2802.5 MW;
    Qmax 560.5 MW;
    Qmin -560.5 MW;
    status IN_SERVICE;
    object gencost
    {
        model POLYNOMIAL;
        startup 0.0 $;
        shutdown 0.0 $;
        costs "0.0,0.0,0.0";
    };
}
object pypower.powerplant
{
    // BLYTHE_ENERGY_INC: cap=591.0, cf=0.211, units=1
    // GRIFFITH_ENERGY_LLC: cap=655.0, cf=0.234, units=1
    // SOUTH_POINT_ENERGY_CENTER: cap=708.0, cf=0.253, units=1
    name "wecc240_psse_G_1403_CC";
    parent "wecc240_psse_G_1403";
    latitude 34.14;
    longitude -114.3;
    generator CC;
    operating_capacity 1954.0 MW;
    startup_cost 35.0;
    shutdown_cost 0.0;
    fixed_cost 500.0;
    variable_cost 50.0;
    scarcity_cost 0.001;
}

object pypower.powerplant
{
    // BLACK_MOUNTAIN_GENERATING_STATION: cap=121.0, cf=0.043, units=1
    name "wecc240_psse_G_1403_CT";
    parent "wecc240_psse_G_1403";
    latitude 34.14;
    longitude -114.3;
    generator CT;
    operating_capacity 121.0 MW;
    startup_cost 25.0;
    shutdown_cost 0.0;
    fixed_cost 350.0;
    variable_cost 75.0;
    scarcity_cost 0.001;
}

object pypower.powerplant
{
    // HEADGATE_ROCK: cap=19.5, cf=0.007, units=1
    // PARKER_DAM: cap=120.0, cf=0.043, units=1
    name "wecc240_psse_G_1403_HT";
    parent "wecc240_psse_G_1403";
    latitude 34.14;
    longitude -114.3;
    generator HT;
    operating_capacity 139.5 MW;
    startup_cost 0.0;
    shutdown_cost 0.0;
    fixed_cost 200.0;
    variable_cost 0.0;
    scarcity_cost 0.001;
}

object pypower.powerplant
{
    // BLYTHE_SOLAR_II_LLC: cap=131.2, cf=0.047, units=1
    // KINGMAN_1: cap=10.5, cf=0.004, units=1
    // MCCOY_SOLAR_ENERGY_PROJECT: cap=270.6, cf=0.097, units=1
    // MOHAVE_ELECTRIC_AT_FORT_MOHAVE: cap=14.4, cf=0.005, units=1
    // NRG_SOLAR_BLYTHE_II: cap=109.8, cf=0.039, units=1
    // NRG_SOLAR_BLYTHE_LLC: cap=21.0, cf=0.007, units=1
    // SOLAR_BLYTHE_2: cap=20.0, cf=0.007, units=1
    name "wecc240_psse_G_1403_PV";
    parent "wecc240_psse_G_1403";
    latitude 34.14;
    longitude -114.3;
    generator PV;
    operating_capacity 577.5 MW;
    startup_cost 0.0;
    shutdown_cost 0.0;
    fixed_cost 0.0;
    variable_cost 0.0;
    scarcity_cost 0.0;
}

object pypower.powerplant
{
    // KINGMAN_1: cap=10.5, cf=0.004, units=1
    name "wecc240_psse_G_1403_WT";
    parent "wecc240_psse_G_1403";
    latitude 34.14;
    longitude -114.3;
    generator WT;
    operating_capacity 10.5 MW;
    startup_cost 0.0;
    shutdown_cost 0.0;
    fixed_cost 0.0;
    variable_cost 0.0;
    scarcity_cost 0.0;
}

object pypower.gen
{
    name "wecc240_psse_G_2901";
    parent wecc240_psse_N_2901;
    Pmax 954.1 MW;
    Qmax 190.8 MW;
    Qmin -190.8 MW;
    status IN_SERVICE;
    object gencost
    {
        model POLYNOMIAL;
        startup 0.0 $;
        shutdown 0.0 $;
        costs "0.0,0.0,0.0";
    };
}
object pypower.powerplant
{
    // DAVIS_DAM: cap=254.8, cf=0.267, units=1
    name "wecc240_psse_G_2901_HT";
    parent "wecc240_psse_G_2901";
    latitude 35.8;
    longitude -115.0;
    generator HT;
    operating_capacity 254.8 MW;
    startup_cost 0.0;
    shutdown_cost 0.0;
    fixed_cost 200.0;
    variable_cost 0.0;
    scarcity_cost 0.001;
}

object pypower.powerplant
{
    // DESERT_STATELINE: cap=299.5, cf=0.314, units=1
    name "wecc240_psse_G_2901_PV";
    parent "wecc240_psse_G_2901";
    latitude 35.8;
    longitude -115.0;
    generator PV;
    operating_capacity 299.5 MW;
    startup_cost 0.0;
    shutdown_cost 0.0;
    fixed_cost 0.0;
    variable_cost 0.0;
    scarcity_cost 0.0;
}

object pypower.powerplant
{
    // IVANPAH_1: cap=133.0, cf=0.139, units=1
    // IVANPAH_2: cap=133.4, cf=0.14, units=1
    // IVANPAH_3: cap=133.4, cf=0.14, units=1
    name "wecc240_psse_G_2901_ST";
    parent "wecc240_psse_G_2901";
    latitude 35.8;
    longitude -115.0;
    generator ST;
    operating_capacity 399.8 MW;
    startup_cost 6500.0;
    shutdown_cost 0.0;
    fixed_cost 1000.0;
    variable_cost 5.0;
    scarcity_cost 0.001;
}

object pypower.gen
{
    name "wecc240_psse_G_1301";
    parent wecc240_psse_N_1301;
    Pmax 1039.4 MW;
    Qmax 207.9 MW;
    Qmin -207.9 MW;
    status IN_SERVICE;
    object gencost
    {
        model POLYNOMIAL;
        startup 0.0 $;
        shutdown 0.0 $;
        costs "0.0,0.0,0.0";
    };
}
object pypower.powerplant
{
    // HOOVER_DAM_AZ: cap=1039.4, cf=1.0, units=1
    name "wecc240_psse_G_1301_HT";
    parent "wecc240_psse_G_1301";
    latitude 35.93;
    longitude -114.8;
    generator HT;
    operating_capacity 1039.4 MW;
    startup_cost 0.0;
    shutdown_cost 0.0;
    fixed_cost 200.0;
    variable_cost 0.0;
    scarcity_cost 0.001;
}

object pypower.gen
{
    name "wecc240_psse_G_1302";
    parent wecc240_psse_N_1302;
    Pmax 200.4 MW;
    Qmax 40.1 MW;
    Qmin -40.1 MW;
    status IN_SERVICE;
    object gencost
    {
        model POLYNOMIAL;
        startup 0.0 $;
        shutdown 0.0 $;
        costs "0.0,0.0,0.0";
    };
}
object pypower.powerplant
{
    // MILLCREEK_POWER_GENERATION: cap=80.0, cf=0.399, units=1
    name "wecc240_psse_G_1302_CT";
    parent "wecc240_psse_G_1302";
    latitude 36.65;
    longitude -115.1;
    generator CT;
    operating_capacity 80.0 MW;
    startup_cost 25.0;
    shutdown_cost 0.0;
    fixed_cost 350.0;
    variable_cost 75.0;
    scarcity_cost 0.001;
}

object pypower.powerplant
{
    // HURRICANE_CITY_POWER: cap=15.1, cf=0.075, units=1
    name "wecc240_psse_G_1302_IC";
    parent "wecc240_psse_G_1302";
    latitude 36.65;
    longitude -115.1;
    generator IC;
    operating_capacity 15.1 MW;
    startup_cost 0.0;
    shutdown_cost 0.0;
    fixed_cost 0.0;
    variable_cost 50.0;
    scarcity_cost 0.001;
}

object pypower.powerplant
{
    // ENTERPRISE_SOLAR_LLC: cap=80.0, cf=0.399, units=1
    name "wecc240_psse_G_1302_PV";
    parent "wecc240_psse_G_1302";
    latitude 36.65;
    longitude -115.1;
    generator PV;
    operating_capacity 80.0 MW;
    startup_cost 0.0;
    shutdown_cost 0.0;
    fixed_cost 0.0;
    variable_cost 0.0;
    scarcity_cost 0.0;
}

object pypower.powerplant
{
    // BLOOMINGTON_POWER_PLANT: cap=10.2, cf=0.051, units=1
    // HURRICANE_CITY_POWER: cap=15.1, cf=0.075, units=1
    name "wecc240_psse_G_1302_ST";
    parent "wecc240_psse_G_1302";
    latitude 36.65;
    longitude -115.1;
    generator ST;
    operating_capacity 25.3 MW;
    startup_cost 6500.0;
    shutdown_cost 0.0;
    fixed_cost 1000.0;
    variable_cost 5.0;
    scarcity_cost 0.001;
}

object pypower.gen
{
    name "wecc240_psse_G_8001";
    parent wecc240_psse_N_8001;
    Pmax 1671.6 MW;
    Qmax 334.3 MW;
    Qmin -334.3 MW;
    status IN_SERVICE;
    object gencost
    {
        model POLYNOMIAL;
        startup 0.0 $;
        shutdown 0.0 $;
        costs "0.0,0.0,0.0";
    };
}
object pypower.powerplant
{
    // REDDING_POWER: cap=183.1, cf=0.11, units=1
    name "wecc240_psse_G_8001_CC";
    parent "wecc240_psse_G_8001";
    latitude 40.38;
    longitude -122.4;
    generator CC;
    operating_capacity 183.1 MW;
    startup_cost 35.0;
    shutdown_cost 0.0;
    fixed_cost 500.0;
    variable_cost 50.0;
    scarcity_cost 0.001;
}

object pypower.powerplant
{
    // REDDING_POWER: cap=183.1, cf=0.11, units=1
    name "wecc240_psse_G_8001_CT";
    parent "wecc240_psse_G_8001";
    latitude 40.38;
    longitude -122.4;
    generator CT;
    operating_capacity 183.1 MW;
    startup_cost 25.0;
    shutdown_cost 0.0;
    fixed_cost 350.0;
    variable_cost 75.0;
    scarcity_cost 0.001;
}

object pypower.powerplant
{
    // JUDGE_F_CARR: cap=154.4, cf=0.092, units=1
    // KESWICK: cap=117.0, cf=0.07, units=1
    // SHASTA: cap=714.0, cf=0.427, units=1
    // SPRING_CREEK: cap=180.0, cf=0.108, units=1
    // TRINITY: cap=140.0, cf=0.084, units=1
    name "wecc240_psse_G_8001_HT";
    parent "wecc240_psse_G_8001";
    latitude 40.38;
    longitude -122.4;
    generator HT;
    operating_capacity 1305.4 MW;
    startup_cost 0.0;
    shutdown_cost 0.0;
    fixed_cost 200.0;
    variable_cost 0.0;
    scarcity_cost 0.001;
}

object pypower.gen
{
    name "wecc240_psse_G_3916";
    parent wecc240_psse_N_3916;
    Pmax 712.4 MW;
    Qmax 142.5 MW;
    Qmin -142.5 MW;
    status IN_SERVICE;
    object gencost
    {
        model POLYNOMIAL;
        startup 0.0 $;
        shutdown 0.0 $;
        costs "0.0,0.0,0.0";
    };
}
object pypower.powerplant
{
    // COLUSA_GENERATING_STATION: cap=712.4, cf=1.0, units=1
    name "wecc240_psse_G_3916_CC";
    parent "wecc240_psse_G_3916";
    latitude 39.44;
    longitude -122.2;
    generator CC;
    operating_capacity 712.4 MW;
    startup_cost 35.0;
    shutdown_cost 0.0;
    fixed_cost 500.0;
    variable_cost 50.0;
    scarcity_cost 0.001;
}

object pypower.gen
{
    name "wecc240_psse_G_3905";
    parent wecc240_psse_N_3905;
    Pmax 928.2 MW;
    Qmax 185.6 MW;
    Qmin -185.6 MW;
    status IN_SERVICE;
    object gencost
    {
        model POLYNOMIAL;
        startup 0.0 $;
        shutdown 0.0 $;
        costs "0.0,0.0,0.0";
    };
}
object pypower.powerplant
{
    // BELDEN: cap=117.9, cf=0.127, units=1
    // BUCKS_CREEK: cap=66.0, cf=0.071, units=1
    // BUTT_VALLEY: cap=40.0, cf=0.043, units=1
    // CARIBOU_1: cap=73.8, cf=0.08, units=1
    // CARIBOU_2: cap=117.9, cf=0.127, units=1
    // CRESTA: cap=73.8, cf=0.08, units=1
    // DE_SABLA: cap=18.4, cf=0.02, units=1
    // FORKS_OF_BUTTE_HYDRO_PROJECT: cap=14.5, cf=0.016, units=1
    // GRIZZLY: cap=22.0, cf=0.024, units=1
    // POE: cap=142.8, cf=0.154, units=1
    // ROCK_CREEK: cap=126.0, cf=0.136, units=1
    // THERMALITO: cap=115.1, cf=0.124, units=1
    name "wecc240_psse_G_3905_HT";
    parent "wecc240_psse_G_3905";
    latitude 39.55;
    longitude -121.6;
    generator HT;
    operating_capacity 928.2 MW;
    startup_cost 0.0;
    shutdown_cost 0.0;
    fixed_cost 200.0;
    variable_cost 0.0;
    scarcity_cost 0.001;
}

object pypower.gen
{
    name "wecc240_psse_G_3919";
    parent wecc240_psse_N_3919;
    Pmax 696.0 MW;
    Qmax 139.2 MW;
    Qmin -139.2 MW;
    status IN_SERVICE;
    object gencost
    {
        model POLYNOMIAL;
        startup 0.0 $;
        shutdown 0.0 $;
        costs "0.0,0.0,0.0";
    };
}
object pypower.powerplant
{
    // EDWARD_C_HYATT: cap=644.1, cf=0.925, units=1
    // FORBESTOWN: cap=41.9, cf=0.06, units=1
    // KELLY_RIDGE: cap=10.0, cf=0.014, units=1
    name "wecc240_psse_G_3919_HT";
    parent "wecc240_psse_G_3919";
    latitude 39.44;
    longitude -121.5;
    generator HT;
    operating_capacity 696.0 MW;
    startup_cost 0.0;
    shutdown_cost 0.0;
    fixed_cost 200.0;
    variable_cost 0.0;
    scarcity_cost 0.001;
}

object pypower.gen
{
    name "wecc240_psse_G_3911";
    parent wecc240_psse_N_3911;
    Pmax 143.6 MW;
    Qmax 28.7 MW;
    Qmin -28.7 MW;
    status IN_SERVICE;
    object gencost
    {
        model POLYNOMIAL;
        startup 0.0 $;
        shutdown 0.0 $;
        costs "0.0,0.0,0.0";
    };
}
object pypower.powerplant
{
    // COLEMAN_PH: cap=12.1, cf=0.084, units=1
    name "wecc240_psse_G_3911_HT";
    parent "wecc240_psse_G_3911";
    latitude 40.4;
    longitude -122.3;
    generator HT;
    operating_capacity 12.1 MW;
    startup_cost 0.0;
    shutdown_cost 0.0;
    fixed_cost 200.0;
    variable_cost 0.0;
    scarcity_cost 0.001;
}

object pypower.powerplant
{
    // RED_BLUFF: cap=46.4, cf=0.323, units=1
    name "wecc240_psse_G_3911_IC";
    parent "wecc240_psse_G_3911";
    latitude 40.4;
    longitude -122.3;
    generator IC;
    operating_capacity 46.4 MW;
    startup_cost 0.0;
    shutdown_cost 0.0;
    fixed_cost 0.0;
    variable_cost 50.0;
    scarcity_cost 0.001;
}

object pypower.powerplant
{
    // SPI_ANDERSON_2: cap=30.2, cf=0.21, units=1
    // WHEELABRATOR_SHASTA: cap=54.9, cf=0.382, units=1
    name "wecc240_psse_G_3911_ST";
    parent "wecc240_psse_G_3911";
    latitude 40.4;
    longitude -122.3;
    generator ST;
    operating_capacity 85.1 MW;
    startup_cost 6500.0;
    shutdown_cost 0.0;
    fixed_cost 1000.0;
    variable_cost 5.0;
    scarcity_cost 0.001;
}

object pypower.gen
{
    name "wecc240_psse_G_3906";
    parent wecc240_psse_N_3906;
    Pmax 967.0 MW;
    Qmax 193.4 MW;
    Qmin -193.4 MW;
    status IN_SERVICE;
    object gencost
    {
        model POLYNOMIAL;
        startup 0.0 $;
        shutdown 0.0 $;
        costs "0.0,0.0,0.0";
    };
}
object pypower.powerplant
{
    // HAT_CREEK_1: cap=10.0, cf=0.01, units=1
    // HAT_CREEK_2: cap=10.0, cf=0.01, units=1
    // JAMES_B_BLACK: cap=168.6, cf=0.174, units=1
    // MUCK_VALLEY_HYDROELECTRIC: cap=29.9, cf=0.031, units=1
    // PIT_1: cap=69.2, cf=0.072, units=1
    // PIT_3: cap=80.1, cf=0.083, units=1
    // PIT_4: cap=103.4, cf=0.107, units=1
    // PIT_5: cap=141.6, cf=0.146, units=1
    // PIT_6: cap=79.2, cf=0.082, units=1
    // PIT_7: cap=109.8, cf=0.114, units=1
    name "wecc240_psse_G_3906_HT";
    parent "wecc240_psse_G_3906";
    latitude 40.81;
    longitude -121.9;
    generator HT;
    operating_capacity 801.8 MW;
    startup_cost 0.0;
    shutdown_cost 0.0;
    fixed_cost 200.0;
    variable_cost 0.0;
    scarcity_cost 0.001;
}

object pypower.powerplant
{
    // BURNEY_FOREST_PRODUCTS: cap=31.0, cf=0.032, units=1
    // ROSEBURG_FOREST_PRODUCTS_BIOMASS: cap=13.0, cf=0.013, units=1
    // SIERRA_PACIFIC_BURNEY_FACILITY: cap=20.0, cf=0.021, units=1
    name "wecc240_psse_G_3906_ST";
    parent "wecc240_psse_G_3906";
    latitude 40.81;
    longitude -121.9;
    generator ST;
    operating_capacity 64.0 MW;
    startup_cost 6500.0;
    shutdown_cost 0.0;
    fixed_cost 1000.0;
    variable_cost 5.0;
    scarcity_cost 0.001;
}

object pypower.powerplant
{
    // HATCHET_RIDGE_WIND_PROJECT: cap=101.2, cf=0.105, units=1
    name "wecc240_psse_G_3906_WT";
    parent "wecc240_psse_G_3906";
    latitude 40.81;
    longitude -121.9;
    generator WT;
    operating_capacity 101.2 MW;
    startup_cost 0.0;
    shutdown_cost 0.0;
    fixed_cost 0.0;
    variable_cost 0.0;
    scarcity_cost 0.0;
}

object pypower.gen
{
    name "wecc240_psse_G_4001";
    parent wecc240_psse_N_4001;
    Pmax 686.4 MW;
    Qmax 137.3 MW;
    Qmin -137.3 MW;
    status IN_SERVICE;
    object gencost
    {
        model POLYNOMIAL;
        startup 0.0 $;
        shutdown 0.0 $;
        costs "0.0,0.0,0.0";
    };
}
object pypower.powerplant
{
    // KLAMATH_COGENERATION_PLANT: cap=501.5, cf=0.731, units=1
    name "wecc240_psse_G_4001_CC";
    parent "wecc240_psse_G_4001";
    latitude 42.0;
    longitude -121.3;
    generator CC;
    operating_capacity 501.5 MW;
    startup_cost 35.0;
    shutdown_cost 0.0;
    fixed_cost 500.0;
    variable_cost 50.0;
    scarcity_cost 0.001;
}

object pypower.powerplant
{
    // KLAMATH_EXPANSION_PROJECT: cap=117.6, cf=0.171, units=1
    name "wecc240_psse_G_4001_CT";
    parent "wecc240_psse_G_4001";
    latitude 42.0;
    longitude -121.3;
    generator CT;
    operating_capacity 117.6 MW;
    startup_cost 25.0;
    shutdown_cost 0.0;
    fixed_cost 350.0;
    variable_cost 75.0;
    scarcity_cost 0.001;
}

object pypower.powerplant
{
    // AIRPORT_SOLAR: cap=47.3, cf=0.069, units=1
    // GARRETT_SOLAR: cap=10.0, cf=0.015, units=1
    // OR_SOLAR_3_LLC: cap=10.0, cf=0.015, units=1
    name "wecc240_psse_G_4001_PV";
    parent "wecc240_psse_G_4001";
    latitude 42.0;
    longitude -121.3;
    generator PV;
    operating_capacity 67.3 MW;
    startup_cost 0.0;
    shutdown_cost 0.0;
    fixed_cost 0.0;
    variable_cost 0.0;
    scarcity_cost 0.0;
}

object pypower.gen
{
    name "wecc240_psse_G_3701";
    parent wecc240_psse_N_3701;
    Pmax 150.6 MW;
    Qmax 30.1 MW;
    Qmin -30.1 MW;
    status IN_SERVICE;
    object gencost
    {
        model POLYNOMIAL;
        startup 0.0 $;
        shutdown 0.0 $;
        costs "0.0,0.0,0.0";
    };
}
object pypower.powerplant
{
    // FRENCH_MEADOWS: cap=15.3, cf=0.102, units=1
    // HAYPRESS: cap=10.0, cf=0.066, units=1
    // LOON_LAKE: cap=74.1, cf=0.492, units=1
    name "wecc240_psse_G_3701_HT";
    parent "wecc240_psse_G_3701";
    latitude 39.53;
    longitude -119.8;
    generator HT;
    operating_capacity 99.4 MW;
    startup_cost 0.0;
    shutdown_cost 0.0;
    fixed_cost 200.0;
    variable_cost 0.0;
    scarcity_cost 0.001;
}

object pypower.powerplant
{
    // HL_POWER: cap=36.2, cf=0.24, units=1
    // KINGS_BEACH: cap=15.0, cf=0.1, units=1
    name "wecc240_psse_G_3701_ST";
    parent "wecc240_psse_G_3701";
    latitude 39.53;
    longitude -119.8;
    generator ST;
    operating_capacity 51.2 MW;
    startup_cost 6500.0;
    shutdown_cost 0.0;
    fixed_cost 1000.0;
    variable_cost 5.0;
    scarcity_cost 0.001;
}

object pypower.gen
{
    name "wecc240_psse_G_4204";
    parent wecc240_psse_N_4204;
    Pmax 502.5 MW;
    Qmax 100.5 MW;
    Qmin -100.5 MW;
    status IN_SERVICE;
    object gencost
    {
        model POLYNOMIAL;
        startup 0.0 $;
        shutdown 0.0 $;
        costs "0.0,0.0,0.0";
    };
}
object pypower.powerplant
{
    // CLEARWATER_1: cap=15.0, cf=0.03, units=1
    // CLEARWATER_2: cap=26.0, cf=0.052, units=1
    // COPCO_1: cap=26.0, cf=0.052, units=1
    // COPCO_2: cap=36.0, cf=0.072, units=1
    // FISH_CREEK: cap=11.0, cf=0.022, units=1
    // GREEN_SPRINGS: cap=17.2, cf=0.034, units=1
    // IRON_GATE: cap=19.0, cf=0.038, units=1
    // JOHN_C_BOYLE: cap=98.7, cf=0.196, units=1
    // LEMOLO_2: cap=38.5, cf=0.077, units=1
    // LOST_CREEK: cap=49.0, cf=0.098, units=1
    // PROSPECT_2: cap=32.0, cf=0.064, units=1
    // TOKETEE_FALLS: cap=42.6, cf=0.085, units=1
    name "wecc240_psse_G_4204_HT";
    parent "wecc240_psse_G_4204";
    latitude 42.36;
    longitude -122.8;
    generator HT;
    operating_capacity 411.0 MW;
    startup_cost 0.0;
    shutdown_cost 0.0;
    fixed_cost 200.0;
    variable_cost 0.0;
    scarcity_cost 0.001;
}

object pypower.powerplant
{
    // BIOMASS_ONE_LP: cap=40.0, cf=0.08, units=1
    // DILLARD_COMPLEX: cap=51.5, cf=0.102, units=1
    name "wecc240_psse_G_4204_ST";
    parent "wecc240_psse_G_4204";
    latitude 42.36;
    longitude -122.8;
    generator ST;
    operating_capacity 91.5 MW;
    startup_cost 6500.0;
    shutdown_cost 0.0;
    fixed_cost 1000.0;
    variable_cost 5.0;
    scarcity_cost 0.001;
}

object pypower.gen
{
    name "wecc240_psse_G_4203";
    parent wecc240_psse_N_4203;
    Pmax 652.6 MW;
    Qmax 130.5 MW;
    Qmin -130.5 MW;
    status IN_SERVICE;
    object gencost
    {
        model POLYNOMIAL;
        startup 0.0 $;
        shutdown 0.0 $;
        costs "0.0,0.0,0.0";
    };
}
object pypower.powerplant
{
    // UNIV_OF_OREGON_CENTRAL_POWER_STATION: cap=11.0, cf=0.017, units=1
    name "wecc240_psse_G_4203_CC";
    parent "wecc240_psse_G_4203";
    latitude 44.05;
    longitude -123.1;
    generator CC;
    operating_capacity 11.0 MW;
    startup_cost 35.0;
    shutdown_cost 0.0;
    fixed_cost 500.0;
    variable_cost 50.0;
    scarcity_cost 0.001;
}

object pypower.powerplant
{
    // COVANTA_MARION_INC: cap=13.1, cf=0.02, units=1
    name "wecc240_psse_G_4203_CT";
    parent "wecc240_psse_G_4203";
    latitude 44.05;
    longitude -123.1;
    generator CT;
    operating_capacity 13.1 MW;
    startup_cost 25.0;
    shutdown_cost 0.0;
    fixed_cost 350.0;
    variable_cost 75.0;
    scarcity_cost 0.001;
}

object pypower.powerplant
{
    // BIG_CLIFF: cap=18.0, cf=0.028, units=1
    // COUGAR: cap=26.0, cf=0.04, units=1
    // DETROIT: cap=100.0, cf=0.153, units=1
    // DEXTER: cap=15.0, cf=0.023, units=1
    // FOSTER: cap=20.0, cf=0.031, units=1
    // GREEN_PETER: cap=80.0, cf=0.123, units=1
    // HILLS_CREEK: cap=30.0, cf=0.046, units=1
    // LEMOLO_1: cap=32.0, cf=0.049, units=1
    // LOOKOUT_POINT: cap=120.0, cf=0.184, units=1
    // SLIDE_CREEK: cap=18.0, cf=0.028, units=1
    // SODA_SPRINGS: cap=11.0, cf=0.017, units=1
    // SULLIVAN: cap=15.4, cf=0.024, units=1
    name "wecc240_psse_G_4203_HT";
    parent "wecc240_psse_G_4203";
    latitude 44.05;
    longitude -123.1;
    generator HT;
    operating_capacity 485.4 MW;
    startup_cost 0.0;
    shutdown_cost 0.0;
    fixed_cost 200.0;
    variable_cost 0.0;
    scarcity_cost 0.001;
}

object pypower.powerplant
{
    // EVERGREEN_BIOPOWER_LLC: cap=21.0, cf=0.032, units=1
    // GEORGIA-PACIFIC_TOLEDO_MILL: cap=37.3, cf=0.057, units=1
    // IP_SPRINGFIELD_OREGON: cap=65.0, cf=0.1, units=1
    // SENECA_SUSTAINABLE_ENERGY_LLC: cap=19.8, cf=0.03, units=1
    name "wecc240_psse_G_4203_ST";
    parent "wecc240_psse_G_4203";
    latitude 44.05;
    longitude -123.1;
    generator ST;
    operating_capacity 143.1 MW;
    startup_cost 6500.0;
    shutdown_cost 0.0;
    fixed_cost 1000.0;
    variable_cost 5.0;
    scarcity_cost 0.001;
}

object pypower.gen
{
    name "wecc240_psse_G_4004";
    parent wecc240_psse_N_4004;
    Pmax 702.5 MW;
    Qmax 140.5 MW;
    Qmin -140.5 MW;
    status IN_SERVICE;
    object gencost
    {
        model POLYNOMIAL;
        startup 0.0 $;
        shutdown 0.0 $;
        costs "0.0,0.0,0.0";
    };
}
object pypower.powerplant
{
    // CARMEN_SMITH: cap=114.3, cf=0.163, units=1
    // PELTON: cap=109.8, cf=0.156, units=1
    // ROUND_BUTTE: cap=372.5, cf=0.53, units=1
    // WARM_SPRINGS_POWER_ENTERPRISES: cap=19.6, cf=0.028, units=1
    name "wecc240_psse_G_4004_HT";
    parent "wecc240_psse_G_4004";
    latitude 44.48;
    longitude -121.0;
    generator HT;
    operating_capacity 616.2 MW;
    startup_cost 0.0;
    shutdown_cost 0.0;
    fixed_cost 200.0;
    variable_cost 0.0;
    scarcity_cost 0.001;
}

object pypower.powerplant
{
    // ADAMS_SOLAR_CENTER: cap=10.0, cf=0.014, units=1
    // BEAR_CREEK_SOLAR_CENTER: cap=10.0, cf=0.014, units=1
    // ELBE_SOLAR_CENTER: cap=10.0, cf=0.014, units=1
    // GALA_SOLAR: cap=56.3, cf=0.08, units=1
    name "wecc240_psse_G_4004_PV";
    parent "wecc240_psse_G_4004";
    latitude 44.48;
    longitude -121.0;
    generator PV;
    operating_capacity 86.3 MW;
    startup_cost 0.0;
    shutdown_cost 0.0;
    fixed_cost 0.0;
    variable_cost 0.0;
    scarcity_cost 0.0;
}

object pypower.gen
{
    name "wecc240_psse_G_4003";
    parent wecc240_psse_N_4003;
    Pmax 1788.9 MW;
    Qmax 357.8 MW;
    Qmin -357.8 MW;
    status IN_SERVICE;
    object gencost
    {
        model POLYNOMIAL;
        startup 0.0 $;
        shutdown 0.0 $;
        costs "0.0,0.0,0.0";
    };
}
object pypower.powerplant
{
    // LANGLEY_GULCH_POWER_PLANT: cap=318.5, cf=0.178, units=1
    name "wecc240_psse_G_4003_CC";
    parent "wecc240_psse_G_4003";
    latitude 43.77;
    longitude -118.8;
    generator CC;
    operating_capacity 318.5 MW;
    startup_cost 35.0;
    shutdown_cost 0.0;
    fixed_cost 500.0;
    variable_cost 50.0;
    scarcity_cost 0.001;
}

object pypower.powerplant
{
    // BLACK_CANYON: cap=10.2, cf=0.006, units=1
    // BROWNLEE: cap=675.0, cf=0.377, units=1
    // HELLS_CANYON: cap=391.5, cf=0.219, units=1
    // OXBOW: cap=190.0, cf=0.106, units=1
    name "wecc240_psse_G_4003_HT";
    parent "wecc240_psse_G_4003";
    latitude 43.77;
    longitude -118.8;
    generator HT;
    operating_capacity 1266.7 MW;
    startup_cost 0.0;
    shutdown_cost 0.0;
    fixed_cost 200.0;
    variable_cost 0.0;
    scarcity_cost 0.001;
}

object pypower.powerplant
{
    // OPEN_RANGE_SOLAR_CENTER_LLC: cap=10.0, cf=0.006, units=1
    // THUNDEREGG_SOLAR_CENTER_LLC: cap=10.0, cf=0.006, units=1
    // VALE_AIR_SOLAR_CENTER_LLC: cap=10.0, cf=0.006, units=1
    name "wecc240_psse_G_4003_PV";
    parent "wecc240_psse_G_4003";
    latitude 43.77;
    longitude -118.8;
    generator PV;
    operating_capacity 30.0 MW;
    startup_cost 0.0;
    shutdown_cost 0.0;
    fixed_cost 0.0;
    variable_cost 0.0;
    scarcity_cost 0.0;
}

object pypower.powerplant
{
    // NEAL_HOT_SPRINGS_GEOTHERMAL_PROJECT: cap=33.0, cf=0.018, units=1
    name "wecc240_psse_G_4003_ST";
    parent "wecc240_psse_G_4003";
    latitude 43.77;
    longitude -118.8;
    generator ST;
    operating_capacity 33.0 MW;
    startup_cost 6500.0;
    shutdown_cost 0.0;
    fixed_cost 1000.0;
    variable_cost 5.0;
    scarcity_cost 0.001;
}

object pypower.powerplant
{
    // BENSON_CREEK_WINDFARM_BURNT_RIVER: cap=10.0, cf=0.006, units=1
    // DURBIN_CREEK_WINDFARM_BURNT_CREEK: cap=10.0, cf=0.006, units=1
    // ELKHORN_VALLEY_WIND_FARM: cap=100.7, cf=0.056, units=1
    // JEFF_CREEK_WINDFARM_BURN_RIVER: cap=10.0, cf=0.006, units=1
    // PROSPECTOR_WINDFARM_BURNT_RIVER: cap=10.0, cf=0.006, units=1
    name "wecc240_psse_G_4003_WT";
    parent "wecc240_psse_G_4003";
    latitude 43.77;
    longitude -118.8;
    generator WT;
    operating_capacity 140.7 MW;
    startup_cost 0.0;
    shutdown_cost 0.0;
    fixed_cost 0.0;
    variable_cost 0.0;
    scarcity_cost 0.0;
}

object pypower.gen
{
    name "wecc240_psse_G_6403";
    parent wecc240_psse_N_6403;
    Pmax 45.0 MW;
    Qmax 9.0 MW;
    Qmin -9.0 MW;
    status IN_SERVICE;
    object gencost
    {
        model POLYNOMIAL;
        startup 0.0 $;
        shutdown 0.0 $;
        costs "0.0,0.0,0.0";
    };
}
object pypower.powerplant
{
    // SWAN_FALLS: cap=25.0, cf=0.556, units=1
    name "wecc240_psse_G_6403_HT";
    parent "wecc240_psse_G_6403";
    latitude 41.18;
    longitude -117.0;
    generator HT;
    operating_capacity 25.0 MW;
    startup_cost 0.0;
    shutdown_cost 0.0;
    fixed_cost 200.0;
    variable_cost 0.0;
    scarcity_cost 0.001;
}

object pypower.powerplant
{
    // MURPHY_FLAT_SOLAR: cap=20.0, cf=0.444, units=1
    name "wecc240_psse_G_6403_PV";
    parent "wecc240_psse_G_6403";
    latitude 41.18;
    longitude -117.0;
    generator PV;
    operating_capacity 20.0 MW;
    startup_cost 0.0;
    shutdown_cost 0.0;
    fixed_cost 0.0;
    variable_cost 0.0;
    scarcity_cost 0.0;
}

object pypower.gen
{
    name "wecc240_psse_G_2604";
    parent wecc240_psse_N_2604;
    Pmax 3895.5 MW;
    Qmax 779.1 MW;
    Qmin -779.1 MW;
    status IN_SERVICE;
    object gencost
    {
        model POLYNOMIAL;
        startup 0.0 $;
        shutdown 0.0 $;
        costs "0.0,0.0,0.0";
    };
}
object pypower.powerplant
{
    // INTERMOUNTAIN_POWER_PROJECT: cap=1640.0, cf=0.421, units=1
    name "wecc240_psse_G_2604_CC";
    parent "wecc240_psse_G_2604";
    latitude 39.5;
    longitude -112.6;
    generator CC;
    operating_capacity 1640.0 MW;
    startup_cost 35.0;
    shutdown_cost 0.0;
    fixed_cost 500.0;
    variable_cost 50.0;
    scarcity_cost 0.001;
}

object pypower.powerplant
{
    // ESCALANTE_SOLAR_III_LLC: cap=80.0, cf=0.021, units=1
    // ESCALANTE_SOLAR_II_LLC: cap=80.0, cf=0.021, units=1
    // ESCALANTE_SOLAR_I_LLC: cap=80.0, cf=0.021, units=1
    // PAVANT_SOLAR_III: cap=20.0, cf=0.005, units=1
    // PAVANT_SOLAR_II_LLC: cap=50.0, cf=0.013, units=1
    name "wecc240_psse_G_2604_PV";
    parent "wecc240_psse_G_2604";
    latitude 39.5;
    longitude -112.6;
    generator PV;
    operating_capacity 310.0 MW;
    startup_cost 0.0;
    shutdown_cost 0.0;
    fixed_cost 0.0;
    variable_cost 0.0;
    scarcity_cost 0.0;
}

object pypower.powerplant
{
    // INTERMOUNTAIN_POWER_PROJECT: cap=1640.0, cf=0.421, units=1
    name "wecc240_psse_G_2604_ST";
    parent "wecc240_psse_G_2604";
    latitude 39.5;
    longitude -112.6;
    generator ST;
    operating_capacity 1640.0 MW;
    startup_cost 6500.0;
    shutdown_cost 0.0;
    fixed_cost 1000.0;
    variable_cost 5.0;
    scarcity_cost 0.001;
}

object pypower.powerplant
{
    // MILFORD_WIND_CORRIDOR_I_LLC: cap=203.5, cf=0.052, units=1
    // MILFORD_WIND_CORRIDOR_STAGE_II_LLC: cap=102.0, cf=0.026, units=1
    name "wecc240_psse_G_2604_WT";
    parent "wecc240_psse_G_2604";
    latitude 39.5;
    longitude -112.6;
    generator WT;
    operating_capacity 305.5 MW;
    startup_cost 0.0;
    shutdown_cost 0.0;
    fixed_cost 0.0;
    variable_cost 0.0;
    scarcity_cost 0.0;
}

object pypower.gen
{
    name "wecc240_psse_G_6101";
    parent wecc240_psse_N_6101;
    Pmax 1575.9 MW;
    Qmax 315.2 MW;
    Qmin -315.2 MW;
    status IN_SERVICE;
    object gencost
    {
        model POLYNOMIAL;
        startup 0.0 $;
        shutdown 0.0 $;
        costs "0.0,0.0,0.0";
    };
}
object pypower.powerplant
{
    // BENNETT_MOUNTAIN: cap=172.8, cf=0.11, units=1
    // EVANDER_ANDREWS_POWER_COMPLEX: cap=270.9, cf=0.172, units=1
    name "wecc240_psse_G_6101_CT";
    parent "wecc240_psse_G_6101";
    latitude 42.89;
    longitude -114.2;
    generator CT;
    operating_capacity 443.7 MW;
    startup_cost 25.0;
    shutdown_cost 0.0;
    fixed_cost 350.0;
    variable_cost 75.0;
    scarcity_cost 0.001;
}

object pypower.powerplant
{
    // ANDERSON_RANCH: cap=40.0, cf=0.025, units=1
    // ARROWROCK_HYDROELECTRIC_PROJECT: cap=15.0, cf=0.01, units=1
    // BLISS: cap=75.0, cf=0.048, units=1
    // CASCADE: cap=12.4, cf=0.008, units=1
    // C_J_STRIKE: cap=82.8, cf=0.053, units=1
    // LOWER_MALAD: cap=13.5, cf=0.009, units=1
    // LOWER_SALMON: cap=60.0, cf=0.038, units=1
    // LUCKY_PEAK_POWER_PLANT_PROJECT: cap=101.2, cf=0.064, units=1
    // MILNER_HYDRO: cap=59.5, cf=0.038, units=1
    // SHOSHONE_FALLS: cap=11.5, cf=0.007, units=1
    // TWIN_FALLS: cap=52.7, cf=0.033, units=1
    // UPPER_SALMON_A: cap=18.0, cf=0.011, units=1
    // UPPER_SALMON_B: cap=16.5, cf=0.01, units=1
    name "wecc240_psse_G_6101_HT";
    parent "wecc240_psse_G_6101";
    latitude 42.89;
    longitude -114.2;
    generator HT;
    operating_capacity 558.1 MW;
    startup_cost 0.0;
    shutdown_cost 0.0;
    fixed_cost 200.0;
    variable_cost 0.0;
    scarcity_cost 0.001;
}

object pypower.powerplant
{
    // ID_SOLAR: cap=40.0, cf=0.025, units=1
    // MT_HOME_SOLAR_1_LLC: cap=20.0, cf=0.013, units=1
    // ORCHARD_RANCH_SOLAR: cap=20.0, cf=0.013, units=1
    name "wecc240_psse_G_6101_PV";
    parent "wecc240_psse_G_6101";
    latitude 42.89;
    longitude -114.2;
    generator PV;
    operating_capacity 80.0 MW;
    startup_cost 0.0;
    shutdown_cost 0.0;
    fixed_cost 0.0;
    variable_cost 0.0;
    scarcity_cost 0.0;
}

object pypower.powerplant
{
    // AMALGAMATED_SUGAR_TWIN_FALLS: cap=10.2, cf=0.006, units=1
    name "wecc240_psse_G_6101_ST";
    parent "wecc240_psse_G_6101";
    latitude 42.89;
    longitude -114.2;
    generator ST;
    operating_capacity 10.2 MW;
    startup_cost 6500.0;
    shutdown_cost 0.0;
    fixed_cost 1000.0;
    variable_cost 5.0;
    scarcity_cost 0.001;
}

object pypower.powerplant
{
    // BENNETT_CREEK_WINDFARM_LLC: cap=21.0, cf=0.013, units=1
    // BURLEY_BUTTE_WINDPARK: cap=21.3, cf=0.014, units=1
    // CAMP_REED: cap=22.5, cf=0.014, units=1
    // CASSIA_GULCH_WIND_PARK_LLC: cap=18.9, cf=0.012, units=1
    // CASSIA_WIND_FARM_LLC: cap=10.5, cf=0.007, units=1
    // COLD_SPRINGS_WINDFARM: cap=23.0, cf=0.015, units=1
    // DESERT_MEADOW_WINDFARM: cap=23.0, cf=0.015, units=1
    // FOSSIL_GULCH: cap=10.5, cf=0.007, units=1
    // GOLDEN_VALLEY_WIND_PARK_LLC: cap=12.0, cf=0.008, units=1
    // HAMMETT_HILL_WINDFARM: cap=23.0, cf=0.015, units=1
    // HIGH_MESA_ENERGY_LLC: cap=40.0, cf=0.025, units=1
    // HOT_SPRINGS_WINDFARM_LLC: cap=21.0, cf=0.013, units=1
    // MAINLINE_WINDFARM: cap=23.0, cf=0.015, units=1
    // MILNER_DAM_WIND_PARK_LLC: cap=19.5, cf=0.012, units=1
    // OREGON_TRAIL_WIND_PARK: cap=13.5, cf=0.009, units=1
    // PAYNES_FERRY: cap=21.0, cf=0.013, units=1
    // PILGRIM_STAGE_WIND_PARK: cap=10.5, cf=0.007, units=1
    // RYEGRASS_WINDFARM: cap=23.0, cf=0.015, units=1
    // SALMON_FALLS_WIND_PARK: cap=21.0, cf=0.013, units=1
    // SAWTOOTH_WIND_PROJECT: cap=22.4, cf=0.014, units=1
    // THOUSAND_SPRINGS_WIND_PARK: cap=12.0, cf=0.008, units=1
    // TUANA_GULCH_WIND_PARK: cap=10.5, cf=0.007, units=1
    // TUANA_SPRINGS: cap=16.8, cf=0.011, units=1
    // TWO_PONDS_WINDFARM: cap=23.0, cf=0.015, units=1
    // YAHOO_CREEK: cap=21.0, cf=0.013, units=1
    name "wecc240_psse_G_6101_WT";
    parent "wecc240_psse_G_6101";
    latitude 42.89;
    longitude -114.2;
    generator WT;
    operating_capacity 483.9 MW;
    startup_cost 0.0;
    shutdown_cost 0.0;
    fixed_cost 0.0;
    variable_cost 0.0;
    scarcity_cost 0.0;
}

object pypower.gen
{
    name "wecc240_psse_G_6103";
    parent wecc240_psse_N_6103;
    Pmax 687.9 MW;
    Qmax 137.6 MW;
    Qmin -137.6 MW;
    status IN_SERVICE;
    object gencost
    {
        model POLYNOMIAL;
        startup 0.0 $;
        shutdown 0.0 $;
        costs "0.0,0.0,0.0";
    };
}
object pypower.powerplant
{
    // SIMPLOT_LEASING_DON_PLANT: cap=15.9, cf=0.023, units=1
    name "wecc240_psse_G_6103_CT";
    parent "wecc240_psse_G_6103";
    latitude 42.83;
    longitude -113.4;
    generator CT;
    operating_capacity 15.9 MW;
    startup_cost 25.0;
    shutdown_cost 0.0;
    fixed_cost 350.0;
    variable_cost 75.0;
    scarcity_cost 0.001;
}

object pypower.powerplant
{
    // AMERICAN_FALLS: cap=92.4, cf=0.134, units=1
    // GEM_STATE: cap=23.4, cf=0.034, units=1
    // MINIDOKA: cap=27.7, cf=0.04, units=1
    name "wecc240_psse_G_6103_HT";
    parent "wecc240_psse_G_6103";
    latitude 42.83;
    longitude -113.4;
    generator HT;
    operating_capacity 143.5 MW;
    startup_cost 0.0;
    shutdown_cost 0.0;
    fixed_cost 200.0;
    variable_cost 0.0;
    scarcity_cost 0.001;
}

object pypower.powerplant
{
    // AMERICAN_FALLS_SOLAR: cap=20.0, cf=0.029, units=1
    name "wecc240_psse_G_6103_PV";
    parent "wecc240_psse_G_6103";
    latitude 42.83;
    longitude -113.4;
    generator PV;
    operating_capacity 20.0 MW;
    startup_cost 0.0;
    shutdown_cost 0.0;
    fixed_cost 0.0;
    variable_cost 0.0;
    scarcity_cost 0.0;
}

object pypower.powerplant
{
    // RAFT_RIVER_GEOTHERMAL_POWER_PLANT: cap=18.0, cf=0.026, units=1
    name "wecc240_psse_G_6103_ST";
    parent "wecc240_psse_G_6103";
    latitude 42.83;
    longitude -113.4;
    generator ST;
    operating_capacity 18.0 MW;
    startup_cost 6500.0;
    shutdown_cost 0.0;
    fixed_cost 1000.0;
    variable_cost 5.0;
    scarcity_cost 0.001;
}

object pypower.powerplant
{
    // GOSHEN_PHASE_II: cap=124.5, cf=0.181, units=1
    // HORSE_BUTTE_WIND_I_LLC: cap=57.6, cf=0.084, units=1
    // MEADOW_CREEK_PROJECT_COMPANY: cap=119.7, cf=0.174, units=1
    // POWER_COUNTY_WIND_PARK_NORTH: cap=22.5, cf=0.033, units=1
    // POWER_COUNTY_WIND_PARK_SOUTH: cap=22.5, cf=0.033, units=1
    // ROCKLAND_WIND_FARM: cap=79.2, cf=0.115, units=1
    // WOLVERINE_CREEK: cap=64.5, cf=0.094, units=1
    name "wecc240_psse_G_6103_WT";
    parent "wecc240_psse_G_6103";
    latitude 42.83;
    longitude -113.4;
    generator WT;
    operating_capacity 490.5 MW;
    startup_cost 0.0;
    shutdown_cost 0.0;
    fixed_cost 0.0;
    variable_cost 0.0;
    scarcity_cost 0.0;
}

object pypower.gen
{
    name "wecc240_psse_G_1402";
    parent wecc240_psse_N_1402;
    Pmax 13830.0 MW;
    Qmax 2766.0 MW;
    Qmin -2766.0 MW;
    status IN_SERVICE;
    object gencost
    {
        model POLYNOMIAL;
        startup 0.0 $;
        shutdown 0.0 $;
        costs "0.0,0.0,0.0";
    };
}
object pypower.powerplant
{
    // DESERT_BASIN: cap=646.1, cf=0.047, units=1
    // KYRENE: cap=573.7, cf=0.041, units=1
    // SANTAN: cap=1326.0, cf=0.096, units=1
    // WEST_PHOENIX: cap=1207.4, cf=0.087, units=1
    name "wecc240_psse_G_1402_CC";
    parent "wecc240_psse_G_1402";
    latitude 34.07;
    longitude -112.4;
    generator CC;
    operating_capacity 3753.2 MW;
    startup_cost 35.0;
    shutdown_cost 0.0;
    fixed_cost 500.0;
    variable_cost 50.0;
    scarcity_cost 0.001;
}

object pypower.powerplant
{
    // AGUA_FRIA: cap=613.5, cf=0.044, units=1
    // COOLIDGE_GENERATION_STATION: cap=726.0, cf=0.052, units=1
    // DEMOSS_PETRIE: cap=85.0, cf=0.006, units=1
    // H_WILSON_SUNDT_GENERATING_STATION: cap=558.5, cf=0.04, units=1
    // KYRENE: cap=573.7, cf=0.041, units=1
    // NORTH_LOOP: cap=107.8, cf=0.008, units=1
    // OCOTILLO: cap=333.4, cf=0.024, units=1
    // SAGUARO: cap=184.5, cf=0.013, units=1
    // SUNDANCE: cap=605.0, cf=0.044, units=1
    // WEST_PHOENIX: cap=1207.4, cf=0.087, units=1
    name "wecc240_psse_G_1402_CT";
    parent "wecc240_psse_G_1402";
    latitude 34.07;
    longitude -112.4;
    generator CT;
    operating_capacity 4994.8 MW;
    startup_cost 25.0;
    shutdown_cost 0.0;
    fixed_cost 350.0;
    variable_cost 75.0;
    scarcity_cost 0.001;
}

object pypower.powerplant
{
    // IRON_HORSE_BATTERY_STORAGE: cap=12.0, cf=0.001, units=1
    // PIMA_ENERGY_STORAGE_SYSTEM: cap=10.0, cf=0.001, units=1
    name "wecc240_psse_G_1402_ES";
    parent "wecc240_psse_G_1402";
    latitude 34.07;
    longitude -112.4;
    generator ES;
    operating_capacity 22.0 MW;
    startup_cost 0.0;
    shutdown_cost 0.0;
    fixed_cost 0.0;
    variable_cost 5.0;
    scarcity_cost 0.0;
}

object pypower.powerplant
{
    // HORSE_MESA: cap=129.5, cf=0.009, units=1
    // MORMON_FLAT: cap=63.5, cf=0.005, units=1
    // ROOSEVELT: cap=36.0, cf=0.003, units=1
    // STEWART_MOUNTAIN: cap=13.0, cf=0.001, units=1
    // WADDELL: cap=40.0, cf=0.003, units=1
    name "wecc240_psse_G_1402_HT";
    parent "wecc240_psse_G_1402";
    latitude 34.07;
    longitude -112.4;
    generator HT;
    operating_capacity 282.0 MW;
    startup_cost 0.0;
    shutdown_cost 0.0;
    fixed_cost 200.0;
    variable_cost 0.0;
    scarcity_cost 0.001;
}

object pypower.powerplant
{
    // AGUA_FRIA: cap=613.5, cf=0.044, units=1
    // AVALON_SOLAR: cap=29.0, cf=0.002, units=1
    // AVALON_SOLAR_II: cap=16.0, cf=0.001, units=1
    // AVRA_VALLEY_SOLAR: cap=26.5, cf=0.002, units=1
    // BONNYBROOKE_PV: cap=50.0, cf=0.004, units=1
    // CHINO_SOLAR_VALLEY: cap=19.0, cf=0.001, units=1
    // COPPER_CROSSING_SOLAR_LLC: cap=20.0, cf=0.001, units=1
    // DAVIS_MONTHAN_AFB_AZ_WEST_AIRFIELD: cap=12.6, cf=0.001, units=1
    // FORT_HUACHUCA_SOLAR_PV_PROJECT: cap=13.6, cf=0.001, units=1
    // IRON_HORSE_BATTERY_STORAGE: cap=12.0, cf=0.001, units=1
    // OCOTILLO: cap=333.4, cf=0.024, units=1
    // PICTURE_ROCKS_SOLAR_LLC: cap=20.0, cf=0.001, units=1
    // PRESCOTT_SOLAR_PLANT: cap=10.8, cf=0.001, units=1
    // QUEEN_CREEK_SOLAR_FARM: cap=19.0, cf=0.001, units=1
    // RED_ROCK: cap=40.0, cf=0.003, units=1
    // RE_BAGDAD_SOLAR_I_LLC: cap=16.6, cf=0.001, units=1
    // SANDSTONE_SOLAR: cap=45.0, cf=0.003, units=1
    // VALENCIA_SOLAR: cap=10.0, cf=0.001, units=1
    name "wecc240_psse_G_1402_PV";
    parent "wecc240_psse_G_1402";
    latitude 34.07;
    longitude -112.4;
    generator PV;
    operating_capacity 1307.0 MW;
    startup_cost 0.0;
    shutdown_cost 0.0;
    fixed_cost 0.0;
    variable_cost 0.0;
    scarcity_cost 0.0;
}

object pypower.powerplant
{
    // AGUA_FRIA: cap=613.5, cf=0.044, units=1
    // H_WILSON_SUNDT_GENERATING_STATION: cap=558.5, cf=0.04, units=1
    // KYRENE: cap=573.7, cf=0.041, units=1
    // OCOTILLO: cap=333.4, cf=0.024, units=1
    // SAGUARO: cap=184.5, cf=0.013, units=1
    // WEST_PHOENIX: cap=1207.4, cf=0.087, units=1
    name "wecc240_psse_G_1402_ST";
    parent "wecc240_psse_G_1402";
    latitude 34.07;
    longitude -112.4;
    generator ST;
    operating_capacity 3471.0 MW;
    startup_cost 6500.0;
    shutdown_cost 0.0;
    fixed_cost 1000.0;
    variable_cost 5.0;
    scarcity_cost 0.001;
}

object pypower.gen
{
    name "wecc240_psse_G_1102";
    parent wecc240_psse_N_1102;
    Pmax 2644.7 MW;
    Qmax 528.9 MW;
    Qmin -528.9 MW;
    status IN_SERVICE;
    object gencost
    {
        model POLYNOMIAL;
        startup 0.0 $;
        shutdown 0.0 $;
        costs "0.0,0.0,0.0";
    };
}
object pypower.powerplant
{
    // APACHE_STATION: cap=660.7, cf=0.25, units=1
    name "wecc240_psse_G_1102_CT";
    parent "wecc240_psse_G_1102";
    latitude 34.94;
    longitude -110.3;
    generator CT;
    operating_capacity 660.7 MW;
    startup_cost 25.0;
    shutdown_cost 0.0;
    fixed_cost 350.0;
    variable_cost 75.0;
    scarcity_cost 0.001;
}

object pypower.powerplant
{
    // APACHE_SOLAR_1: cap=90.0, cf=0.034, units=1
    // RED_HORSE_2: cap=81.0, cf=0.031, units=1
    // RED_HORSE_III: cap=30.0, cf=0.011, units=1
    // SULPHUR_SPRINGS: cap=20.0, cf=0.008, units=1
    name "wecc240_psse_G_1102_PV";
    parent "wecc240_psse_G_1102";
    latitude 34.94;
    longitude -110.3;
    generator PV;
    operating_capacity 221.0 MW;
    startup_cost 0.0;
    shutdown_cost 0.0;
    fixed_cost 0.0;
    variable_cost 0.0;
    scarcity_cost 0.0;
}

object pypower.powerplant
{
    // APACHE_STATION: cap=660.7, cf=0.25, units=1
    // CHOLLA: cap=839.9, cf=0.318, units=1
    // DOUGLAS: cap=26.1, cf=0.01, units=1
    // NOVO_BIOPOWER_PLANT: cap=27.2, cf=0.01, units=1
    name "wecc240_psse_G_1102_ST";
    parent "wecc240_psse_G_1102";
    latitude 34.94;
    longitude -110.3;
    generator ST;
    operating_capacity 1553.9 MW;
    startup_cost 6500.0;
    shutdown_cost 0.0;
    fixed_cost 1000.0;
    variable_cost 5.0;
    scarcity_cost 0.001;
}

object pypower.powerplant
{
    // DRY_LAKE_WIND_II_LLC: cap=65.1, cf=0.025, units=1
    // DRY_LAKE_WIND_LLC: cap=63.0, cf=0.024, units=1
    // RED_HORSE_2: cap=81.0, cf=0.031, units=1
    name "wecc240_psse_G_1102_WT";
    parent "wecc240_psse_G_1102";
    latitude 34.94;
    longitude -110.3;
    generator WT;
    operating_capacity 209.1 MW;
    startup_cost 0.0;
    shutdown_cost 0.0;
    fixed_cost 0.0;
    variable_cost 0.0;
    scarcity_cost 0.0;
}

object pypower.gen
{
    name "wecc240_psse_G_1101";
    parent wecc240_psse_N_1101;
    Pmax 6508.9 MW;
    Qmax 1301.8 MW;
    Qmin -1301.8 MW;
    status IN_SERVICE;
    object gencost
    {
        model POLYNOMIAL;
        startup 0.0 $;
        shutdown 0.0 $;
        costs "0.0,0.0,0.0";
    };
}
object pypower.powerplant
{
    // AFTON_GENERATING_STATION: cap=287.0, cf=0.044, units=1
    // LUNA_ENERGY_FACILITY: cap=650.0, cf=0.1, units=1
    name "wecc240_psse_G_1101_CC";
    parent "wecc240_psse_G_1101";
    latitude 35.13;
    longitude -109.7;
    generator CC;
    operating_capacity 937.0 MW;
    startup_cost 35.0;
    shutdown_cost 0.0;
    fixed_cost 500.0;
    variable_cost 50.0;
    scarcity_cost 0.001;
}

object pypower.powerplant
{
    // LORDSBURG_GENERATING: cap=88.0, cf=0.014, units=1
    // PYRAMID: cap=186.0, cf=0.029, units=1
    // RIO_GRANDE: cap=372.5, cf=0.057, units=1
    name "wecc240_psse_G_1101_CT";
    parent "wecc240_psse_G_1101";
    latitude 35.13;
    longitude -109.7;
    generator CT;
    operating_capacity 646.5 MW;
    startup_cost 25.0;
    shutdown_cost 0.0;
    fixed_cost 350.0;
    variable_cost 75.0;
    scarcity_cost 0.001;
}

object pypower.powerplant
{
    // ELEPHANT_BUTTE: cap=27.9, cf=0.004, units=1
    name "wecc240_psse_G_1101_HT";
    parent "wecc240_psse_G_1101";
    latitude 35.13;
    longitude -109.7;
    generator HT;
    operating_capacity 27.9 MW;
    startup_cost 0.0;
    shutdown_cost 0.0;
    fixed_cost 200.0;
    variable_cost 0.0;
    scarcity_cost 0.001;
}

object pypower.powerplant
{
    // MACHO_SPRINGS: cap=52.2, cf=0.008, units=1
    // ROADRUNNER_SOLAR: cap=20.2, cf=0.003, units=1
    // SPRINGERVILLE: cap=1779.2, cf=0.273, units=1
    // SUNE_EPE1_LLC: cap=10.0, cf=0.002, units=1
    // SUNE_EPE2_LLC: cap=12.0, cf=0.002, units=1
    name "wecc240_psse_G_1101_PV";
    parent "wecc240_psse_G_1101";
    latitude 35.13;
    longitude -109.7;
    generator PV;
    operating_capacity 1873.6 MW;
    startup_cost 0.0;
    shutdown_cost 0.0;
    fixed_cost 0.0;
    variable_cost 0.0;
    scarcity_cost 0.0;
}

object pypower.powerplant
{
    // CORONADO: cap=821.8, cf=0.126, units=1
    // RIO_GRANDE: cap=372.5, cf=0.057, units=1
    // SPRINGERVILLE: cap=1779.2, cf=0.273, units=1
    name "wecc240_psse_G_1101_ST";
    parent "wecc240_psse_G_1101";
    latitude 35.13;
    longitude -109.7;
    generator ST;
    operating_capacity 2973.5 MW;
    startup_cost 6500.0;
    shutdown_cost 0.0;
    fixed_cost 1000.0;
    variable_cost 5.0;
    scarcity_cost 0.001;
}

object pypower.powerplant
{
    // MACHO_SPRINGS_POWER_I: cap=50.4, cf=0.008, units=1
    name "wecc240_psse_G_1101_WT";
    parent "wecc240_psse_G_1101";
    latitude 35.13;
    longitude -109.7;
    generator WT;
    operating_capacity 50.4 MW;
    startup_cost 0.0;
    shutdown_cost 0.0;
    fixed_cost 0.0;
    variable_cost 0.0;
    scarcity_cost 0.0;
}

object pypower.gen
{
    name "wecc240_psse_G_1201";
    parent wecc240_psse_N_1201;
    Pmax 99.2 MW;
    Qmax 19.8 MW;
    Qmin -19.8 MW;
    status IN_SERVICE;
    object gencost
    {
        model POLYNOMIAL;
        startup 0.0 $;
        shutdown 0.0 $;
        costs "0.0,0.0,0.0";
    };
}
object pypower.powerplant
{
    // PERRIN_RANCH_WIND_LLC: cap=99.2, cf=1.0, units=1
    name "wecc240_psse_G_1201_WT";
    parent "wecc240_psse_G_1201";
    latitude 35.98;
    longitude -111.1;
    generator WT;
    operating_capacity 99.2 MW;
    startup_cost 0.0;
    shutdown_cost 0.0;
    fixed_cost 0.0;
    variable_cost 0.0;
    scarcity_cost 0.0;
}

object pypower.gen
{
    name "wecc240_psse_G_1202";
    parent wecc240_psse_N_1202;
    Pmax 1339.3 MW;
    Qmax 267.9 MW;
    Qmin -267.9 MW;
    status IN_SERVICE;
    object gencost
    {
        model POLYNOMIAL;
        startup 0.0 $;
        shutdown 0.0 $;
        costs "0.0,0.0,0.0";
    };
}
object pypower.powerplant
{
    // GLEN_CANYON_DAM: cap=1312.0, cf=0.98, units=1
    name "wecc240_psse_G_1202_HT";
    parent "wecc240_psse_G_1202";
    latitude 36.96;
    longitude -110.9;
    generator HT;
    operating_capacity 1312.0 MW;
    startup_cost 0.0;
    shutdown_cost 0.0;
    fixed_cost 200.0;
    variable_cost 0.0;
    scarcity_cost 0.001;
}

object pypower.powerplant
{
    // KAYENTA_SOLAR_PROJECT: cap=27.3, cf=0.02, units=1
    name "wecc240_psse_G_1202_PV";
    parent "wecc240_psse_G_1202";
    latitude 36.96;
    longitude -110.9;
    generator PV;
    operating_capacity 27.3 MW;
    startup_cost 0.0;
    shutdown_cost 0.0;
    fixed_cost 0.0;
    variable_cost 0.0;
    scarcity_cost 0.0;
}

object pypower.gen
{
    name "wecc240_psse_G_6507";
    parent wecc240_psse_N_6507;
    Pmax 1921.4 MW;
    Qmax 384.3 MW;
    Qmin -384.3 MW;
    status IN_SERVICE;
    object gencost
    {
        model POLYNOMIAL;
        startup 0.0 $;
        shutdown 0.0 $;
        costs "0.0,0.0,0.0";
    };
}
object pypower.powerplant
{
    // GRANITE_MOUNTAIN_SOLAR_WEST_LLC: cap=50.4, cf=0.026, units=1
    // PAVANT_SOLAR_LLC: cap=50.0, cf=0.026, units=1
    // THREE_PEAKS_POWER: cap=80.0, cf=0.042, units=1
    // UTAH_RED_HILLS_RENEWABLE_ENERGY_PARK: cap=80.0, cf=0.042, units=1
    name "wecc240_psse_G_6507_PV";
    parent "wecc240_psse_G_6507";
    latitude 38.89;
    longitude -111.9;
    generator PV;
    operating_capacity 260.4 MW;
    startup_cost 0.0;
    shutdown_cost 0.0;
    fixed_cost 0.0;
    variable_cost 0.0;
    scarcity_cost 0.0;
}

object pypower.powerplant
{
    // BLUNDELL: cap=44.8, cf=0.023, units=1
    // ENEL_COVE_FORT: cap=25.0, cf=0.013, units=1
    // HUNTER: cap=1577.2, cf=0.821, units=1
    // THERMO_NO_1: cap=14.0, cf=0.007, units=1
    name "wecc240_psse_G_6507_ST";
    parent "wecc240_psse_G_6507";
    latitude 38.89;
    longitude -111.9;
    generator ST;
    operating_capacity 1661.0 MW;
    startup_cost 6500.0;
    shutdown_cost 0.0;
    fixed_cost 1000.0;
    variable_cost 5.0;
    scarcity_cost 0.001;
}

object pypower.gen
{
    name "wecc240_psse_G_1001";
    parent wecc240_psse_N_1001;
    Pmax 3947.9 MW;
    Qmax 789.6 MW;
    Qmin -789.6 MW;
    status IN_SERVICE;
    object gencost
    {
        model POLYNOMIAL;
        startup 0.0 $;
        shutdown 0.0 $;
        costs "0.0,0.0,0.0";
    };
}
object pypower.powerplant
{
    // VALENCIA_ENERGY_FACILITY: cap=159.5, cf=0.04, units=1
    name "wecc240_psse_G_1001_CC";
    parent "wecc240_psse_G_1001";
    latitude 36.67;
    longitude -108.6;
    generator CC;
    operating_capacity 159.5 MW;
    startup_cost 35.0;
    shutdown_cost 0.0;
    fixed_cost 500.0;
    variable_cost 50.0;
    scarcity_cost 0.001;
}

object pypower.powerplant
{
    // LA_LUZ_ENERGY_CENTER: cap=42.3, cf=0.011, units=1
    // VALENCIA_ENERGY_FACILITY: cap=159.5, cf=0.04, units=1
    name "wecc240_psse_G_1001_CT";
    parent "wecc240_psse_G_1001";
    latitude 36.67;
    longitude -108.6;
    generator CT;
    operating_capacity 201.8 MW;
    startup_cost 25.0;
    shutdown_cost 0.0;
    fixed_cost 350.0;
    variable_cost 75.0;
    scarcity_cost 0.001;
}

object pypower.powerplant
{
    // FOUR_CORNERS: cap=1636.2, cf=0.414, units=1
    // SAN_JUAN: cap=1848.0, cf=0.468, units=1
    name "wecc240_psse_G_1001_ST";
    parent "wecc240_psse_G_1001";
    latitude 36.67;
    longitude -108.6;
    generator ST;
    operating_capacity 3484.2 MW;
    startup_cost 6500.0;
    shutdown_cost 0.0;
    fixed_cost 1000.0;
    variable_cost 5.0;
    scarcity_cost 0.001;
}

object pypower.powerplant
{
    // RED_MESA_WIND_LLC: cap=102.4, cf=0.026, units=1
    name "wecc240_psse_G_1001_WT";
    parent "wecc240_psse_G_1001";
    latitude 36.67;
    longitude -108.6;
    generator WT;
    operating_capacity 102.4 MW;
    startup_cost 0.0;
    shutdown_cost 0.0;
    fixed_cost 0.0;
    variable_cost 0.0;
    scarcity_cost 0.0;
}

object pypower.gen
{
    name "wecc240_psse_G_1004";
    parent wecc240_psse_N_1004;
    Pmax 855.3 MW;
    Qmax 171.1 MW;
    Qmin -171.1 MW;
    status IN_SERVICE;
    object gencost
    {
        model POLYNOMIAL;
        startup 0.0 $;
        shutdown 0.0 $;
        costs "0.0,0.0,0.0";
    };
}
object pypower.powerplant
{
    // BLUFFVIEW: cap=67.0, cf=0.078, units=1
    name "wecc240_psse_G_1004_CC";
    parent "wecc240_psse_G_1004";
    latitude 36.91;
    longitude -108.3;
    generator CC;
    operating_capacity 67.0 MW;
    startup_cost 35.0;
    shutdown_cost 0.0;
    fixed_cost 500.0;
    variable_cost 50.0;
    scarcity_cost 0.001;
}

object pypower.powerplant
{
    // FORD_UTILITIES_CENTER: cap=14.8, cf=0.017, units=1
    // RIO_BRAVO: cap=150.0, cf=0.175, units=1
    name "wecc240_psse_G_1004_CT";
    parent "wecc240_psse_G_1004";
    latitude 36.91;
    longitude -108.3;
    generator CT;
    operating_capacity 164.8 MW;
    startup_cost 25.0;
    shutdown_cost 0.0;
    fixed_cost 350.0;
    variable_cost 75.0;
    scarcity_cost 0.001;
}

object pypower.powerplant
{
    // ABIQUIU_DAM: cap=15.6, cf=0.018, units=1
    // BLUE_MESA: cap=86.4, cf=0.101, units=1
    // CRYSTAL: cap=28.0, cf=0.033, units=1
    // MORROW_POINT: cap=173.2, cf=0.203, units=1
    // NAVAJO_DAM: cap=30.0, cf=0.035, units=1
    // TOWAOC: cap=11.4, cf=0.013, units=1
    name "wecc240_psse_G_1004_HT";
    parent "wecc240_psse_G_1004";
    latitude 36.91;
    longitude -108.3;
    generator HT;
    operating_capacity 344.6 MW;
    startup_cost 0.0;
    shutdown_cost 0.0;
    fixed_cost 200.0;
    variable_cost 0.0;
    scarcity_cost 0.001;
}

object pypower.powerplant
{
    // SPS5_HOPI: cap=10.1, cf=0.012, units=1
    name "wecc240_psse_G_1004_PV";
    parent "wecc240_psse_G_1004";
    latitude 36.91;
    longitude -108.3;
    generator PV;
    operating_capacity 10.1 MW;
    startup_cost 0.0;
    shutdown_cost 0.0;
    fixed_cost 0.0;
    variable_cost 0.0;
    scarcity_cost 0.0;
}

object pypower.powerplant
{
    // FORD_UTILITIES_CENTER: cap=14.8, cf=0.017, units=1
    // REEVES: cap=154.0, cf=0.18, units=1
    name "wecc240_psse_G_1004_ST";
    parent "wecc240_psse_G_1004";
    latitude 36.91;
    longitude -108.3;
    generator ST;
    operating_capacity 168.8 MW;
    startup_cost 6500.0;
    shutdown_cost 0.0;
    fixed_cost 1000.0;
    variable_cost 5.0;
    scarcity_cost 0.001;
}

object pypower.powerplant
{
    // HIGH_LONESOME_MESA_LLC: cap=100.0, cf=0.117, units=1
    name "wecc240_psse_G_1004_WT";
    parent "wecc240_psse_G_1004";
    latitude 36.91;
    longitude -108.3;
    generator WT;
    operating_capacity 100.0 MW;
    startup_cost 0.0;
    shutdown_cost 0.0;
    fixed_cost 0.0;
    variable_cost 0.0;
    scarcity_cost 0.0;
}

object pypower.gen
{
    name "wecc240_psse_G_7001";
    parent wecc240_psse_N_7001;
    Pmax 15252.6 MW;
    Qmax 3050.5 MW;
    Qmin -3050.5 MW;
    status IN_SERVICE;
    object gencost
    {
        model POLYNOMIAL;
        startup 0.0 $;
        shutdown 0.0 $;
        costs "0.0,0.0,0.0";
    };
}
object pypower.powerplant
{
    // ARAPAHOE_COMBUSTION_TURBINE_PROJECT: cap=194.0, cf=0.013, units=1
    // BRUSH_GENERATION_FACILITY: cap=297.2, cf=0.019, units=1
    // CHEROKEE: cap=1006.4, cf=0.066, units=1
    // FRONT_RANGE_POWER_PLANT: cap=554.3, cf=0.036, units=1
    // HOBBS_GENERATING_STATION: cap=665.6, cf=0.044, units=1
    // PUEBLO_AIRPORT_GENERATING_STATION: cap=440.0, cf=0.029, units=1
    // ROCKY_MOUNTAIN_ENERGY_CENTER: cap=685.1, cf=0.045, units=1
    name "wecc240_psse_G_7001_CC";
    parent "wecc240_psse_G_7001";
    latitude 38.54;
    longitude -104.7;
    generator CC;
    operating_capacity 3842.6 MW;
    startup_cost 35.0;
    shutdown_cost 0.0;
    fixed_cost 500.0;
    variable_cost 50.0;
    scarcity_cost 0.001;
}

object pypower.powerplant
{
    // ALAMOSA: cap=53.2, cf=0.003, units=1
    // BLUE_SPRUCE_ENERGY_CENTER: cap=397.8, cf=0.026, units=1
    // BRUSH_GENERATION_FACILITY: cap=297.2, cf=0.019, units=1
    // CUNNINGHAM: cap=519.2, cf=0.034, units=1
    // FOUNTAIN_VALLEY_POWER_FACILITY: cap=228.0, cf=0.015, units=1
    // FRANK_KNUTSON: cap=154.2, cf=0.01, units=1
    // HOBBS_GENERATING_STATION: cap=665.6, cf=0.044, units=1
    // LIMON_GENERATING_STATION: cap=154.2, cf=0.01, units=1
    // MADDOX: cap=212.0, cf=0.014, units=1
    // MANCHIEF_ELECTRIC_GENERATING_STATION: cap=300.0, cf=0.02, units=1
    // MARTIN_DRAKE: cap=207.3, cf=0.014, units=1
    // PUEBLO_AIRPORT_GENERATING_STATION: cap=440.0, cf=0.029, units=1
    // RAY_D_NIXON: cap=282.6, cf=0.019, units=1
    name "wecc240_psse_G_7001_CT";
    parent "wecc240_psse_G_7001";
    latitude 38.54;
    longitude -104.7;
    generator CT;
    operating_capacity 3911.3 MW;
    startup_cost 25.0;
    shutdown_cost 0.0;
    fixed_cost 350.0;
    variable_cost 75.0;
    scarcity_cost 0.001;
}
object pypower.powerplant
{
    // CABIN_CREEK: cap=300.0, cf=0.02, units=1
    // MOUNT_ELBERT: cap=200.0, cf=0.013, units=1
    // TESLA: cap=26.6, cf=0.002, units=1
    name "wecc240_psse_G_7001_HT";
    parent "wecc240_psse_G_7001";
    latitude 38.54;
    longitude -104.7;
    generator HT;
    operating_capacity 526.6 MW;
    startup_cost 0.0;
    shutdown_cost 0.0;
    fixed_cost 200.0;
    variable_cost 0.0;
    scarcity_cost 0.001;
}

object pypower.powerplant
{
    // LCEC_GENERATION_LLVC: cap=46.5, cf=0.003, units=1
    // PLAINS_END: cap=114.0, cf=0.007, units=1
    // PLAINS_END_II_LLC: cap=117.6, cf=0.008, units=1
    name "wecc240_psse_G_7001_IC";
    parent "wecc240_psse_G_7001";
    latitude 38.54;
    longitude -104.7;
    generator IC;
    operating_capacity 278.1 MW;
    startup_cost 0.0;
    shutdown_cost 0.0;
    fixed_cost 0.0;
    variable_cost 50.0;
    scarcity_cost 0.001;
}

object pypower.powerplant
{
    // CIMARRON_SOLAR_FACILITY: cap=30.6, cf=0.002, units=1
    // COGENTRIX_OF_ALAMOSA: cap=30.0, cf=0.002, units=1
    // COMANCHE_SOLAR: cap=120.0, cf=0.008, units=1
    // GRAZING_YAK_SOLAR: cap=35.0, cf=0.002, units=1
    // GREATER_SANDHILL_I: cap=19.0, cf=0.001, units=1
    // SAN_LUIS_VALLEY_SOLAR_RANCH: cap=35.0, cf=0.002, units=1
    // SPS1_DOLLARHIDE: cap=10.0, cf=0.001, units=1
    // SPS2_JAL: cap=10.0, cf=0.001, units=1
    // SPS3_LEA: cap=10.0, cf=0.001, units=1
    // SPS4_MONUMENT: cap=10.1, cf=0.001, units=1
    name "wecc240_psse_G_7001_PV";
    parent "wecc240_psse_G_7001";
    latitude 38.54;
    longitude -104.7;
    generator PV;
    operating_capacity 309.7 MW;
    startup_cost 0.0;
    shutdown_cost 0.0;
    fixed_cost 0.0;
    variable_cost 0.0;
    scarcity_cost 0.0;
}

object pypower.powerplant
{
    // AIRPORT_INDUSTRIAL: cap=10.0, cf=0.001, units=1
    // CHEROKEE: cap=1006.4, cf=0.066, units=1
    // COLORADO_ENERGY_NATIONS_COMPANY: cap=35.0, cf=0.002, units=1
    // COMANCHE: cap=1635.3, cf=0.107, units=1
    // CUNNINGHAM: cap=519.2, cf=0.034, units=1
    // GEORGE_BIRDSALL: cap=61.1, cf=0.004, units=1
    // MADDOX: cap=212.0, cf=0.014, units=1
    // MARTIN_DRAKE: cap=207.3, cf=0.014, units=1
    // METRO_WASTEWATER_RECLAMATION_DISTRICT: cap=15.0, cf=0.001, units=1
    // PAWNEE: cap=552.3, cf=0.036, units=1
    // QUAY_COUNTY: cap=27.0, cf=0.002, units=1
    // RAY_D_NIXON: cap=282.6, cf=0.019, units=1
    // ROCKY_FORD: cap=10.0, cf=0.001, units=1
    name "wecc240_psse_G_7001_ST";
    parent "wecc240_psse_G_7001";
    latitude 38.54;
    longitude -104.7;
    generator ST;
    operating_capacity 4573.2 MW;
    startup_cost 6500.0;
    shutdown_cost 0.0;
    fixed_cost 1000.0;
    variable_cost 5.0;
    scarcity_cost 0.001;
}

object pypower.powerplant
{
    // ARAGONNE_WIND_LLC: cap=90.0, cf=0.006, units=1
    // BUSCH_RANCH_II_WIND_FARM: cap=59.4, cf=0.004, units=1
    // BUSCH_RANCH_WIND_ENERGY_FARM: cap=29.0, cf=0.002, units=1
    // CAPROCK_WIND_FARM: cap=80.0, cf=0.005, units=1
    // CEDAR_POINT_WIND: cap=252.0, cf=0.017, units=1
    // COLORADO_GREEN_HOLDINGS_LLC: cap=162.0, cf=0.011, units=1
    // KIT_CARSON_WINDPOWER: cap=51.0, cf=0.003, units=1
    // LIMON_III_WIND_LLC: cap=200.6, cf=0.013, units=1
    // LIMON_WIND_I: cap=200.0, cf=0.013, units=1
    // LIMON_WIND_II: cap=200.0, cf=0.013, units=1
    // NEW_MEXICO_WIND_ENERGY_CENTER: cap=204.0, cf=0.013, units=1
    // PEAK_VIEW_WIND_FARM: cap=60.8, cf=0.004, units=1
    // SAN_JUAN_MESA: cap=120.0, cf=0.008, units=1
    // TWIN_BUTTES_WIND_PROJECT: cap=75.0, cf=0.005, units=1
    // WILDCAT_WIND: cap=27.3, cf=0.002, units=1
    name "wecc240_psse_G_7001_WT";
    parent "wecc240_psse_G_7001";
    latitude 38.54;
    longitude -104.7;
    generator WT;
    operating_capacity 1811.1 MW;
    startup_cost 0.0;
    shutdown_cost 0.0;
    fixed_cost 0.0;
    variable_cost 0.0;
    scarcity_cost 0.0;
}

object pypower.gen
{
    name "wecc240_psse_G_6504";
    parent wecc240_psse_N_6504;
    Pmax 789.0 MW;
    Qmax 157.8 MW;
    Qmin -157.8 MW;
    status IN_SERVICE;
    object gencost
    {
        model POLYNOMIAL;
        startup 0.0 $;
        shutdown 0.0 $;
        costs "0.0,0.0,0.0";
    };
}
object pypower.powerplant
{
    // CURRANT_CREEK: cap=649.0, cf=0.823, units=1
    // NEBO_POWER_STATION: cap=140.0, cf=0.177, units=1
    name "wecc240_psse_G_6504_CC";
    parent "wecc240_psse_G_6504";
    latitude 39.87;
    longitude -112.0;
    generator CC;
    operating_capacity 789.0 MW;
    startup_cost 35.0;
    shutdown_cost 0.0;
    fixed_cost 500.0;
    variable_cost 50.0;
    scarcity_cost 0.001;
}

object pypower.gen
{
    name "wecc240_psse_G_6508";
    parent wecc240_psse_N_6508;
    Pmax 1202.0 MW;
    Qmax 240.4 MW;
    Qmin -240.4 MW;
    status IN_SERVICE;
    object gencost
    {
        model POLYNOMIAL;
        startup 0.0 $;
        shutdown 0.0 $;
        costs "0.0,0.0,0.0";
    };
}
object pypower.powerplant
{
    // BYU_CENTRAL_HEATING_PLANT: cap=16.5, cf=0.014, units=1
    name "wecc240_psse_G_6508_CT";
    parent "wecc240_psse_G_6508";
    latitude 40.05;
    longitude -111.4;
    generator CT;
    operating_capacity 16.5 MW;
    startup_cost 25.0;
    shutdown_cost 0.0;
    fixed_cost 350.0;
    variable_cost 75.0;
    scarcity_cost 0.001;
}

object pypower.powerplant
{
    // HEBER_CITY: cap=14.1, cf=0.012, units=1
    // PROVO_POWER_PLANT: cap=12.0, cf=0.01, units=1
    // WHITEHEAD: cap=31.0, cf=0.026, units=1
    name "wecc240_psse_G_6508_IC";
    parent "wecc240_psse_G_6508";
    latitude 40.05;
    longitude -111.4;
    generator IC;
    operating_capacity 57.1 MW;
    startup_cost 0.0;
    shutdown_cost 0.0;
    fixed_cost 0.0;
    variable_cost 50.0;
    scarcity_cost 0.001;
}

object pypower.powerplant
{
    // HEBER_CITY: cap=14.1, cf=0.012, units=1
    // HUNTINGTON: cap=1037.3, cf=0.863, units=1
    // SUNNYSIDE_COGEN_ASSOCIATES: cap=58.1, cf=0.048, units=1
    name "wecc240_psse_G_6508_ST";
    parent "wecc240_psse_G_6508";
    latitude 40.05;
    longitude -111.4;
    generator ST;
    operating_capacity 1109.5 MW;
    startup_cost 6500.0;
    shutdown_cost 0.0;
    fixed_cost 1000.0;
    variable_cost 5.0;
    scarcity_cost 0.001;
}

object pypower.powerplant
{
    // SPANISH_FORK_WIND_PARK_2_LLC: cap=18.9, cf=0.016, units=1
    name "wecc240_psse_G_6508_WT";
    parent "wecc240_psse_G_6508";
    latitude 40.05;
    longitude -111.4;
    generator WT;
    operating_capacity 18.9 MW;
    startup_cost 0.0;
    shutdown_cost 0.0;
    fixed_cost 0.0;
    variable_cost 0.0;
    scarcity_cost 0.0;
}

object pypower.gen
{
    name "wecc240_psse_G_6502";
    parent wecc240_psse_N_6502;
    Pmax 1433.0 MW;
    Qmax 286.6 MW;
    Qmin -286.6 MW;
    status IN_SERVICE;
    object gencost
    {
        model POLYNOMIAL;
        startup 0.0 $;
        shutdown 0.0 $;
        costs "0.0,0.0,0.0";
    };
}
object pypower.powerplant
{
    // LAKE_SIDE_POWER_PLANT: cap=1385.0, cf=0.967, units=1
    name "wecc240_psse_G_6502_CC";
    parent "wecc240_psse_G_6502";
    latitude 40.42;
    longitude -112.0;
    generator CC;
    operating_capacity 1385.0 MW;
    startup_cost 35.0;
    shutdown_cost 0.0;
    fixed_cost 500.0;
    variable_cost 50.0;
    scarcity_cost 0.001;
}

object pypower.powerplant
{
    // US_MAGNESIUM: cap=48.0, cf=0.033, units=1
    name "wecc240_psse_G_6502_CT";
    parent "wecc240_psse_G_6502";
    latitude 40.42;
    longitude -112.0;
    generator CT;
    operating_capacity 48.0 MW;
    startup_cost 25.0;
    shutdown_cost 0.0;
    fixed_cost 350.0;
    variable_cost 75.0;
    scarcity_cost 0.001;
}

object pypower.gen
{
    name "wecc240_psse_G_6509";
    parent wecc240_psse_N_6509;
    Pmax 1517.6 MW;
    Qmax 303.5 MW;
    Qmin -303.5 MW;
    status IN_SERVICE;
    object gencost
    {
        model POLYNOMIAL;
        startup 0.0 $;
        shutdown 0.0 $;
        costs "0.0,0.0,0.0";
    };
}
object pypower.powerplant
{
    // KENNECOTT_POWER_PLANT: cap=38.2, cf=0.025, units=1
    name "wecc240_psse_G_6509_CC";
    parent "wecc240_psse_G_6509";
    latitude 40.77;
    longitude -111.8;
    generator CC;
    operating_capacity 38.2 MW;
    startup_cost 35.0;
    shutdown_cost 0.0;
    fixed_cost 500.0;
    variable_cost 50.0;
    scarcity_cost 0.001;
}

object pypower.powerplant
{
    // BOUNTIFUL_CITY: cap=30.4, cf=0.02, units=1
    // GADSBY: cap=492.1, cf=0.324, units=1
    // KENNECOTT_POWER_PLANT: cap=76.4, cf=0.05, units=2
    // MURRAY_TURBINE: cap=42.0, cf=0.028, units=1
    // TESORO_SLC_COGENERATION_PLANT: cap=30.4, cf=0.02, units=1
    // WEST_VALLEY_GENERATION_PROJECT: cap=217.0, cf=0.143, units=1
    name "wecc240_psse_G_6509_CT";
    parent "wecc240_psse_G_6509";
    latitude 40.77;
    longitude -111.8;
    generator CT;
    operating_capacity 888.3 MW;
    startup_cost 25.0;
    shutdown_cost 0.0;
    fixed_cost 350.0;
    variable_cost 75.0;
    scarcity_cost 0.001;
}

object pypower.powerplant
{
    // BOUNTIFUL_CITY: cap=30.4, cf=0.02, units=1
    name "wecc240_psse_G_6509_IC";
    parent "wecc240_psse_G_6509";
    latitude 40.77;
    longitude -111.8;
    generator IC;
    operating_capacity 30.4 MW;
    startup_cost 0.0;
    shutdown_cost 0.0;
    fixed_cost 0.0;
    variable_cost 50.0;
    scarcity_cost 0.001;
}

object pypower.powerplant
{
    // BOUNTIFUL_CITY: cap=30.4, cf=0.02, units=1
    // GADSBY: cap=492.1, cf=0.324, units=1
    // KENNECOTT_POWER_PLANT: cap=38.2, cf=0.025, units=1
    name "wecc240_psse_G_6509_ST";
    parent "wecc240_psse_G_6509";
    latitude 40.77;
    longitude -111.8;
    generator ST;
    operating_capacity 560.7 MW;
    startup_cost 6500.0;
    shutdown_cost 0.0;
    fixed_cost 1000.0;
    variable_cost 5.0;
    scarcity_cost 0.001;
}

object pypower.gen
{
    name "wecc240_psse_G_6501";
    parent wecc240_psse_N_6501;
    Pmax 139.3 MW;
    Qmax 27.9 MW;
    Qmin -27.9 MW;
    status IN_SERVICE;
    object gencost
    {
        model POLYNOMIAL;
        startup 0.0 $;
        shutdown 0.0 $;
        costs "0.0,0.0,0.0";
    };
}
object pypower.powerplant
{
    // LOGAN_CITY: cap=15.9, cf=0.114, units=1
    name "wecc240_psse_G_6501_CT";
    parent "wecc240_psse_G_6501";
    latitude 41.44;
    longitude -112.0;
    generator CT;
    operating_capacity 15.9 MW;
    startup_cost 25.0;
    shutdown_cost 0.0;
    fixed_cost 350.0;
    variable_cost 75.0;
    scarcity_cost 0.001;
}

object pypower.powerplant
{
    // CUTLER: cap=30.0, cf=0.215, units=1
    // GRACE: cap=33.0, cf=0.237, units=1
    // ONEIDA: cap=30.0, cf=0.215, units=1
    // SODA: cap=14.5, cf=0.104, units=1
    name "wecc240_psse_G_6501_HT";
    parent "wecc240_psse_G_6501";
    latitude 41.44;
    longitude -112.0;
    generator HT;
    operating_capacity 107.5 MW;
    startup_cost 0.0;
    shutdown_cost 0.0;
    fixed_cost 200.0;
    variable_cost 0.0;
    scarcity_cost 0.001;
}

object pypower.powerplant
{
    // LOGAN_CITY: cap=15.9, cf=0.114, units=1
    name "wecc240_psse_G_6501_ST";
    parent "wecc240_psse_G_6501";
    latitude 41.44;
    longitude -112.0;
    generator ST;
    operating_capacity 15.9 MW;
    startup_cost 6500.0;
    shutdown_cost 0.0;
    fixed_cost 1000.0;
    variable_cost 5.0;
    scarcity_cost 0.001;
}

object pypower.gen
{
    name "wecc240_psse_G_6305";
    parent wecc240_psse_N_6305;
    Pmax 1576.0 MW;
    Qmax 315.2 MW;
    Qmin -315.2 MW;
    status IN_SERVICE;
    object gencost
    {
        model POLYNOMIAL;
        startup 0.0 $;
        shutdown 0.0 $;
        costs "0.0,0.0,0.0";
    };
}
object pypower.powerplant
{
    // SHUTE_CREEK_FACILITY: cap=144.0, cf=0.091, units=1
    name "wecc240_psse_G_6305_CT";
    parent "wecc240_psse_G_6305";
    latitude 41.83;
    longitude -110.6;
    generator CT;
    operating_capacity 144.0 MW;
    startup_cost 25.0;
    shutdown_cost 0.0;
    fixed_cost 350.0;
    variable_cost 75.0;
    scarcity_cost 0.001;
}

object pypower.powerplant
{
    // FONTENELLE: cap=10.0, cf=0.006, units=1
    // PALISADES: cap=176.4, cf=0.112, units=1
    name "wecc240_psse_G_6305_HT";
    parent "wecc240_psse_G_6305";
    latitude 41.83;
    longitude -110.6;
    generator HT;
    operating_capacity 186.4 MW;
    startup_cost 0.0;
    shutdown_cost 0.0;
    fixed_cost 200.0;
    variable_cost 0.0;
    scarcity_cost 0.001;
}

object pypower.powerplant
{
    // SAGE_SOLAR_I-III: cap=57.6, cf=0.037, units=1
    name "wecc240_psse_G_6305_PV";
    parent "wecc240_psse_G_6305";
    latitude 41.83;
    longitude -110.6;
    generator PV;
    operating_capacity 57.6 MW;
    startup_cost 0.0;
    shutdown_cost 0.0;
    fixed_cost 0.0;
    variable_cost 0.0;
    scarcity_cost 0.0;
}

object pypower.powerplant
{
    // FMC_WESTVACO: cap=41.0, cf=0.026, units=1
    // GENERAL_CHEMICAL: cap=30.0, cf=0.019, units=1
    // NAUGHTON: cap=832.0, cf=0.528, units=1
    name "wecc240_psse_G_6305_ST";
    parent "wecc240_psse_G_6305";
    latitude 41.83;
    longitude -110.6;
    generator ST;
    operating_capacity 903.0 MW;
    startup_cost 6500.0;
    shutdown_cost 0.0;
    fixed_cost 1000.0;
    variable_cost 5.0;
    scarcity_cost 0.001;
}

object pypower.powerplant
{
    // MOUNTAIN_WIND_POWER_II_LLC: cap=80.0, cf=0.051, units=1
    // MOUNTAIN_WIND_POWER_LLC: cap=61.0, cf=0.039, units=1
    // WYOMING_WIND_ENERGY_CENTER: cap=144.0, cf=0.091, units=1
    name "wecc240_psse_G_6305_WT";
    parent "wecc240_psse_G_6305";
    latitude 41.83;
    longitude -110.6;
    generator WT;
    operating_capacity 285.0 MW;
    startup_cost 0.0;
    shutdown_cost 0.0;
    fixed_cost 0.0;
    variable_cost 0.0;
    scarcity_cost 0.0;
}

object pypower.gen
{
    name "wecc240_psse_G_6503";
    parent wecc240_psse_N_6503;
    Pmax 677.9 MW;
    Qmax 135.6 MW;
    Qmin -135.6 MW;
    status IN_SERVICE;
    object gencost
    {
        model POLYNOMIAL;
        startup 0.0 $;
        shutdown 0.0 $;
        costs "0.0,0.0,0.0";
    };
}
object pypower.powerplant
{
    // FRUITA: cap=26.6, cf=0.039, units=1
    name "wecc240_psse_G_6503_CT";
    parent "wecc240_psse_G_6503";
    latitude 40.03;
    longitude -109.2;
    generator CT;
    operating_capacity 26.6 MW;
    startup_cost 25.0;
    shutdown_cost 0.0;
    fixed_cost 350.0;
    variable_cost 75.0;
    scarcity_cost 0.001;
}

object pypower.powerplant
{
    // FLAMING_GORGE: cap=151.8, cf=0.224, units=1
    name "wecc240_psse_G_6503_HT";
    parent "wecc240_psse_G_6503";
    latitude 40.03;
    longitude -109.2;
    generator HT;
    operating_capacity 151.8 MW;
    startup_cost 0.0;
    shutdown_cost 0.0;
    fixed_cost 200.0;
    variable_cost 0.0;
    scarcity_cost 0.001;
}

object pypower.powerplant
{
    // BONANZA: cap=499.5, cf=0.737, units=1
    name "wecc240_psse_G_6503_ST";
    parent "wecc240_psse_G_6503";
    latitude 40.03;
    longitude -109.2;
    generator ST;
    operating_capacity 499.5 MW;
    startup_cost 6500.0;
    shutdown_cost 0.0;
    fixed_cost 1000.0;
    variable_cost 5.0;
    scarcity_cost 0.001;
}

object pypower.gen
{
    name "wecc240_psse_G_7002";
    parent wecc240_psse_N_7002;
    Pmax 2030.0 MW;
    Qmax 406.0 MW;
    Qmin -406.0 MW;
    status IN_SERVICE;
    object gencost
    {
        model POLYNOMIAL;
        startup 0.0 $;
        shutdown 0.0 $;
        costs "0.0,0.0,0.0";
    };
}
object pypower.powerplant
{
    // RIFLE_GENERATING_STATION: cap=84.0, cf=0.041, units=1
    name "wecc240_psse_G_7002_CC";
    parent "wecc240_psse_G_7002";
    latitude 40.52;
    longitude -107.5;
    generator CC;
    operating_capacity 84.0 MW;
    startup_cost 35.0;
    shutdown_cost 0.0;
    fixed_cost 500.0;
    variable_cost 50.0;
    scarcity_cost 0.001;
}

object pypower.powerplant
{
    // GREEN_MOUNTAIN: cap=26.0, cf=0.013, units=1
    // SHOSHONE: cap=14.4, cf=0.007, units=1
    name "wecc240_psse_G_7002_HT";
    parent "wecc240_psse_G_7002";
    latitude 40.52;
    longitude -107.5;
    generator HT;
    operating_capacity 40.4 MW;
    startup_cost 0.0;
    shutdown_cost 0.0;
    fixed_cost 200.0;
    variable_cost 0.0;
    scarcity_cost 0.001;
}

object pypower.powerplant
{
    // CRAIG: cap=1427.6, cf=0.703, units=1
    // EAGLE_VALLEY_CLEAN_ENERGY_LLC_BIOMASS: cap=12.6, cf=0.006, units=1
    // HAYDEN: cap=465.4, cf=0.229, units=1
    name "wecc240_psse_G_7002_ST";
    parent "wecc240_psse_G_7002";
    latitude 40.52;
    longitude -107.5;
    generator ST;
    operating_capacity 1905.6 MW;
    startup_cost 6500.0;
    shutdown_cost 0.0;
    fixed_cost 1000.0;
    variable_cost 5.0;
    scarcity_cost 0.001;
}

object pypower.gen
{
    name "wecc240_psse_G_6301";
    parent wecc240_psse_N_6301;
    Pmax 2486.4 MW;
    Qmax 497.3 MW;
    Qmin -497.3 MW;
    status IN_SERVICE;
    object gencost
    {
        model POLYNOMIAL;
        startup 0.0 $;
        shutdown 0.0 $;
        costs "0.0,0.0,0.0";
    };
}
object pypower.powerplant
{
    // SIMPLOT_PHOSPHATES: cap=11.5, cf=0.005, units=1
    name "wecc240_psse_G_6301_CT";
    parent "wecc240_psse_G_6301";
    latitude 42.09;
    longitude -108.5;
    generator CT;
    operating_capacity 11.5 MW;
    startup_cost 25.0;
    shutdown_cost 0.0;
    fixed_cost 350.0;
    variable_cost 75.0;
    scarcity_cost 0.001;
}

object pypower.powerplant
{
    // BOYSEN: cap=15.0, cf=0.006, units=1
    // BUFFALO_BILL: cap=18.0, cf=0.007, units=1
    name "wecc240_psse_G_6301_HT";
    parent "wecc240_psse_G_6301";
    latitude 42.09;
    longitude -108.5;
    generator HT;
    operating_capacity 33.0 MW;
    startup_cost 0.0;
    shutdown_cost 0.0;
    fixed_cost 200.0;
    variable_cost 0.0;
    scarcity_cost 0.001;
}

object pypower.powerplant
{
    // JIM_BRIDGER: cap=2441.9, cf=0.982, units=1
    name "wecc240_psse_G_6301_ST";
    parent "wecc240_psse_G_6301";
    latitude 42.09;
    longitude -108.5;
    generator ST;
    operating_capacity 2441.9 MW;
    startup_cost 6500.0;
    shutdown_cost 0.0;
    fixed_cost 1000.0;
    variable_cost 5.0;
    scarcity_cost 0.001;
}

object pypower.gen
{
    name "wecc240_psse_G_6302";
    parent wecc240_psse_N_6302;
    Pmax 11356.6 MW;
    Qmax 2271.3 MW;
    Qmin -2271.3 MW;
    status IN_SERVICE;
    object gencost
    {
        model POLYNOMIAL;
        startup 0.0 $;
        shutdown 0.0 $;
        costs "0.0,0.0,0.0";
    };
}
object pypower.powerplant
{
    // CHEYENNE_PRAIRIE_GENERATING_STATION: cap=140.0, cf=0.012, units=1
    // FORT_ST_VRAIN: cap=1148.5, cf=0.101, units=1
    // JM_SHAFER_GENERATING_STATION: cap=396.9, cf=0.035, units=1
    // UNIVERSITY_OF_COLORADO: cap=33.0, cf=0.003, units=1
    name "wecc240_psse_G_6302_CC";
    parent "wecc240_psse_G_6302";
    latitude 41.38;
    longitude -105.6;
    generator CC;
    operating_capacity 1718.4 MW;
    startup_cost 35.0;
    shutdown_cost 0.0;
    fixed_cost 500.0;
    variable_cost 50.0;
    scarcity_cost 0.001;
}

object pypower.powerplant
{
    // CHEYENNE_PRAIRIE_GENERATING_STATION: cap=140.0, cf=0.012, units=1
    // FORT_LUPTON: cap=100.8, cf=0.009, units=1
    // FORT_ST_VRAIN: cap=1148.5, cf=0.101, units=1
    // RAWHIDE: cap=800.4, cf=0.07, units=1
    // SPINDLE_HILL_ENERGY_CENTER: cap=420.0, cf=0.037, units=1
    // VALMONT: cap=59.3, cf=0.005, units=1
    // VALMONT_COMBUSTION_TURBINE_PROJECT: cap=142.2, cf=0.013, units=1
    name "wecc240_psse_G_6302_CT";
    parent "wecc240_psse_G_6302";
    latitude 41.38;
    longitude -105.6;
    generator CT;
    operating_capacity 2811.2 MW;
    startup_cost 25.0;
    shutdown_cost 0.0;
    fixed_cost 350.0;
    variable_cost 75.0;
    scarcity_cost 0.001;
}

object pypower.powerplant
{
    // ALCOVA: cap=41.4, cf=0.004, units=1
    // ESTES: cap=45.0, cf=0.004, units=1
    // FLATIRON: cap=94.5, cf=0.008, units=1
    // FREMONT_CANYON: cap=66.8, cf=0.006, units=1
    // GLENDO: cap=38.0, cf=0.003, units=1
    // KORTES: cap=36.0, cf=0.003, units=1
    // POLE_HILL: cap=38.2, cf=0.003, units=1
    // SEMINOE: cap=51.6, cf=0.005, units=1
    name "wecc240_psse_G_6302_HT";
    parent "wecc240_psse_G_6302";
    latitude 41.38;
    longitude -105.6;
    generator HT;
    operating_capacity 411.5 MW;
    startup_cost 0.0;
    shutdown_cost 0.0;
    fixed_cost 200.0;
    variable_cost 0.0;
    scarcity_cost 0.001;
}

object pypower.powerplant
{
    // BISON_SOLAR_LLC: cap=30.0, cf=0.003, units=1
    // SR_PLATTE_SOLAR_FARM: cap=16.0, cf=0.001, units=1
    name "wecc240_psse_G_6302_PV";
    parent "wecc240_psse_G_6302";
    latitude 41.38;
    longitude -105.6;
    generator PV;
    operating_capacity 46.0 MW;
    startup_cost 0.0;
    shutdown_cost 0.0;
    fixed_cost 0.0;
    variable_cost 0.0;
    scarcity_cost 0.0;
}

object pypower.powerplant
{
    // DAVE_JOHNSTON: cap=922.2, cf=0.081, units=1
    // LARAMIE_RIVER_STATION: cap=1710.0, cf=0.151, units=1
    // RAWHIDE: cap=800.4, cf=0.07, units=1
    // VALMONT: cap=59.3, cf=0.005, units=1
    name "wecc240_psse_G_6302_ST";
    parent "wecc240_psse_G_6302";
    latitude 41.38;
    longitude -105.6;
    generator ST;
    operating_capacity 3491.9 MW;
    startup_cost 6500.0;
    shutdown_cost 0.0;
    fixed_cost 1000.0;
    variable_cost 5.0;
    scarcity_cost 0.001;
}

object pypower.powerplant
{
    // CAMPBELL_HILL_WINDPOWER: cap=99.0, cf=0.009, units=1
    // CASPER_WIND_FARM: cap=17.0, cf=0.001, units=1
    // CEDAR_CREEK_II: cap=248.3, cf=0.022, units=1
    // CEDAR_CREEK_WIND: cap=300.5, cf=0.026, units=1
    // COLORADO_HIGHLANDS_WIND: cap=96.1, cf=0.008, units=1
    // DUNLAP: cap=111.0, cf=0.01, units=1
    // EKOLA_FLATS: cap=250.9, cf=0.022, units=1
    // FOOTE_CREEK_I: cap=41.4, cf=0.004, units=1
    // GLENROCK: cap=165.6, cf=0.015, units=1
    // HAPPY_JACK_WINDPOWER_PROJECT: cap=29.4, cf=0.003, units=1
    // HIGH_PLAINS: cap=122.1, cf=0.011, units=1
    // LOGAN_WIND_ENERGY: cap=201.0, cf=0.018, units=1
    // MCFADDEN_RIDGE: cap=35.2, cf=0.003, units=1
    // NORTHERN_COLORADO_WIND_LLC: cap=174.3, cf=0.015, units=1
    // PEETZ_TABLE_WIND_ENERGY: cap=199.5, cf=0.018, units=1
    // PIONEER_WIND_PARK_LLC: cap=80.0, cf=0.007, units=1
    // RIDGE_CREST_WIND_PARTNERS: cap=29.7, cf=0.003, units=1
    // ROCK_RIVER_I_LLC: cap=50.0, cf=0.004, units=1
    // ROLLING_HILLS: cap=115.8, cf=0.01, units=1
    // SEVEN_MILE_HILL: cap=146.2, cf=0.013, units=1
    // SILVER_SAGE_WINDPOWER: cap=42.0, cf=0.004, units=1
    // SPRING_CANYON: cap=60.0, cf=0.005, units=1
    // SPRING_CANYON_EXPANSION_WIND_ENERGY_CENTER: cap=62.6, cf=0.006, units=1
    // TOP_OF_THE_WORLD_WINDPOWER_PROJECT: cap=200.0, cf=0.018, units=1
    name "wecc240_psse_G_6302_WT";
    parent "wecc240_psse_G_6302";
    latitude 41.38;
    longitude -105.6;
    generator WT;
    operating_capacity 2877.6 MW;
    startup_cost 0.0;
    shutdown_cost 0.0;
    fixed_cost 0.0;
    variable_cost 0.0;
    scarcity_cost 0.0;
}

object pypower.gen
{
    name "wecc240_psse_G_4007";
    parent wecc240_psse_N_4007;
    Pmax 141.8 MW;
    Qmax 28.4 MW;
    Qmin -28.4 MW;
    status IN_SERVICE;
    object gencost
    {
        model POLYNOMIAL;
        startup 0.0 $;
        shutdown 0.0 $;
        costs "0.0,0.0,0.0";
    };
}
object pypower.powerplant
{
    // FARADAY: cap=19.2, cf=0.135, units=1
    // NORTH_FORK: cap=40.8, cf=0.288, units=1
    // OAK_GROVE: cap=51.0, cf=0.36, units=1
    // RIVER_MILL: cap=18.8, cf=0.133, units=1
    // STONE_CREEK: cap=12.0, cf=0.085, units=1
    name "wecc240_psse_G_4007_HT";
    parent "wecc240_psse_G_4007";
    latitude 45.6;
    longitude -121.1;
    generator HT;
    operating_capacity 141.8 MW;
    startup_cost 0.0;
    shutdown_cost 0.0;
    fixed_cost 200.0;
    variable_cost 0.0;
    scarcity_cost 0.001;
}

object pypower.gen
{
    name "wecc240_psse_G_4006";
    parent wecc240_psse_N_4006;
    Pmax 3275.2 MW;
    Qmax 655.0 MW;
    Qmin -655.0 MW;
    status IN_SERVICE;
    object gencost
    {
        model POLYNOMIAL;
        startup 0.0 $;
        shutdown 0.0 $;
        costs "0.0,0.0,0.0";
    };
}
object pypower.powerplant
{
    // RIVER_ROAD_GEN_PLANT: cap=248.0, cf=0.076, units=1
    name "wecc240_psse_G_4006_CC";
    parent "wecc240_psse_G_4006";
    latitude 45.61;
    longitude -121.1;
    generator CC;
    operating_capacity 248.0 MW;
    startup_cost 35.0;
    shutdown_cost 0.0;
    fixed_cost 500.0;
    variable_cost 50.0;
    scarcity_cost 0.001;
}

object pypower.powerplant
{
    // BONNEVILLE: cap=1162.0, cf=0.355, units=1
    // PHP_1: cap=23.7, cf=0.007, units=1
    // PHP_2: cap=11.8, cf=0.004, units=1
    // THE_DALLES: cap=1819.7, cf=0.556, units=1
    name "wecc240_psse_G_4006_HT";
    parent "wecc240_psse_G_4006";
    latitude 45.61;
    longitude -121.1;
    generator HT;
    operating_capacity 3017.2 MW;
    startup_cost 0.0;
    shutdown_cost 0.0;
    fixed_cost 200.0;
    variable_cost 0.0;
    scarcity_cost 0.001;
}

object pypower.powerplant
{
    // SDS_LUMBER_GORGE_ENERGY_DIVISION: cap=10.0, cf=0.003, units=1
    name "wecc240_psse_G_4006_ST";
    parent "wecc240_psse_G_4006";
    latitude 45.61;
    longitude -121.1;
    generator ST;
    operating_capacity 10.0 MW;
    startup_cost 6500.0;
    shutdown_cost 0.0;
    fixed_cost 1000.0;
    variable_cost 5.0;
    scarcity_cost 0.001;
}

object pypower.gen
{
    name "wecc240_psse_G_4202";
    parent wecc240_psse_N_4202;
    Pmax 8909.8 MW;
    Qmax 1782.0 MW;
    Qmin -1782.0 MW;
    status IN_SERVICE;
    object gencost
    {
        model POLYNOMIAL;
        startup 0.0 $;
        shutdown 0.0 $;
        costs "0.0,0.0,0.0";
    };
}
object pypower.powerplant
{
    // BEAVER: cap=610.7, cf=0.069, units=1
    // CHEHALIS_GENERATING_FACILITY: cap=698.0, cf=0.078, units=1
    // FREDERICKSON_POWER_LP: cap=318.3, cf=0.036, units=1
    // GRAYS_HARBOR_ENERGY_FACILITY: cap=697.8, cf=0.078, units=1
    // MINT_FARM_GENERATING_STATION: cap=319.0, cf=0.036, units=1
    // PORT_WESTWARD: cap=483.0, cf=0.054, units=1
    // TRANSALTA_CENTRALIA_GENERATION: cap=1459.8, cf=0.164, units=1
    name "wecc240_psse_G_4202_CC";
    parent "wecc240_psse_G_4202";
    latitude 47.06;
    longitude -121.8;
    generator CC;
    operating_capacity 4586.6 MW;
    startup_cost 35.0;
    shutdown_cost 0.0;
    fixed_cost 500.0;
    variable_cost 50.0;
    scarcity_cost 0.001;
}

object pypower.powerplant
{
    // BEAVER: cap=610.7, cf=0.069, units=1
    // FREDERICKSON: cap=177.8, cf=0.02, units=1
    // LONGVIEW_FIBRE: cap=45.0, cf=0.005, units=1
    name "wecc240_psse_G_4202_CT";
    parent "wecc240_psse_G_4202";
    latitude 47.06;
    longitude -121.8;
    generator CT;
    operating_capacity 833.5 MW;
    startup_cost 25.0;
    shutdown_cost 0.0;
    fixed_cost 350.0;
    variable_cost 75.0;
    scarcity_cost 0.001;
}

object pypower.powerplant
{
    // ALDER: cap=50.0, cf=0.006, units=1
    // CEDAR_FALLS: cap=30.0, cf=0.003, units=1
    // COWLITZ_FALLS: cap=70.0, cf=0.008, units=1
    // CUSHMAN_1: cap=43.2, cf=0.005, units=1
    // CUSHMAN_2: cap=84.6, cf=0.009, units=1
    // ELECTRON: cap=22.8, cf=0.003, units=1
    // LAGRANDE: cap=64.0, cf=0.007, units=1
    // MAYFIELD: cap=162.0, cf=0.018, units=1
    // MERWIN: cap=136.0, cf=0.015, units=1
    // MOSSYROCK: cap=300.0, cf=0.034, units=1
    // PACKWOOD: cap=27.5, cf=0.003, units=1
    // SNOQUALMIE: cap=12.8, cf=0.001, units=1
    // SNOQUALMIE_2: cap=38.7, cf=0.004, units=1
    // SWIFT_1: cap=240.0, cf=0.027, units=1
    // TIETON_DAM_HYDRO_ELECTRIC_PROJECT: cap=13.8, cf=0.002, units=1
    // TWIN_FALLS_HYDRO: cap=24.0, cf=0.003, units=1
    // WYNOOCHEE: cap=12.8, cf=0.001, units=1
    // YALE: cap=134.0, cf=0.015, units=1
    // YELM: cap=12.0, cf=0.001, units=1
    name "wecc240_psse_G_4202_HT";
    parent "wecc240_psse_G_4202";
    latitude 47.06;
    longitude -121.8;
    generator HT;
    operating_capacity 1478.2 MW;
    startup_cost 0.0;
    shutdown_cost 0.0;
    fixed_cost 200.0;
    variable_cost 0.0;
    scarcity_cost 0.001;
}

object pypower.powerplant
{
    // PORT_WESTWARD_UNIT_2: cap=225.6, cf=0.025, units=1
    name "wecc240_psse_G_4202_IC";
    parent "wecc240_psse_G_4202";
    latitude 47.06;
    longitude -121.8;
    generator IC;
    operating_capacity 225.6 MW;
    startup_cost 0.0;
    shutdown_cost 0.0;
    fixed_cost 0.0;
    variable_cost 50.0;
    scarcity_cost 0.001;
}

object pypower.powerplant
{
    // GEORGIA-PACIFIC_WAUNA_MILL: cap=36.0, cf=0.004, units=1
    // LONGVIEW_FIBRE: cap=45.0, cf=0.005, units=1
    // SIERRA_PACIFIC_ABERDEEN: cap=18.0, cf=0.002, units=1
    // SIMPSON_TACOMA_KRAFT_BIOMASS: cap=64.0, cf=0.007, units=1
    // TRANSALTA_CENTRALIA_GENERATION: cap=1459.8, cf=0.164, units=1
    // WEYERHAEUSER_LONGVIEW_WA: cap=62.4, cf=0.007, units=1
    name "wecc240_psse_G_4202_ST";
    parent "wecc240_psse_G_4202";
    latitude 47.06;
    longitude -121.8;
    generator ST;
    operating_capacity 1685.2 MW;
    startup_cost 6500.0;
    shutdown_cost 0.0;
    fixed_cost 1000.0;
    variable_cost 5.0;
    scarcity_cost 0.001;
}

object pypower.powerplant
{
    // SAGEBRUSH_POWER_PARTNERS: cap=100.7, cf=0.011, units=1
    name "wecc240_psse_G_4202_WT";
    parent "wecc240_psse_G_4202";
    latitude 47.06;
    longitude -121.8;
    generator WT;
    operating_capacity 100.7 MW;
    startup_cost 0.0;
    shutdown_cost 0.0;
    fixed_cost 0.0;
    variable_cost 0.0;
    scarcity_cost 0.0;
}

object pypower.gen
{
    name "wecc240_psse_G_4005";
    parent wecc240_psse_N_4005;
    Pmax 6879.2 MW;
    Qmax 1375.8 MW;
    Qmin -1375.8 MW;
    status IN_SERVICE;
    object gencost
    {
        model POLYNOMIAL;
        startup 0.0 $;
        shutdown 0.0 $;
        costs "0.0,0.0,0.0";
    };
}
object pypower.powerplant
{
    // GOLDENDALE_GENERATING_STATION: cap=284.3, cf=0.041, units=1
    name "wecc240_psse_G_4005_CC";
    parent "wecc240_psse_G_4005";
    latitude 45.68;
    longitude -120.7;
    generator CC;
    operating_capacity 284.3 MW;
    startup_cost 35.0;
    shutdown_cost 0.0;
    fixed_cost 500.0;
    variable_cost 50.0;
    scarcity_cost 0.001;
}

object pypower.powerplant
{
    // ROOSEVELT_BIOGAS_1: cap=36.5, cf=0.005, units=1
    // WASTE_MANAGEMENT_COLUMBIA_RIDGE_LFGTE: cap=12.8, cf=0.002, units=1
    name "wecc240_psse_G_4005_CT";
    parent "wecc240_psse_G_4005";
    latitude 45.68;
    longitude -120.7;
    generator CT;
    operating_capacity 49.3 MW;
    startup_cost 25.0;
    shutdown_cost 0.0;
    fixed_cost 350.0;
    variable_cost 75.0;
    scarcity_cost 0.001;
}

object pypower.powerplant
{
    // JOHN_DAY: cap=2160.0, cf=0.314, units=1
    name "wecc240_psse_G_4005_HT";
    parent "wecc240_psse_G_4005";
    latitude 45.68;
    longitude -120.7;
    generator HT;
    operating_capacity 2160.0 MW;
    startup_cost 0.0;
    shutdown_cost 0.0;
    fixed_cost 200.0;
    variable_cost 0.0;
    scarcity_cost 0.001;
}

object pypower.powerplant
{
    // WYEAST_SOLAR: cap=10.0, cf=0.001, units=1
    name "wecc240_psse_G_4005_PV";
    parent "wecc240_psse_G_4005";
    latitude 45.68;
    longitude -120.7;
    generator PV;
    operating_capacity 10.0 MW;
    startup_cost 0.0;
    shutdown_cost 0.0;
    fixed_cost 0.0;
    variable_cost 0.0;
    scarcity_cost 0.0;
}

object pypower.powerplant
{
    // ARLINGTON_WIND_POWER_PROJECT: cap=103.0, cf=0.015, units=1
    // BIGLOW_CANYON_WIND_FARM: cap=449.7, cf=0.065, units=1
    // BIG_HORN_WIND_II: cap=50.0, cf=0.007, units=1
    // BIG_HORN_WIND_PROJECT: cap=199.0, cf=0.029, units=1
    // CONDON_WINDPOWER_LLC: cap=49.8, cf=0.007, units=1
    // GOODNOE_HILLS: cap=103.4, cf=0.015, units=1
    // HARVEST_WIND_PROJECT: cap=98.9, cf=0.014, units=1
    // HAY_CANYON_WIND_POWER_LLC: cap=100.8, cf=0.015, units=1
    // HORSESHOE_BEND_WIND_LLC: cap=290.0, cf=0.042, units=1
    // JUNIPER_CANYON_I_WIND_PROJECT: cap=151.2, cf=0.022, units=1
    // KLONDIKE_WINDPOWER_II: cap=75.0, cf=0.011, units=1
    // KLONDIKE_WINDPOWER_III_PHASE_1: cap=297.5, cf=0.043, units=1
    // KLONDIKE_WINDPOWER_III_PHASE_2: cap=297.5, cf=0.043, units=1
    // KLONDIKE_WIND_POWER: cap=24.5, cf=0.004, units=1
    // LEANING_JUNIPER: cap=110.4, cf=0.016, units=1
    // LEANING_JUNIPER_WIND_POWER_II: cap=201.0, cf=0.029, units=1
    // LINDEN_WIND_ENERGY_PROJECT: cap=50.0, cf=0.007, units=1
    // MONTAGUE_WIND_POWER_FACILITY_LLC: cap=200.0, cf=0.029, units=1
    // NORTH_HURLBURT_WIND_LLC: cap=265.0, cf=0.039, units=1
    // PEBBLE_SPRINGS_WIND_LLC: cap=98.7, cf=0.014, units=1
    // SOUTH_HURLBURT_WIND_LLC: cap=290.0, cf=0.042, units=1
    // STAR_POINT_WIND_PROJECT_LLC: cap=98.7, cf=0.014, units=1
    // TUOLUMNE_WIND_PROJECT: cap=136.3, cf=0.02, units=1
    // WHEAT_FIELD_WIND_POWER_PROJECT: cap=97.0, cf=0.014, units=1
    // WHITE_CREEK_WIND_FARM: cap=204.0, cf=0.03, units=1
    // WILLOW_CREEK_ENERGY_CENTER: cap=72.0, cf=0.01, units=1
    // WINDY_FLATS_WIND_PROJECT: cap=262.2, cf=0.038, units=1
    name "wecc240_psse_G_4005_WT";
    parent "wecc240_psse_G_4005";
    latitude 45.68;
    longitude -120.7;
    generator WT;
    operating_capacity 4375.6 MW;
    startup_cost 0.0;
    shutdown_cost 0.0;
    fixed_cost 0.0;
    variable_cost 0.0;
    scarcity_cost 0.0;
}

object pypower.gen
{
    name "wecc240_psse_G_4102";
    parent wecc240_psse_N_4102;
    Pmax 11309.4 MW;
    Qmax 2261.9 MW;
    Qmin -2261.9 MW;
    status IN_SERVICE;
    object gencost
    {
        model POLYNOMIAL;
        startup 0.0 $;
        shutdown 0.0 $;
        costs "0.0,0.0,0.0";
    };
}
object pypower.powerplant
{
    // CARTY_GENERATING_STATION: cap=500.0, cf=0.044, units=1
    // COYOTE_SPRINGS: cap=296.0, cf=0.026, units=1
    // COYOTE_SPRINGS_II: cap=287.0, cf=0.025, units=1
    // HERMISTON_GENERATING_PLANT: cap=621.2, cf=0.055, units=1
    // HERMISTON_POWER_PARTNERSHIP: cap=689.4, cf=0.061, units=1
    name "wecc240_psse_G_4102_CC";
    parent "wecc240_psse_G_4102";
    latitude 46.67;
    longitude -119.6;
    generator CC;
    operating_capacity 2393.6 MW;
    startup_cost 35.0;
    shutdown_cost 0.0;
    fixed_cost 500.0;
    variable_cost 50.0;
    scarcity_cost 0.001;
}

object pypower.powerplant
{
    // CHANDLER: cap=12.0, cf=0.001, units=1
    // ICE_HARBOR: cap=603.0, cf=0.053, units=1
    // LOWER_MONUMENTAL: cap=810.0, cf=0.072, units=1
    // MCNARY: cap=990.5, cf=0.088, units=1
    // MCNARY_DAM_FISH_ATTRACTION_PROJECT: cap=10.0, cf=0.001, units=1
    // PRIEST_RAPIDS: cap=955.6, cf=0.084, units=1
    // ROCKY_REACH: cap=1299.6, cf=0.115, units=1
    // ROCK_ISLAND: cap=629.4, cf=0.056, units=1
    // ROZA: cap=12.9, cf=0.001, units=1
    // WANAPUM: cap=1098.0, cf=0.097, units=1
    name "wecc240_psse_G_4102_HT";
    parent "wecc240_psse_G_4102";
    latitude 46.67;
    longitude -119.6;
    generator HT;
    operating_capacity 6421.0 MW;
    startup_cost 0.0;
    shutdown_cost 0.0;
    fixed_cost 200.0;
    variable_cost 0.0;
    scarcity_cost 0.001;
}

object pypower.powerplant
{
    // WILD_HORSE: cap=273.1, cf=0.024, units=1
    name "wecc240_psse_G_4102_PV";
    parent "wecc240_psse_G_4102";
    latitude 46.67;
    longitude -119.6;
    generator PV;
    operating_capacity 273.1 MW;
    startup_cost 0.0;
    shutdown_cost 0.0;
    fixed_cost 0.0;
    variable_cost 0.0;
    scarcity_cost 0.0;
}

object pypower.powerplant
{
    // COLUMBIA_GENERATING_STATION: cap=1200.0, cf=0.106, units=1
    name "wecc240_psse_G_4102_ST";
    parent "wecc240_psse_G_4102";
    latitude 46.67;
    longitude -119.6;
    generator ST;
    operating_capacity 1200.0 MW;
    startup_cost 6500.0;
    shutdown_cost 0.0;
    fixed_cost 1000.0;
    variable_cost 5.0;
    scarcity_cost 0.001;
}

object pypower.powerplant
{
    // CHOPIN_WIND_LLC: cap=10.0, cf=0.001, units=1
    // COMBINE_HILLS_I: cap=43.0, cf=0.004, units=1
    // EURUS_COMBINE_HILLS_TURBINE_RANCH_2: cap=66.1, cf=0.006, units=1
    // FOUR_CORNERS_WINDFARM_LLC: cap=10.0, cf=0.001, units=1
    // FOUR_MILE_CANYON_WINDFARM_LLC: cap=10.0, cf=0.001, units=1
    // FPL_ENERGY_VANSYCLE_LLC_OR: cap=122.8, cf=0.011, units=1
    // FPL_ENERGY_VANSYCLE_LLC_WA: cap=176.9, cf=0.016, units=1
    // NINE_CANYON: cap=95.9, cf=0.008, units=1
    // VANSYCLE: cap=25.0, cf=0.002, units=1
    // VANSYCLE_II_WIND_ENERGY_CENTER: cap=98.9, cf=0.009, units=1
    // VANTAGE_WIND_ENERGY_LLC: cap=90.0, cf=0.008, units=1
    // WILD_HORSE: cap=273.1, cf=0.024, units=1
    name "wecc240_psse_G_4102_WT";
    parent "wecc240_psse_G_4102";
    latitude 46.67;
    longitude -119.6;
    generator WT;
    operating_capacity 1021.7 MW;
    startup_cost 0.0;
    shutdown_cost 0.0;
    fixed_cost 0.0;
    variable_cost 0.0;
    scarcity_cost 0.0;
}

object pypower.gen
{
    name "wecc240_psse_G_4201";
    parent wecc240_psse_N_4201;
    Pmax 1518.9 MW;
    Qmax 303.8 MW;
    Qmin -303.8 MW;
    status IN_SERVICE;
    object gencost
    {
        model POLYNOMIAL;
        startup 0.0 $;
        shutdown 0.0 $;
        costs "0.0,0.0,0.0";
    };
}
object pypower.powerplant
{
    // MARCH_POINT_COGENERATION: cap=139.8, cf=0.092, units=1
    name "wecc240_psse_G_4201_CC";
    parent "wecc240_psse_G_4201";
    latitude 48.22;
    longitude -121.8;
    generator CC;
    operating_capacity 139.8 MW;
    startup_cost 35.0;
    shutdown_cost 0.0;
    fixed_cost 500.0;
    variable_cost 50.0;
    scarcity_cost 0.001;
}

object pypower.powerplant
{
    // MARCH_POINT_COGENERATION: cap=139.8, cf=0.092, units=1
    name "wecc240_psse_G_4201_CT";
    parent "wecc240_psse_G_4201";
    latitude 48.22;
    longitude -121.8;
    generator CT;
    operating_capacity 139.8 MW;
    startup_cost 25.0;
    shutdown_cost 0.0;
    fixed_cost 350.0;
    variable_cost 75.0;
    scarcity_cost 0.001;
}

object pypower.powerplant
{
    // DIABLO: cap=182.4, cf=0.12, units=1
    // GORGE: cap=207.3, cf=0.136, units=1
    // H_M_JACKSON: cap=111.8, cf=0.074, units=1
    // KOMA_KULSHAN_ASSOCIATES: cap=12.0, cf=0.008, units=1
    // LOWER_BAKER: cap=111.2, cf=0.073, units=1
    // ROSS: cap=450.0, cf=0.296, units=1
    // SOUTH_FORK_TOLT: cap=16.8, cf=0.011, units=1
    // UPPER_BAKER: cap=104.8, cf=0.069, units=1
    name "wecc240_psse_G_4201_HT";
    parent "wecc240_psse_G_4201";
    latitude 48.22;
    longitude -121.8;
    generator HT;
    operating_capacity 1196.3 MW;
    startup_cost 0.0;
    shutdown_cost 0.0;
    fixed_cost 200.0;
    variable_cost 0.0;
    scarcity_cost 0.001;
}

object pypower.powerplant
{
    // SIERRA_PACIFIC_BURLINGTON_FACILITY: cap=28.0, cf=0.018, units=1
    // UNIVERSITY_OF_WASHINGTON_POWER_PLANT: cap=15.0, cf=0.01, units=1
    name "wecc240_psse_G_4201_ST";
    parent "wecc240_psse_G_4201";
    latitude 48.22;
    longitude -121.8;
    generator ST;
    operating_capacity 43.0 MW;
    startup_cost 6500.0;
    shutdown_cost 0.0;
    fixed_cost 1000.0;
    variable_cost 5.0;
    scarcity_cost 0.001;
}

object pypower.gen
{
    name "wecc240_psse_G_5001";
    parent wecc240_psse_N_5001;
    Pmax 756.6 MW;
    Qmax 151.3 MW;
    Qmin -151.3 MW;
    status IN_SERVICE;
    object gencost
    {
        model POLYNOMIAL;
        startup 0.0 $;
        shutdown 0.0 $;
        costs "0.0,0.0,0.0";
    };
}
object pypower.powerplant
{
    // ENCOGEN: cap=176.4, cf=0.233, units=1
    // FERNDALE_GENERATING_STATION: cap=285.5, cf=0.377, units=1
    // SUMAS_POWER_PLANT: cap=125.5, cf=0.166, units=1
    name "wecc240_psse_G_5001_CC";
    parent "wecc240_psse_G_5001";
    latitude 49.43;
    longitude -122.3;
    generator CC;
    operating_capacity 587.4 MW;
    startup_cost 35.0;
    shutdown_cost 0.0;
    fixed_cost 500.0;
    variable_cost 50.0;
    scarcity_cost 0.001;
}

object pypower.powerplant
{
    // WHITEHORN: cap=169.2, cf=0.224, units=1
    name "wecc240_psse_G_5001_CT";
    parent "wecc240_psse_G_5001";
    latitude 49.43;
    longitude -122.3;
    generator CT;
    operating_capacity 169.2 MW;
    startup_cost 25.0;
    shutdown_cost 0.0;
    fixed_cost 350.0;
    variable_cost 75.0;
    scarcity_cost 0.001;
}

object pypower.gen
{
    name "wecc240_psse_G_4101";
    parent wecc240_psse_N_4101;
    Pmax 10333.0 MW;
    Qmax 2066.6 MW;
    Qmin -2066.6 MW;
    status IN_SERVICE;
    object gencost
    {
        model POLYNOMIAL;
        startup 0.0 $;
        shutdown 0.0 $;
        costs "0.0,0.0,0.0";
    };
}
object pypower.powerplant
{
    // KETTLE_FALLS_GENERATING_STATION: cap=57.9, cf=0.006, units=1
    name "wecc240_psse_G_4101_CT";
    parent "wecc240_psse_G_4101";
    latitude 47.95;
    longitude -119.0;
    generator CT;
    operating_capacity 57.9 MW;
    startup_cost 25.0;
    shutdown_cost 0.0;
    fixed_cost 350.0;
    variable_cost 75.0;
    scarcity_cost 0.001;
}

object pypower.powerplant
{
    // CHELAN: cap=59.2, cf=0.006, units=1
    // CHIEF_JOSEPH: cap=2456.2, cf=0.238, units=1
    // GRAND_COULEE: cap=6809.0, cf=0.659, units=1
    // MAIN_CANAL_HEADWORKS: cap=26.8, cf=0.003, units=1
    // SUMMER_FALLS_POWER_PLANT: cap=92.0, cf=0.009, units=1
    // WELLS: cap=774.0, cf=0.075, units=1
    name "wecc240_psse_G_4101_HT";
    parent "wecc240_psse_G_4101";
    latitude 47.95;
    longitude -119.0;
    generator HT;
    operating_capacity 10217.2 MW;
    startup_cost 0.0;
    shutdown_cost 0.0;
    fixed_cost 200.0;
    variable_cost 0.0;
    scarcity_cost 0.001;
}

object pypower.powerplant
{
    // KETTLE_FALLS_GENERATING_STATION: cap=57.9, cf=0.006, units=1
    name "wecc240_psse_G_4101_ST";
    parent "wecc240_psse_G_4101";
    latitude 47.95;
    longitude -119.0;
    generator ST;
    operating_capacity 57.9 MW;
    startup_cost 6500.0;
    shutdown_cost 0.0;
    fixed_cost 1000.0;
    variable_cost 5.0;
    scarcity_cost 0.001;
}

object pypower.gen
{
    name "wecc240_psse_G_4103";
    parent wecc240_psse_N_4103;
    Pmax 5568.6 MW;
    Qmax 1113.7 MW;
    Qmin -1113.7 MW;
    status IN_SERVICE;
    object gencost
    {
        model POLYNOMIAL;
        startup 0.0 $;
        shutdown 0.0 $;
        costs "0.0,0.0,0.0";
    };
}
object pypower.powerplant
{
    // RATHDRUM_POWER_LLC: cap=301.5, cf=0.054, units=1
    name "wecc240_psse_G_4103_CC";
    parent "wecc240_psse_G_4103";
    latitude 47.74;
    longitude -117.4;
    generator CC;
    operating_capacity 301.5 MW;
    startup_cost 35.0;
    shutdown_cost 0.0;
    fixed_cost 500.0;
    variable_cost 50.0;
    scarcity_cost 0.001;
}

object pypower.powerplant
{
    // NORTHEAST: cap=61.8, cf=0.011, units=1
    // RATHDRUM: cap=166.4, cf=0.03, units=1
    // WHEELABRATOR_SPOKANE: cap=26.0, cf=0.005, units=1
    name "wecc240_psse_G_4103_CT";
    parent "wecc240_psse_G_4103";
    latitude 47.74;
    longitude -117.4;
    generator CT;
    operating_capacity 254.2 MW;
    startup_cost 25.0;
    shutdown_cost 0.0;
    fixed_cost 350.0;
    variable_cost 75.0;
    scarcity_cost 0.001;
}

object pypower.powerplant
{
    // ALBENI_FALLS: cap=42.0, cf=0.008, units=1
    // CABINET_GORGE: cap=265.2, cf=0.048, units=1
    // DWORSHAK: cap=465.0, cf=0.084, units=1
    // LIBBY: cap=525.0, cf=0.094, units=1
    // LITTLE_FALLS: cap=43.2, cf=0.008, units=1
    // LITTLE_GOOSE: cap=810.0, cf=0.145, units=1
    // LONG_LAKE: cap=70.0, cf=0.013, units=1
    // LOWER_GRANITE: cap=810.0, cf=0.145, units=1
    // MONROE_STREET: cap=14.8, cf=0.003, units=1
    // NINE_MILE: cap=37.6, cf=0.007, units=1
    // NOXON_RAPIDS: cap=569.5, cf=0.102, units=1
    // POST_FALLS: cap=14.5, cf=0.003, units=1
    // THOMPSON_FALLS: cap=98.1, cf=0.018, units=1
    // UPPER_FALLS: cap=10.0, cf=0.002, units=1
    // UPRIVER_DAM_HYDRO_PLANT: cap=17.6, cf=0.003, units=1
    name "wecc240_psse_G_4103_HT";
    parent "wecc240_psse_G_4103";
    latitude 47.74;
    longitude -117.4;
    generator HT;
    operating_capacity 3792.5 MW;
    startup_cost 0.0;
    shutdown_cost 0.0;
    fixed_cost 200.0;
    variable_cost 0.0;
    scarcity_cost 0.001;
}

object pypower.powerplant
{
    // BOULDER_PARK: cap=24.6, cf=0.004, units=1
    name "wecc240_psse_G_4103_IC";
    parent "wecc240_psse_G_4103";
    latitude 47.74;
    longitude -117.4;
    generator IC;
    operating_capacity 24.6 MW;
    startup_cost 0.0;
    shutdown_cost 0.0;
    fixed_cost 0.0;
    variable_cost 50.0;
    scarcity_cost 0.001;
}

object pypower.powerplant
{
    // CLEARWATER_PAPER_IPP_LEWISTON: cap=113.8, cf=0.02, units=1
    name "wecc240_psse_G_4103_ST";
    parent "wecc240_psse_G_4103";
    latitude 47.74;
    longitude -117.4;
    generator ST;
    operating_capacity 113.8 MW;
    startup_cost 6500.0;
    shutdown_cost 0.0;
    fixed_cost 1000.0;
    variable_cost 5.0;
    scarcity_cost 0.001;
}

object pypower.powerplant
{
    // HOPKINS_RIDGE_WIND: cap=156.6, cf=0.028, units=1
    // LOWER_SNAKE_RIVER_WIND_ENERGY_PROJECT: cap=342.7, cf=0.062, units=1
    // MARENGO_WIND_PLANT: cap=210.6, cf=0.038, units=1
    // PALOUSE: cap=105.3, cf=0.019, units=1
    // TUCANNON_RIVER_WIND_FARM: cap=266.8, cf=0.048, units=1
    name "wecc240_psse_G_4103_WT";
    parent "wecc240_psse_G_4103";
    latitude 47.74;
    longitude -117.4;
    generator WT;
    operating_capacity 1082.0 MW;
    startup_cost 0.0;
    shutdown_cost 0.0;
    fixed_cost 0.0;
    variable_cost 0.0;
    scarcity_cost 0.0;
}

object pypower.gen
{
    name "wecc240_psse_G_6202";
    parent wecc240_psse_N_6202;
    Pmax 893.6 MW;
    Qmax 178.7 MW;
    Qmin -178.7 MW;
    status IN_SERVICE;
    object gencost
    {
        model POLYNOMIAL;
        startup 0.0 $;
        shutdown 0.0 $;
        costs "0.0,0.0,0.0";
    };
}
object pypower.powerplant
{
    // DAVE_GATES_GENERATING_STATION: cap=203.1, cf=0.227, units=1
    name "wecc240_psse_G_6202_CT";
    parent "wecc240_psse_G_6202";
    latitude 46.51;
    longitude -112.9;
    generator CT;
    operating_capacity 203.1 MW;
    startup_cost 25.0;
    shutdown_cost 0.0;
    fixed_cost 350.0;
    variable_cost 75.0;
    scarcity_cost 0.001;
}

object pypower.powerplant
{
    // HUNGRY_HORSE: cap=428.0, cf=0.479, units=1
    // KERR: cap=207.6, cf=0.232, units=1
    name "wecc240_psse_G_6202_HT";
    parent "wecc240_psse_G_6202";
    latitude 46.51;
    longitude -112.9;
    generator HT;
    operating_capacity 635.6 MW;
    startup_cost 0.0;
    shutdown_cost 0.0;
    fixed_cost 200.0;
    variable_cost 0.0;
    scarcity_cost 0.001;
}

object pypower.powerplant
{
    // BASIN_CREEK_PLANT: cap=54.9, cf=0.061, units=1
    name "wecc240_psse_G_6202_IC";
    parent "wecc240_psse_G_6202";
    latitude 46.51;
    longitude -112.9;
    generator IC;
    operating_capacity 54.9 MW;
    startup_cost 0.0;
    shutdown_cost 0.0;
    fixed_cost 0.0;
    variable_cost 50.0;
    scarcity_cost 0.001;
}

object pypower.gen
{
    name "wecc240_psse_G_5003";
    parent wecc240_psse_N_5003;
    Pmax 1246.7 MW;
    Qmax 249.3 MW;
    Qmin -249.3 MW;
    status IN_SERVICE;
    object gencost
    {
        model POLYNOMIAL;
        startup 0.0 $;
        shutdown 0.0 $;
        costs "0.0,0.0,0.0";
    };
}
object pypower.powerplant
{
    // BOUNDARY: cap=1118.6, cf=0.897, units=1
    // BOX_CANYON: cap=90.0, cf=0.072, units=1
    // SMITH_FALLS_HYDRO_PROJECT: cap=38.1, cf=0.031, units=1
    name "wecc240_psse_G_5003_HT";
    parent "wecc240_psse_G_5003";
    latitude 49.69;
    longitude -117.4;
    generator HT;
    operating_capacity 1246.7 MW;
    startup_cost 0.0;
    shutdown_cost 0.0;
    fixed_cost 200.0;
    variable_cost 0.0;
    scarcity_cost 0.001;
}

object pypower.gen
{
    name "wecc240_psse_G_6205";
    parent wecc240_psse_N_6205;
    Pmax 1141.5 MW;
    Qmax 228.3 MW;
    Qmin -228.3 MW;
    status IN_SERVICE;
    object gencost
    {
        model POLYNOMIAL;
        startup 0.0 $;
        shutdown 0.0 $;
        costs "0.0,0.0,0.0";
    };
}
object pypower.powerplant
{
    // BLACK_EAGLE: cap=24.0, cf=0.021, units=1
    // CANYON_FERRY: cap=49.8, cf=0.044, units=1
    // COCHRANE: cap=60.4, cf=0.053, units=1
    // HAUSER: cap=17.7, cf=0.016, units=1
    // HOLTER: cap=38.4, cf=0.034, units=1
    // MORONY: cap=63.0, cf=0.055, units=1
    // MYSTIC: cap=12.0, cf=0.011, units=1
    // RAINBOW: cap=59.0, cf=0.052, units=1
    // RYAN: cap=52.8, cf=0.046, units=1
    // TURNBULL_HYDRO: cap=13.0, cf=0.011, units=1
    name "wecc240_psse_G_6205_HT";
    parent "wecc240_psse_G_6205";
    latitude 47.43;
    longitude -111.3;
    generator HT;
    operating_capacity 390.1 MW;
    startup_cost 0.0;
    shutdown_cost 0.0;
    fixed_cost 200.0;
    variable_cost 0.0;
    scarcity_cost 0.001;
}

object pypower.powerplant
{
    // BIG_TIMBER_WIND_FARM: cap=25.0, cf=0.022, units=1
    // FAIRFIELD_WIND: cap=10.0, cf=0.009, units=1
    // GORDON_BUTTE_WIND_LLC: cap=17.7, cf=0.016, units=1
    // GREENFIELD_WIND_-_MT: cap=25.0, cf=0.022, units=1
    // JUDITH_GAP_WIND_ENERGY_CENTER: cap=135.0, cf=0.118, units=1
    // MUSSELSHELL_WIND_PROJECT: cap=10.0, cf=0.009, units=1
    // MUSSELSHELL_WIND_PROJECT_TWO_LLC: cap=10.0, cf=0.009, units=1
    // NATURENER_GLACIER_WIND_ENERGY_1: cap=106.5, cf=0.093, units=1
    // NATURENER_GLACIER_WIND_ENERGY_2: cap=103.5, cf=0.091, units=1
    // NATURENER_RIM_ROCK_ENERGY: cap=189.0, cf=0.166, units=1
    // SPION_KOP_WIND_FARM: cap=40.0, cf=0.035, units=1
    // STILLWATER_WIND_LLC: cap=79.7, cf=0.07, units=1
    name "wecc240_psse_G_6205_WT";
    parent "wecc240_psse_G_6205";
    latitude 47.43;
    longitude -111.3;
    generator WT;
    operating_capacity 751.4 MW;
    startup_cost 0.0;
    shutdown_cost 0.0;
    fixed_cost 0.0;
    variable_cost 0.0;
    scarcity_cost 0.0;
}

object pypower.gen
{
    name "wecc240_psse_G_6201";
    parent wecc240_psse_N_6201;
    Pmax 5021.4 MW;
    Qmax 1004.3 MW;
    Qmin -1004.3 MW;
    status IN_SERVICE;
    object gencost
    {
        model POLYNOMIAL;
        startup 0.0 $;
        shutdown 0.0 $;
        costs "0.0,0.0,0.0";
    };
}
object pypower.powerplant
{
    // ARVADA: cap=22.5, cf=0.004, units=1
    // BARBER_CREEK: cap=22.5, cf=0.004, units=1
    // CULBERTSON_GENERATION_STATION: cap=91.0, cf=0.018, units=1
    // GLENDIVE_GT: cap=83.7, cf=0.017, units=1
    // HARTZOG: cap=22.5, cf=0.004, units=1
    // MILES_CITY_GT: cap=23.3, cf=0.005, units=1
    // NEIL_SIMPSON_GAS_TURBINE_2: cap=40.0, cf=0.008, units=1
    // NEIL_SIMPSON_II: cap=130.0, cf=0.026, units=1
    // OREG_1_INC: cap=30.0, cf=0.006, units=1
    // OREG_2_INC: cap=30.0, cf=0.006, units=1
    name "wecc240_psse_G_6201_CT";
    parent "wecc240_psse_G_6201";
    latitude 45.69;
    longitude -106.6;
    generator CT;
    operating_capacity 495.5 MW;
    startup_cost 25.0;
    shutdown_cost 0.0;
    fixed_cost 350.0;
    variable_cost 75.0;
    scarcity_cost 0.001;
}

object pypower.powerplant
{
    // FORT_PECK: cap=179.7, cf=0.036, units=1
    // YELLOWTAIL: cap=268.8, cf=0.054, units=1
    name "wecc240_psse_G_6201_HT";
    parent "wecc240_psse_G_6201";
    latitude 45.69;
    longitude -106.6;
    generator HT;
    operating_capacity 448.5 MW;
    startup_cost 0.0;
    shutdown_cost 0.0;
    fixed_cost 200.0;
    variable_cost 0.0;
    scarcity_cost 0.001;
}

object pypower.powerplant
{
    // LEWIS_CLARK: cap=68.6, cf=0.014, units=1
    name "wecc240_psse_G_6201_IC";
    parent "wecc240_psse_G_6201";
    latitude 45.69;
    longitude -106.6;
    generator IC;
    operating_capacity 68.6 MW;
    startup_cost 0.0;
    shutdown_cost 0.0;
    fixed_cost 0.0;
    variable_cost 50.0;
    scarcity_cost 0.001;
}

object pypower.powerplant
{
    // COLSTRIP: cap=2363.4, cf=0.471, units=1
    // COLSTRIP_ENERGY_LP: cap=46.1, cf=0.009, units=1
    // DRY_FORK_STATION: cap=483.7, cf=0.096, units=1
    // HARDIN_GENERATOR_PROJECT: cap=115.7, cf=0.023, units=1
    // LEWIS_CLARK: cap=68.6, cf=0.014, units=1
    // NEIL_SIMPSON_II: cap=130.0, cf=0.026, units=1
    // WYGEN_1: cap=90.0, cf=0.018, units=1
    // WYGEN_2: cap=95.0, cf=0.019, units=1
    // WYGEN_III: cap=116.0, cf=0.023, units=1
    // WYODAK: cap=402.3, cf=0.08, units=1
    // YELLOWSTONE_ENERGY_LP: cap=68.0, cf=0.014, units=1
    name "wecc240_psse_G_6201_ST";
    parent "wecc240_psse_G_6201";
    latitude 45.69;
    longitude -106.6;
    generator ST;
    operating_capacity 3978.8 MW;
    startup_cost 6500.0;
    shutdown_cost 0.0;
    fixed_cost 1000.0;
    variable_cost 5.0;
    scarcity_cost 0.001;
}

object pypower.powerplant
{
    // DIAMOND_WILLOW_WIND_FACILITY: cap=30.0, cf=0.006, units=1
    name "wecc240_psse_G_6201_WT";
    parent "wecc240_psse_G_6201";
    latitude 45.69;
    longitude -106.6;
    generator WT;
    operating_capacity 30.0 MW;
    startup_cost 0.0;
    shutdown_cost 0.0;
    fixed_cost 0.0;
    variable_cost 0.0;
    scarcity_cost 0.0;
}
